folder simulations: version=37; creator=Apsim 7.10-r4220
  memo
    This biochar study was modified from the biochar sims used in the GCB-Bioenergy paper (Archontoulis et al., 2016)

    Archontoulis, S.V., Huber, I., Miguez, F.E., Thorburn, P.J., Rogovska, N., Laird, D.A., 2016. A model for mechanistic and system assessments of biochar effects on soils and crops and trade-offs. GCB Bioenergy 8, 1028–1045. doi:10.1111/gcbb.12314
  folder KBS
    simulation scen_1_611
      metfile met: filename=basic_wth_1.met
      clock
        start_date = 01/01/1989  # Enter the start date of the simulation
        end_date = 31/12/2099  # Enter the end date of the simulation
      summaryfile
      area paddock
        surfaceom SurfaceOrganicMatter
          PoolName = soybean  # Organic Matter pool name
          type = soybean  # Organic Matter type
          mass = 1000  # Initial surface residue (kg/ha)
          cnr = 27  # C:N ratio of initial residue
          standing_fraction = 0  # Fraction of residue standing
        fertiliser
        maize
        Soil Loam: SoilType=Kalamazoo:187069; State=MI; Country=US; ApsoilNumber=0; Latitude=42.41; Longitude=-85.372; YearOfSampling=0
          DataSource=SSURGO (https://sdmdataaccess.nrcs.usda.gov/) through R package soilDB, R package apsimx function ssurgo2sp. Timestamp 2022-10-02 21:52:50
          Comments=cokey = 22386986 - acres percent = 95 - component percent = 95 - taxonomic classification name = Fine-loamy, mixed, active, mesic Typic Hapludalfs - drainage class = Well drained - elevation = 275 - slope = 3 - geomdesc = Head Slope, Interfluve, Nose Slope, Side Slope
          Water
            Thickness  BD    AirDry  LL15   DUL    SAT    KS
            200        1.11  0.034   0.068  0.26   0.438  86.4
            200        1.2   0.034   0.068  0.26   0.395  86.4
            200        1.6   0.034   0.068  0.26   0.395  86.4
            200        1.55  0.138   0.138  0.246  0.393  47.52
            200        1.55  0.069   0.069  0.142  0.385  475.2
            200        1.55  0.023   0.023  0.069  0.406  4752
            200        1.55  0.023   0.023  0.069  0.406  4752
            200        1.55  0.023   0.023  0.069  0.406  4752
            200        1.55  0.023   0.023  0.033  0.414  4752
            200        1.55  0.023   0.023  0.033  0.414  4752
            BD source: Field measured and checked for sensibility (layer 2, 3, 4)
            AirDry source: Estimated based on local knowledge (layer 1, 2, 3, 4)
            LL15 source: Estimated based on local knowledge (layer 2, 3, 4)
            DUL source: Field measured and checked for sensibility (layer 1, 2, 3, 4)
            SAT source: Calculated from measured, estimated or calculated BD (layer 1, 2, 3, 4)
            SoilCrop maize
              LL=[0.068, 0.068, 0.068, 0.138, 0.069, 0.023, 0.023, 0.023, 0.023, 0.023]
              KL=[0.06, 0.049, 0.04, 0.033, 0.027, 0.022, 0.018, 0.06, 0.012, 0.01]
              XF=[1, 1, 1, 1, 1, 1, 1, 1, 1, 1]
              LL source: Estimated based on local knowledge (layer 2, 3, 4)
            SoilCrop soybean
              LL=[0.068, 0.068, 0.068, 0.138, 0.069, 0.023, 0.023, 0.023, 0.023, 0.023]
              KL=[0.06, 0.05, 0.04, 0.03, 0.03, 0.02, 0.02, 0.02, 0.012, 0.01]
              XF=[1, 1, 1, 1, 1, 1, 1, 1, 1, 1]
              LL source: Estimated based on local knowledge (layer 1, 2, 3, 4)
            SoilCrop wheat
              LL=[0.068, 0.068, 0.068, 0.138, 0.069, 0.023, 0.023, 0.023, 0.023, 0.023]
              KL=[0.06, 0.05, 0.04, 0.03, 0.03, 0.02, 0.02, 0.02, 0.012, 0.01]
              XF=[1, 1, 1, 1, 1, 1, 1, 1, 1, 1]
          SoilWater: SummerCona=3.2; SummerU=7.1; SummerDate=1-jun; WinterCona=3.2; WinterU=7.1; WinterDate=1-dec; DiffusConst=88; DiffusSlope=35; Salb=0.13; CN2Bare=63; CNRed=20; CNCov=0.8; Thickness=[90, 90, 240, 240, 230, 230, 300, 180]; SWCON=[0.36, 0.36, 0.355, 0.355, 0.271, 0.271, 0.266, 0.266]
          SoilOrganicMatter: RootCN=45; RootWt=1000; SoilCN=12; EnrACoeff=7.4; EnrBCoeff=0.2; OCUnits=Total
            Thickness  OC     FBiom  FInert
            200        0.87   0.04   0.8
            200        0.43   0.033  0.808
            200        0.43   0.027  0.816
            200        0.233  0.022  0.824
            200        0.19   0.018  0.833
            200        0.01   0.015  0.841
            200        0.01   0.012  0.849
            200        0.01   0.01   0.858
            200        0.01   0.008  0.867
            200        0.01   0.007  0.875
            OC source: Estimated based on local knowledge (layer 1, 2, 3, 4)
          Analysis: PHUnits=Water; BoronUnits=HotWater
            Thickness  Texture  PH   ParticleSizeSand  ParticleSizeSilt  ParticleSizeClay
            200        L        5.7  43                38                19
            200        L        5.7  43                38                19
            200        L        5.4  43                38                19
            200        L        5.4  51                26                23
            200        L        5.4  71                17                12
            200        L        5.4  87                8                 5
            200        L        5.4  87                8                 5
            200        L        5.4  87                8                 5
            200        L        5.4  95                4                 1
            200        L        5.4  95                4                 1
            PH source: Estimated based on local knowledge (layer 1, 2, 3, 4)
            ParticleSizeSand, ParticleSizeSilt source: Measured (layer 1)
            ParticleSizeClay source: Measured (layer 1, 2)
          Sample Initial nitrogen: NO3Units=kgha; NH4Units=kgha; SWUnits=Volumetric; OCUnits=Total; PHUnits=Water
            Thickness  NO3    NH4    SW
            200        0.5    0.05   0
            200        0.495  0.05   -
            200        0.49   0.049  -
            200        0.485  0.049  -
            200        0.48   0.048  -
            200        0.476  0.048  -
            200        0.471  0.047  -
            200        0.466  0.047  -
            200        0.462  0.046  -
            200        0.457  0.046  -
          InitialWater: FractionFull=0.65; PercentMethod=EvenlyDistributed; RelativeTo=ll15
        folder Manager folder
          manager Harvesting rule
            # Harvesting criteria
            crop = maize  # Enter name of crop to harvest when ripe
            on end_of_day:
```
           if ('[crop]' = 'cotton') then
              if ([crop].ozcot_status > 0) then
                  [crop] harvest
              endif
           elseif ([crop].StageName = 'harvest_ripe' or [crop].plant_status = 'dead') then
              [crop]  harvest
              [crop]  end_crop
           endif
```
          manager Harvesting rule1
            # Harvesting criteria
            crop = soybean  # Enter name of crop to harvest when ripe
            on end_of_day:
            script: same as in KBS.scen_1_611.paddock.Manager folder.Harvesting rule
          manager Harvesting rule2
            # Harvesting criteria
            crop = wheat  # Enter name of crop to harvest when ripe
            on end_of_day:
            script: same as in KBS.scen_1_611.paddock.Manager folder.Harvesting rule
          manager Remove residues at harvest
            # Removal criteria
            crop = maize  # Name of crop harvest to trigger residue removal
            surfaceommodule = SurfaceOrganicMatter  # Name of your surface organic matter module
            fraction = 0.0075  # Enter biomass removal fraction from field (0-1)
            on init:
```
               last_stage_name = 'none'
```
            on start_of_day:
```
         if [crop].StageName <> last_stage_name  then
            if ([crop].StageName = 'out') then
               '[surfaceommodule]' tillage type = user_defined, f_incorp = [fraction] (), tillage_depth = 0.0 ()
            endif
         endif
         last_stage_name = [crop].StageName
```
          manager Remove residues at harvest1
            # Removal criteria
            crop = soybean  # Name of crop harvest to trigger residue removal
            surfaceommodule = SurfaceOrganicMatter  # Name of your surface organic matter module
            fraction = 0.0075  # Enter biomass removal fraction from field (0-1)
            on init:
```
               last_stage_name = 'none'
```
            on start_of_day:
            script: same as in KBS.scen_1_611.paddock.Manager folder.Remove residues at harvest
          manager Remove residues at harvest2
            # Removal criteria
            crop = wheat  # Name of crop harvest to trigger residue removal
            surfaceommodule = SurfaceOrganicMatter  # Name of your surface organic matter module
            fraction = 0.0075  # Enter biomass removal fraction from field (0-1)
            on init:
```
               last_stage_name = 'none'
```
            on start_of_day:
            script: same as in KBS.scen_1_611.paddock.Manager folder.Remove residues at harvest
        outputfile: filename=scen_1_611.out; title=scen_1_611
          events Reporting Frequency: event=daily
          variables
            variable:
              dd/mm/yyyy as Date
              bd(1)
              yield
              sw(1)
              st(1)
              biomass
              stover
              dul(1)
              sat(1)
              ph(1)
              n2o_atm_denitrification(1-5) format 8 as n2o_bylayer_kgha
              oc(1-5) format 8 as oc_bylayer_kgha
        manager2 biochar5v3
          date_of_application = 08/12/2021  # Date of biochar application (mm/dd/yyyy)
          biochar_added = 19200  # amount of biochar applied (kg/ha)
          frac_c_biochar = 0.78  # fraction carbon in biochar (0-1)
          biochar_loss = 0.02  # fraction of biochar lost during application (0-1)
          MRT1 = 1  # mean residence time for labile biochar pool (years)
          MRT2 = 500  # mean residence time for resistant biochar pool (years)
          frac_labile = 0.13  # biochar labile fraction (0-1)
          ef_biochar = 0.4  # fraction of decomposed biochar that goes to OC pools (0-1) (biochar efficiency)
          fr_biochar_biom = 0.05  # fraction of decomposed biochar that goes to biom (0-1)
          biochar_cn = 281  # biochar CN ratio
          sand = .416  # sand (0-1)
          clay = .21  # clay (0-1)
          prim_biom = 0  # priming coefficient for biom pool (-1 to 1) use 0.05
          prim_hum = 0  # priming coefficient for hum pool (-1 to 1) use 0.05
          prim_cell = 0  # priming coefficient for cell pool (-1 to 1) use 0.08
          prim_carb = 0  # priming coefficient for carb pool (-1 to 1) use 0.08
          prim_lign = 0  # priming coefficient for lign pool (-1 to 1) use 0.08
          prim_ef = 0  # negative priming coefficient for internal C partitioning (use 0.1 for 20 Mg), biom
          prim_fr = 0  # negative priming coefficient for internal C partioning (use -0.1), biom
          prim_ef_fom = 0  # negative priming for internal C partitioning (use 0.1 for 20 mg),fom
          prim_fr_fom = 0  # negative priming for internal C partitioning (use -0.1 for 20 mg), fom
          biom_cn = 8  # C/N ratio of biom pool
          soil_cn = 12  # C/N ratio of soil stuff
          incorp_depth = 300  # Biochar incorporation depth (mm)
          dul_qual = 0.15  # Slope of dul quality equation (default 0.33)
          bd_qual = 0.15  # Slope of bd quality equation (default 0.33)
          bc_cce = 50  # Biochar LV (cmol/kg?)
          bc_cec = 187  # Biochar ECEC (cmol/kg)
          cnrf_bc_coeff = 0.693  # Biochar cnrf coefficient (0-1)
          cnrf_bc_optcn = 25  # Optimum cn ratio for bc
          bc_wfps_factor = 1  # Biochar WFPS factor (0-1)
          nh4_adsorption = 0.006  # Biochar nh4 absorption coefficient (Langmuir)
          nh4_desorption = 0.006  # Biochar nh4 desorption coefficient (Langmuir)
          # Tillage info
          tillage = 0.80  # % BD reduction due to tillage
          # Soil information
          soil_name = Loam  # Name of the soil as it appears in the simulation tree. This being wrong causes object reference errors.
          soil_order = Alfisol  # Order of the soil
          nclay_portion = 0.95  # Portion of soil clay that is nclay (0-1)
          uph = 9.3  # Soil upper ph
          lph = 3.5  # Soil lower ph
          ab_val = 0  # Acid - Base value
          bot_slope = 10  # Unit conversion for titration curve (use 10)
          # Switches for various biochar components (development purposes)
          decomp_switch = on  # Priming effects? (on/off)
          nitrification_switch = on  # Nitrification effects? (on/off)
          ph_switch = on  # PH effects ? (on/off)
          ll_switch = on  # LL and CLL effects? (on/off)
          dul_switch = on  # DUL effects ? (on/off)
          xf_switch = off  # XF effects? (on/off)
          kl_switch = off  # KL effects? (on/off)
          bd_switch = on  # BD effects? (on/off) (under development)
          biochar_c_switch = on  # Biochar module (on/off)
          swcon_switch = off  # SWCOM effects (on/off)
          ks_switch = off  # Ksat effects ? (on/off)
          sat_switch = on  # SAT effects? (on/off)
```csharp
using System;

using ModelFramework;

using CSGeneral;

 

public class Script
{     
   [Link] Paddock MyPaddock; // Can be used to dynamically get access to simulation structure and variables\
   [Input] DateTime Today; // Equates to the value of the current simulation date - value comes from CLOCK   
   [Input] double wf;      // Use the same water factor (SoilN)
   [Input] double[] oc; //Soil OC percent
   [Input] double[] ph; //Soil pH
   [Input] double[] nh4;
   [Input] double[] no3;
   [Input] double[] dlayer;
   [Input] double[] hum_c;
   [Input] double[] biom_c;
   [Input] double[] bd;
   [Input] double rain;
   [Input] double[] nit_tot;
   
   [Input] double[] no3_min; //Min NO3 in soil per layer
   [Input] double[] nh4_min; //Min NH4 in soil per layer
   double[] tf;      // Use the same temperature factor (SoilN)
  
   [Param] int biochar_added;      // in kg/ha
   [Param] double frac_c_biochar;  // C in biochar
   [Param] double biochar_loss;    // usually there is a loss during application that might impact calculations
   [Param] double MRT1;             // mean residence time for the labile biochar pool
   [Param] double MRT2;             // mean residence time for the resistant biochar pool
   [Param] double frac_labile;     // labile fraction of biochar; this depends on the biochar type - varies from 1 to 30%.
   [Param] double ef_biochar;      // efficiency of biochar retained in the system
   [Param] double fr_biochar_biom; // a small portion goes to BIOM (usually this is zero) and the rest goes to HUM
   [Param] double biochar_cn;         // CN ratio of the new biochar pool
   [Param] string date_of_application; //The date biochar was adde
   [Param] double sand; // Sand percent of soil
   [Param] double clay; //Clay percent of soil 
   [Param] string decomp_switch; //Whether or not biochar affects decomposition  
   [Param] string nitrification_switch; //Whether or not biochar affects nitrification
   [Param] string ph_switch; //whether biochar affects ph
   [Param] string ll_switch;
   [Param] string dul_switch;
   [Param] string xf_switch;
   [Param] string kl_switch;
   [Param] string bd_switch;
   [Param] string biochar_c_switch;
   [Param] string swcon_switch;
   [Param] string ks_switch;
   [Param] string sat_switch;
   [Param] double prim_hum;//priming effects
   [Param] double prim_biom;
   [Param] double prim_cell;
   [Param] double prim_carb;
   [Param] double prim_lign;
   [Param] double prim_fr;
   [Param] double prim_ef;
   [Param] double prim_fr_fom;
   [Param] double prim_ef_fom;
   [Param] string soil_name;
   [Param] double soil_cn; //C:N ratio of soil (SoilN)
   [Param] double biom_cn;
   [Param] double incorp_depth;
   [Param] double tillage;
   [Param] double dul_qual;
   [Param] double bd_qual;
   [Param] string soil_order;
   [Param] double nclay_portion;
   [Param] double bc_cce;
   [Param] double bc_cec;
   [Param] double cnrf_bc_coeff;
   [Param] double cnrf_bc_optcn;
   [Param] double uph;
   [Param] double lph;
   [Param] double ab_val;
   [Param] double bot_slope;
   [Param] double bc_wfps_factor;
   
   [Param] double nh4_adsorption;
   [Param] double nh4_desorption;

   [Output] double[] BiocharC;             // BiocharC = biochar_added * frac_c_biochar * biochar_loss
   [Output] double BiocharC_total;    // Ammount of biochar c in each individual soil layer
   [Output] double[] dlt_c_min_biochar;    // here I use a douple exponential function instead of a first order decay
   [Output] double[] dlt_c_biochar_co2;    // 1 - efficiency
   [Output] double[] dlt_c_biochar_biom;   //
   [Output] double[] dlt_c_biochar_hum;
   [Output] double[] dlt_n_min_biochar;
   [Output] double[] n_demand_bc;
   [Output] double[] n_avail_bc;
   [Output] double[] bc_nh4;
   [Output] double[] BiocharC_labile;
   [Output] double[] BiocharC_resistant;
   [Output] double BiocharC_labile_total;
   [Output] double BiocharC_resistant_total;
   [Output] double rd_hum_fac = 0.0, rd_fr_fom_fac = 0.0, rd_ef_fom_fac = 0.0; 
   [Output] double rd_biom_fac = 0.0, rd_carb_fac = 0.0, rd_cell_fac = 0.0, rd_lign_fac = 0.0, rd_ef_fac = 0.0, rd_fr_fac = 0.0;
   [Output] double[] saxon_bd;
   [Output] double[] saxon_sat;
   [Output] double[] till_bd;
   [Output] double[] till_sat;
   [Output] double[] cnr_bcf; //the cnrf_bc. called as such to avoid a name conflict with SurfaceOrganicMatter (need to look into)
   [Output] double[] scale_factor;
   [Output] double[] dlt_dlayer;
   [Output] double[] biochar_bd; //internal virtual bd for soil water
   [Output] double[] dlt_c_min_biochar_pot;
   [Output] double[] total_stress;
   
   private double[] init_soil_fac;



   //Debugging related output variables
   //How we communicate with other modules
   [Event] public event BiocharDecomposedDelegate BiocharDecomposed;
   [Event] public event BiocharAppliedDelegate BiocharApplied;
   
   private int dayApp;
   private int moApp;
   private int yearApp;
  
   //kb1 = labile pool, kb2 is resistant (decomp rate constants)
   private double kb1, kb2;
   
   //thisPH = conversion of soil pH, the rest are soil parameters
   private double[] thisPH, dul, ll15, sat, swcon, ks;
   //the date of application
   private DateTime date;
   //nh4 date
   private DateTime nh4_date;
   
   //The base titration value calcutated from default soil pH
   private double[] titrat_val;
   
   private double biochar_ph_value; //10^-(bc_ph)
   
   private double[] yesterday_oc; //OC from yesterday so we can compute delta
   private double rainAmt;
   private double[] initialBD;
   //The ratio of biochar mass in the soil to mass of that segment of soil
   private double[] MassComparison;
   //Respective mass of each layer, computed using bulk density on day 1
   private double[] LayerMass;
   
   private bool firstTill;
   private int till_depth_layer;
   private double q_ll;//Quality factors
   
   
   [Output] double[] soil_cec;
   [Output] double[] soil_cec_orig;
   
   [Output] double wfps_factor;
   

   // The following event handler will be called once at the beginning of the simulation
   [EventHandler] public void OnInitialised()
   {
      bc_nh4 = new double[oc.Length];
      thisPH = new double[ph.Length];
      soil_cec = new double[oc.Length];
      soil_cec_orig = new double[oc.Length];
      titrat_val = new double[oc.Length];
      MassComparison = new double[oc.Length];
      LayerMass = new double[oc.Length];
      biochar_bd = bd;
      for(int i = 0; i < ph.Length; i++)
      {
         thisPH[i] = ph[i];
         soil_cec[i] = get_soil_CEC(i);
         titrat_val[i] = 216.51*Math.Exp(ph[i]*(-0.91));
         soil_cec_orig[i] = get_soil_CEC(i);
         LayerMass[i] = bd[i] * dlayer[i] * 10000;
      }
      biochar_ph_value = Math.Pow(10, -bc_cce);
      
      //To convert MRT to kb
      
      kb1 = Math.Log(2.0) / (MRT1 * 365);
      kb2 = Math.Log(2.0) / (MRT2 * 365);
      
      init_soil_fac = new double[oc.Length];
      for (int i = 0; i < oc.Length; i++)
      {
         init_soil_fac[i] = 100 / (dlayer[i] * bd[i]);
      }
      
      //Only works for USA format dates - change in future? Maybe change input format?
      dayApp = Convert.ToInt32(date_of_application.Substring(3, 2));
      moApp = Convert.ToInt32(date_of_application.Substring(0, 2));
      yearApp = Convert.ToInt32(date_of_application.Substring(6, 4));
      
      date = new DateTime(yearApp, moApp, dayApp);
      
      
      BiocharC_labile = new double[oc.Length];
      BiocharC_resistant = new double[oc.Length];
      BiocharC = new double[oc.Length];
      
      firstTill = false;
      
      //initialize a lot of things
      dlt_c_biochar_co2 = new double[oc.Length];
      dlt_c_biochar_biom = new double[oc.Length];
      dlt_c_biochar_hum = new double[oc.Length];
      dlt_c_min_biochar = new double[oc.Length];
      dlt_n_min_biochar = new double[oc.Length];
      n_demand_bc = new double[oc.Length];
      n_avail_bc = new double[oc.Length];
      yesterday_oc = new double[oc.Length];
      saxon_bd = new double[oc.Length];
      saxon_sat = new double[oc.Length];
      till_bd = new double[oc.Length];
      till_sat = new double[oc.Length];
      cnr_bcf = new double[oc.Length];
      scale_factor = new double[oc.Length];
      dlt_dlayer = new double[oc.Length];
      dlt_c_min_biochar_pot = new double[oc.Length];
      total_stress = new double[oc.Length];
      
      rainAmt = 0.0;
      initialBD = bd;
      q_ll = 0.01;
    
   }

     
   //Called each daily timestep
   
   
   [EventHandler] void OnProcess()
   {
      //Delta arrays for each variable
      rainAmt += rain;
      
      double[] dlt_ks = new double[oc.Length];
      double[] dlt_dul = new double[oc.Length];
      double[] dlt_ll = new double[oc.Length];
      double[] dlt_bd = new double[oc.Length];
      double[] dlt_swcon = new double[oc.Length];
      double[] dlt_sat = new double[oc.Length];
      double[] dlt_hum = new double[oc.Length];
      double[] dlt_biom = new double[oc.Length];
      double[] dlt_ph = new double[oc.Length];
      double[] dlt_n_avail = new double[oc.Length];
      double[] dlt_biochar_c = new double[oc.Length];
      double[] bc_nh4_dlt = new double[oc.Length];
      double[] dlt_kl = new double[oc.Length];
      
      
      
      for (int i = 0; i < oc.Length; i++)//Since kl's effect is multiplicative, its default needs to be 1
         dlt_kl[i] = 1.0;
      
      //computeDULandBD(out saxon_dul, out saxon_bd, 0);
      //saxon_ll = computeLL(0);
      //saxon_sat = giveSAT(0);
      if (Today < date)
      {
         for (int i = 0; i < dlayer.Length; i++)
         {
            saxon_bd[i] = bd[i];
         }
      }
      if (Today == date)
         //Step 1
         applyBiochar();
      if (Today > date)
      {
         for (int i = 0; i < oc.Length; i++)//try looping through all layers
         {
            MyPaddock.Get(soil_name + " Nitrogen.tf", out tf);//This si why soil name needs to be an input parameter
         
            MassComparison[i] = (BiocharC[i] / frac_c_biochar)/(LayerMass[i]);
            double n_demand, dlt_n_min_tot_bc;
         
         //double rd_hum_fac = 0.0, rd_biom_fac = 0.0, rd_carb_fac = 0.0, rd_cell_fac = 0.0, rd_lign_fac = 0.0, rd_ef_fac = 0.0, rd_fr_fac = 0.0;
            double nh4_change;
         
            double new_ph;
            //Local variables for this specific soil layer
            double new_layer_ll, new_layer_bd, new_layer_dul, new_layer_ks, new_layer_sat, new_layer_swcon = 0.0;
            //step 2
            //When biochar functionality is expanded, every instance of a '0' method argument or array index will be changed to a layer index, and layers that biochar 
            //alters will be iterated over in a for loop, but for now biochar only changes the first layer
            dlt_c_min_biochar[i] = computeDailyBCCarbDecomp(i);
            //step 3
            computeDLTs(out dlt_c_biochar_biom[i], out dlt_c_biochar_hum[i], out dlt_c_biochar_co2[i], dlt_c_min_biochar[i]);
            //step 4 -inactive
            
         
            n_demand = getNDemand(dlt_c_biochar_biom[i], dlt_c_biochar_hum[i]);
            dlt_n_min_tot_bc = computeNFromDecomp(dlt_c_min_biochar[i]);
         
            n_demand_bc[i] = n_demand;
            n_avail_bc[i] = dlt_n_min_tot_bc;
            dlt_n_min_biochar[i] = dlt_n_min_tot_bc - n_demand; //This will get added to dlt_n_min_tot I think
            //Step 5 happens in model
         
            //Step 6 
         
            get_rd_factors(out rd_hum_fac, out rd_biom_fac, out rd_carb_fac, out rd_cell_fac, out rd_lign_fac, 
               out rd_ef_fac, out rd_fr_fac, out rd_ef_fom_fac, out rd_fr_fom_fac, i);
            
            //Step 7 
         
            nh4_change = get_NH4_changes(i);
            //Step 8
         
            soil_cec[i] = get_new_cec(i);
            new_ph = get_new_ph(i);
         
            //For computing delta locally.
         
            getCurrentSoilWatValues();
         
         
            //Step 9
            new_layer_ll = computeLL(i);
            computeDULandBD(out new_layer_dul, out new_layer_bd, i);
            
            //new_layer_sat = giveSAT(i); //Active but not being used
            /**
            new_layer_swcon = computeSWCON(0, new_layer_sat, new_layer_bd); 
            new_layer_ks = computeKS(0, new_layer_sat, new_layer_dul, new_layer_ll);
            **/
         
         
            //End of steps
            /**
            * The biochar decomposed event requires that changes be in terms of delta. 
            * However, our equations give the total value, not the change, so we must compute
            * the change within this script.
            **/
            //dlt_ks[0] = new_layer_ks - ks[0];
            dlt_dul[i] = new_layer_dul;// -dul[i];
            dlt_ll[i] = new_layer_ll;// -ll15[i];
        
         
         
         //not actually a delta, model stops working if it is. Instead, is the next wanted value of bd
            if (BiocharC[i] != 0.0)
            {
               dlt_bd[i] = new_layer_bd + saxon_bd[i];
            }
            else
               dlt_bd[i] = initialBD[i];
            
         
            dlt_hum[i] = dlt_c_biochar_hum[i];
            dlt_biom[i] = dlt_c_biochar_biom[i];
         
            dlt_biochar_c[i] = dlt_c_min_biochar[i];
         
            dlt_ph[i] = new_ph - ph[i];
         
            dlt_n_avail[i] = dlt_n_min_biochar[i];
         
            bc_nh4_dlt[i] = nh4_change;
            if (kl_switch.Equals("on")) //So that kl does not go to 0
               dlt_kl[i] = 1; //what became of step 10
            
            
         }
            //End of loop
            //The data structure for our decomposition event
            BiocharDecomposedType BiocharDecomp = new BiocharDecomposedType();
         
         getCurrentSoilWatValues();
         //region for andales saxon mergeing - to later integrate with 
         double[] andales_bd = AndalesBD();
         double[] bd_new = biggest_bd_dlt(dlt_bd, andales_bd);
         double[] sat_dlt_new = sat_in_terms_of_dlt(bd_new);
         
         for (int i = 0; i < oc.Length; i++)
         {
            double temp;
            saxon_sat[i] = (-(dlt_bd[i] - saxon_bd[i]) / 2.65) * 0.9 + sat[i];
            saxon_bd[i] = dlt_bd[i];
            till_bd[i] = andales_bd[i];
            till_sat[i] = ( -(andales_bd[i] - biochar_bd[i]) / 2.65) * 0.9 + sat[i];
            temp = 100 / (bd_new[i] * init_soil_fac[i]);
            dlt_dlayer[i] = temp - dlayer[i];
         }
         
         biochar_bd = bd_new;
            //Script control area
            if (dul_switch.Equals("on"))
            {
               BiocharDecomp.dlt_dul = dlt_dul;
            }
            if (ll_switch.Equals("on"))
            {
               BiocharDecomp.dlt_ll = dlt_ll;
            }
            if (sat_switch.Equals("on"))
            {
               BiocharDecomp.dlt_sat = sat_dlt_new;
            }
         //Since errors occur if bd is in terms of delta, we need to ensure that if bd is off, we still get what we want
            if(bd_switch.Equals("on"))
            {
            BiocharDecomp.dlt_bd = bd;   
            //BiocharDecomp.dlt_bd = bd_new;
               //MyPaddock.Set("dlt_dlayer", dlt_dlayer);
            }
            else 
            {
               BiocharDecomp.dlt_bd = bd;
            }
            if (swcon_switch.Equals("on"))
            {
               BiocharDecomp.dlt_swcon = dlt_swcon;
            }
            if (ks_switch.Equals("on"))
            {
               BiocharDecomp.dlt_ks = dlt_ks;
            }
         
         
            if (biochar_c_switch.Equals("on"))
            {
               BiocharDecomp.hum_c = dlt_hum;
               BiocharDecomp.biom_c = dlt_biom;
               BiocharDecomp.dlt_biochar_c = dlt_biochar_c;
            }
         
            if (nitrification_switch.Equals("on"))
            {
               BiocharDecomp.bc_nh4_change = bc_nh4_dlt;
            }
         
            if (decomp_switch.Equals("on"))
            {
               BiocharDecomp.dlt_rd_hum = rd_hum_fac;
               BiocharDecomp.dlt_rd_biom = rd_biom_fac;
               BiocharDecomp.dlt_rd_carb = rd_carb_fac;
               BiocharDecomp.dlt_rd_cell = rd_cell_fac;
               BiocharDecomp.dlt_rd_lign = rd_lign_fac;
               BiocharDecomp.dlt_rd_ef = rd_ef_fac;
               BiocharDecomp.dlt_rd_fr = rd_fr_fac;
            BiocharDecomp.dlt_rd_ef_fom = rd_ef_fom_fac;
            BiocharDecomp.dlt_rd_fr_fom = rd_fr_fom_fac;
            
            }
         
         
            BiocharDecomp.dlt_n_biochar = dlt_n_avail;
            if (ph_switch.Equals("on"))
            {
               BiocharDecomp.dlt_ph = dlt_ph;
            }
         
         BiocharDecomp.bc_wfps_factor = 1.0 - this.bc_wfps_factor;
         
         
            BiocharDecomp.dlt_kl = dlt_kl; //Since KL is a multiplicative effect, if we do not always assign this KL will go to 0
            //If uninitialized, it is 0 by default
         
            BiocharDecomposed.Invoke(BiocharDecomp);
         Console.WriteLine("Biochar bd: " + biochar_bd[0]);
         
         
      }
      
      
      for (int i = 0; i < oc.Length; i++)
         yesterday_oc[i] = oc[i]; //Make a deep copy
      
      
   }
      
   
   //Step 1 section
   private void applyBiochar()
   {
      /**
      * This puts the proper amount of biochar into the necessary soil layers
      * based off of how deeply the biochar was applied, assuming even distribution
      * of BC throughout its application range. Based off an implementation already 
      * in APSIM.
      **/
      wfps_factor = 1.0 - bc_wfps_factor;
      double depth_so_far = 0.0;
      double depth_to_go;
      double frac_bc_layer;
      double layer_incorp_depth;
      for (int i = 0; i < dlayer.Length; i++)
      {
         depth_to_go = incorp_depth - depth_so_far;
         if (depth_to_go <= 0.0)
            depth_to_go = 0.0;
         layer_incorp_depth = Math.Min(depth_to_go, dlayer[i]);
         frac_bc_layer = layer_incorp_depth / incorp_depth;
         BiocharC[i] = biochar_added * frac_c_biochar * (1 - biochar_loss) * frac_bc_layer;
         BiocharC_labile[i] = BiocharC[i] * frac_labile;
         BiocharC_resistant[i] = BiocharC[i] * (1 - frac_labile);
         
         depth_so_far += dlayer[i];
      }
      BiocharAppliedType BioApp = new BiocharAppliedType();
      double[] bc_carb_applied = new double[oc.Length];
      for (int i = 0; i < bc_carb_applied.Length; i++)
         bc_carb_applied[i] = BiocharC[i];
      
      BioApp.bc_carbon_ammount = bc_carb_applied;
      BiocharApplied.Invoke(BioApp);
         
      Console.WriteLine("Biochar has been applied \nAmmount: " + biochar_added + " kg/ha" + "\nDepth: " + incorp_depth + " (mm)");
      sumSoilBCFirstTime();
      
   
   }
   //Step 2 section
   
   private double computeDailyBCCarbDecomp(int layer)
   {
      double pot_hum, pot_biom, pot_co2, pot_tot;
      cnr_bcf[layer] = calculateCNR_BCF(layer);
      calculatePotentialDecomp(layer, cnr_bcf[layer], out pot_hum, out pot_biom, out pot_co2, out pot_tot);
      scale_factor[layer] = calculateScale(layer, pot_biom, pot_hum, pot_tot);
      
      
      return calculateActualDecomp(layer, scale_factor[layer], cnr_bcf[layer]);
   }
   
   //Helper methods for biochar decomposition
   
   private double calculateCNR_BCF (int layer)
   {
      double cnr_bc; //Biochar cn ratio for decomposition
      double n_available_cnr; // Potential nitrogen available for bc decomposition?
      
      //bc available N + mineral N in layer
      n_available_cnr = (BiocharC_labile[layer] / biochar_cn) + nh4[layer] - nh4_min[layer] + no3[layer] - no3_min[layer];
      if (n_available_cnr != 0.0)
         cnr_bc = (BiocharC_labile[layer] / n_available_cnr);
      else
         cnr_bc = 0.0;
      
      
      double cnrf_bc = Math.Exp(-cnrf_bc_coeff * (cnr_bc - cnrf_bc_optcn) / cnrf_bc_optcn);
      if (cnrf_bc > 1)
         cnrf_bc = 1;
      if (cnrf_bc < 0)
         cnrf_bc = 0;
      
      return cnrf_bc;
   }
   
   private void calculatePotentialDecomp(int layer, double cnrf_bc, out double pot_hum, out double pot_biom, out double pot_co2, out double pot_tot)
   {
      double pot_labile = BiocharC_labile[layer] * kb1 * Math.Min( Math.Min(wf , tf[layer]) , cnrf_bc);
      double pot_resist = BiocharC_resistant[layer] * kb2 * Math.Min( Math.Min(wf , tf[layer]) , cnrf_bc);
      
      pot_tot = pot_labile + pot_resist;
      dlt_c_min_biochar_pot[layer] = BiocharC_labile[layer] * kb1 + BiocharC_resistant[layer] * kb2;
      total_stress[layer] = Math.Min( Math.Min(wf , tf[layer]) , cnrf_bc);
      pot_co2 = pot_tot * (1 - ef_biochar);
      pot_biom = pot_tot * ef_biochar * fr_biochar_biom;
      pot_hum = pot_tot * ef_biochar * (1 - fr_biochar_biom);
   }
   
   private double calculateScale(int layer, double pot_biom, double pot_hum, double pot_tot)
   {
      double bc_n_min_tot = pot_tot / biochar_cn;
      double n_demand = (pot_biom / biom_cn) + (pot_hum / soil_cn);
      //Calculate n available from mineral n
      double n_avail = nh4[layer] - nh4_min[layer] + no3[layer] - no3_min[layer] + bc_n_min_tot;
      
      double scale_of;
      
      if (n_demand > n_avail)
      {
         scale_of = (nit_tot[layer] / (n_demand - bc_n_min_tot));
         if (scale_of > 1)
            scale_of = 1;
         
      }
      else
         scale_of = 1;
      
      return scale_of;
      
   }
   
   //Performs the actual decomposition of biochar, based off of the limitations the potential runs into
   private double calculateActualDecomp(int layer, double scale_of, double cnrf_bc)
   {
      double decomp1 = BiocharC_labile[layer] * kb1 * Math.Min( Math.Min(wf , tf[layer]) , cnrf_bc) * scale_of;
      BiocharC_labile[layer] -= decomp1;
      double decomp2 = BiocharC_resistant[layer] * kb2 * Math.Min( Math.Min(wf , tf[layer]) , cnrf_bc) * scale_of;
      BiocharC_resistant[layer] -= decomp2;
      if (BiocharC_labile[layer] < 0)
         BiocharC_labile[layer] = 0;
      if (BiocharC_resistant[layer] < 0)
         BiocharC_resistant[layer] = 0;
      
      
      BiocharC[layer] = BiocharC_labile[layer] + BiocharC_resistant[layer]; //Remove decomposed ammount from biochar pool
      
      updateSoilBCTotals(layer);
      return decomp1 + decomp2;
   }
   
   //End of decomposition helper methods
   
   //Computes the changes in co2, biom c and humic c due to a change in biochar c
   
   //Step 3 section
   
   private void computeDLTs(out double dlt_c_biochar_biom, out double dlt_c_biochar_hum, out double dlt_c_biochar_co2, double dlt_c_min_biochar)
   {
      dlt_c_biochar_co2 = dlt_c_min_biochar * (1 - ef_biochar);
      dlt_c_biochar_biom = dlt_c_min_biochar * ef_biochar * fr_biochar_biom;
      dlt_c_biochar_hum = dlt_c_min_biochar * ef_biochar * (1 - fr_biochar_biom);
      
      
   }
   
   
   
   //Step 4 section 
   
   private double getNDemand(double dlt_c_biochar_biom, double dlt_c_biochar_hum)
   {
      return (dlt_c_biochar_biom / biom_cn) + (dlt_c_biochar_hum / soil_cn);  // this biochar n demand, n_demand_bc
   }
   
   private double computeNFromDecomp(double dlt_c_min_biochar) 
   {
      return (dlt_c_min_biochar / biochar_cn); // this is n released during biochar decomposition, n_avail_bc
   }
   
   
   
   //Step 5 happens within the apsim model itself 
   
   //Step 6 
   private void get_rd_factors(out double rd_hum_fac, out double rd_biom_fac, out double rd_carb_fac,
      out double rd_cell_fac, out double rd_lign_fac, out double rd_ef_fac, out double rd_fr_fac, out double rd_ef_fom_fac,
      out double rd_fr_fom_fac, int layer)
   {
      
         rd_hum_fac = (prim_hum * BiocharC_total / 10000);
         rd_biom_fac = (prim_biom * BiocharC_total / 10000);
         rd_carb_fac = (prim_carb * BiocharC_total / 10000);
         rd_cell_fac = (prim_cell * BiocharC_total / 10000);
         rd_lign_fac = (prim_lign * BiocharC_total / 10000);
         rd_ef_fac = (prim_ef * BiocharC_total / 10000);
         rd_fr_fac = (prim_fr * BiocharC_total / 10000);
         rd_ef_fom_fac = (prim_ef_fom * BiocharC_total / 10000);
         rd_fr_fom_fac = (prim_fr_fom * BiocharC_total / 10000);
         
         
         
      
   }
   
   //Step 7 big work here pretty sure does not matter ppm or kg/ha since both related by constant
   
   private double get_NH4_changes(int layer)
   {
      if (BiocharC[layer] > 0.0)
      {
         double cec_ratio = soil_cec[layer] / soil_cec_orig[layer];
         double nh4_absorbed = nh4[layer] * cec_ratio * nh4_adsorption / (1 + cec_ratio * nh4_adsorption);
         double nh4_desorbed = bc_nh4[layer] * cec_ratio * nh4_desorption / (1 + cec_ratio * nh4_desorption);
         double nh4_change = nh4_desorbed - nh4_absorbed;
         bc_nh4[layer] = bc_nh4[layer] - nh4_change;
         return nh4_change;
      }
      else 
         return 0.0;
   }
   
   
   //Step 8
   private double get_new_ph(int layer)
   {
      return compute_ph_equation(soil_cec[layer], ab_val, layer) + compute_bc_limeing(layer);
     
      
      
   }
   
   
   //Step 9 area - Changes to DUL and LL and the like 

   
   private double computeLL(int layer)
   {
      
     
      double dlt_oc = oc[layer] - yesterday_oc[layer];
      
      //double ll15_temp = -0.024 * sand + 0.487 * clay + 0.006 * om + 0.005 * sand * om - 0.013 * clay * om + 0.068 * sand * clay + 0.031;
      //ll15_temp = ll15_temp + 0.14 * ll15_temp - 0.02;
      if (BiocharC[layer] != 0.0)
      {
         return q_ll * (0.0118 + 0.0098 * sand - 0.0255 * clay) * dlt_oc;
      }
      else 
         return 0.0;
      
   }
   
   //Returns a two element array containing values used in computing DUL and bd for a specific layer, as well as in sat
   private double[] computeDULMidway(int layer)
   {
      
      double om;
      //four temporary values needed 
      double temp1, temp2, temp3, temp4;
      
      //Based off of documentation equations
      
     /**
      temp1 = -0.251 * sand + 0.195 * clay + 0.011 * om + 0.006 * sand * om - 0.027 * clay * om + 0.452 * sand * clay + 0.299;//dula
      temp1 = temp1 + (1.283 * temp1 * temp1 - 0.374 * temp1 - 0.015);//dulb
      temp2 = -0.097 * sand + 0.043;//dulc
      temp3 = 0.278 * sand + 0.034 * clay + 0.022 * om - 0.018 * sand * om - 0.027 * clay * om - 0.584 * sand * clay + 0.078;//duld
      temp3 = temp3 + (0.636 * temp3 - 0.107);//dule
      temp4 = temp1 + temp3;//dulf
      temp4 = temp4 + temp2;//dulg
      **/
      
      //Returns return[0] = DULh from documentation, return[1] = DULb from documentation, as both values are needed elsewhere
      return new double[] {0.0, 0.0};
      
      
      
   }
   
   //Computes DUL and BD based off of changes to soil OC due to biochar in that layer
   private void computeDULandBD(out double layer_dul, out double layer_bd, int layer)
   {
      
      
      double dlt_oc = oc[layer] - yesterday_oc[layer];
      
      double q_dul = 1.3067 * Math.Exp(-dul_qual * oc[layer]);
      double q_bd = 1.3067 * Math.Exp(-bd_qual * oc[layer]);
      /**
      midDUL = computeDULMidway(layer);
      BDa = midDUL[0] * df;
      
      gravels = ((BDa / 2.65) * gravelw) / (1 - gravelw * (1 - BDa / 2.65));
      **/
      if (BiocharC[layer] != 0.0)
      {
         layer_bd = q_bd * (-0.2332 + 0.115 * sand + 0.35 * clay) * dlt_oc;
      
         layer_dul = q_dul * (0.0261 + 0.0072 * sand - 0.0561 * clay) * dlt_oc;
      }
      else
      {
         layer_bd = 0.0;
         layer_dul = 0.0;
      }
      
      
      
   }
      
   //Gives the SAT for a given layer based off of the layer's newly computed bulk density
   /**
   private double giveSAT (int layer)
   {
      
      
      
      double dlt_oc = oc[layer] - yesterday_oc[layer];
      if (BiocharC[layer] != 0.0)
      {
         return ( 0.0836 - 0.0412 * sand - 0.1255 * clay)  * dlt_oc;
      }
      else
         return 0.0;
   }
   **/
   
   //deprecated
   private double computeKS(int layer, double layer_sat, double layer_dul, double layer_ll)
   {
      return 0.0;
      
      
   }
   //deprecated
   private double computeSWCON(int layer, double layer_sat, double layer_dul)
   {
      double SWCON = (layer_sat / 0.95 - layer_dul) / (layer_sat / 0.95);
      
      return SWCON;
      
   }
   
   //Gets the current values of various soil water associated variables so we can compute our dlts based off of the difference
   private void getCurrentSoilWatValues()
   {
      
      MyPaddock.Get(soil_name + " Water.dul", out dul);
      MyPaddock.Get(soil_name + " Water.ll15", out ll15);
      MyPaddock.Get(soil_name + " Water.sat", out sat);
      //MyPaddock.Get(soil_name + " Water.bd", out bd);
      MyPaddock.Get(soil_name + " Water.swcon", out swcon); //doesn't work
      MyPaddock.Get(soil_name + " Water.ks", out ks);
   }
   

   //Updates the total amount of soil biochar in the system. We need to make how this is done better, so it is only run once,
   //as it is a O(n) operation being run within a O(n) operation, making our whole daily algorithm O(n^2) when it doesn't 
   //need to be. Done?
   private void updateSoilBCTotals(int layer)
   {
      if (layer == 0)//Zero all values the first time this is called each day
      {
         BiocharC_total = 0;
         BiocharC_labile_total = 0;
         BiocharC_resistant_total = 0;
      }
      BiocharC_total += BiocharC[layer];
      BiocharC_labile_total += BiocharC_labile[layer];
      BiocharC_resistant_total += BiocharC_resistant[layer];
   }
   
   
   //Special method that sums the total BC in the system. Used only during the apply biochar process.
   private void sumSoilBCFirstTime()
   {
      BiocharC_total = 0;
      BiocharC_labile_total = 0;
      BiocharC_resistant_total = 0;
      for (int i = 0; i < dlayer.Length; i++)
      {
         BiocharC_total += BiocharC[i];
         BiocharC_labile_total += BiocharC_labile[i];
         BiocharC_resistant_total += BiocharC_resistant[i];
      }
      
   }
   //For the andales methods of bd
   [EventHandler] void OnTillage(TillageType Till)
   {
      firstTill = true;
      
      rainAmt = 0.0;
      float depth = Till.tillage_depth;
      for (int i = 0; i < oc.Length; i++)
      {
         depth -= (float) dlayer[i];
         till_depth_layer = i;
         if ( depth <= 0)
         {
            break;  
         }
         
      }
   }
   //Method that gives BD computed with the andales equation
   private double[] AndalesBD()
   {
      double[] ret = new double[oc.Length];
      double q_bd; 
      double q_const = 1.3067;
      
      for (int layer = 0; layer < ret.Length; layer++)
      {
         if (oc[layer] < 0.5)
            q_const = 1.8067;
         if (firstTill && layer <= till_depth_layer)
         {
            q_bd = q_const * Math.Exp(-bd_qual * oc[layer]);
            ret[layer] = q_bd * (tillage * initialBD[layer] - initialBD[layer]) * Math.Exp(-(5 * (1 - 0.205 * oc[layer])) * rainAmt * 0.00217);//Based off of Andales equation
            ret[layer] = ret[layer] + initialBD[layer];
            if (ret[layer] < initialBD[layer] - ((1.0 - tillage) * initialBD[layer] * q_bd))//really confusing. basically if it is lower than it could possibly be (the andales equation fails to capture reality for oc > 4.8) 
               ret[layer] = initialBD[layer] - ((1.0 - tillage) * initialBD[layer] * q_bd);// we set it to the lowest possible and regard it as (mostly) constant
         }
         else
            ret[layer] = initialBD[layer];
      }
      
      return ret;
   }
   //Computes the biggest delta associated with bd
   private double[] biggest_bd_dlt(double[] dlt_bd, double[] andales_bd)
   {
      double[] ret = new double[saxon_bd.Length];
      for (int layer = 0; layer < oc.Length; layer++)
      {
         if (Math.Abs(dlt_bd[layer] - initialBD[layer])>= Math.Abs(andales_bd[layer] - initialBD[layer]))
         {
            ret[layer] = dlt_bd[layer];
         }
         else
            ret[layer] = andales_bd[layer];
      }
      
      return ret;
   }
   
   private double[] sat_in_terms_of_dlt(double[] bd_new)
   {
      double[] ret = new double[bd_new.Length];
      if (bd_switch == "on")
      {
         for (int layer = 0; layer < bd_new.Length; layer++)
         {
         
         
            ret[layer] = (-(bd_new[layer] - biochar_bd[layer]) / 2.65) * 0.9;
         
         }
      }
      else//still need SAT estimation if no bd change... (old... maybe unneccessary with new change?? but then bd off is unmeaningful)
      {
         for (int layer = 0; layer < oc.Length; layer++)
         {
            double dlt_oc = oc[layer] - yesterday_oc[layer];
            if (BiocharC[layer] != 0.0)
            {
               ret[layer] = ( 0.0836 - 0.0412 * sand - 0.1255 * clay) * dlt_oc;
            }
            else
               ret[layer] = 0.0;
            
         }
      }
      return ret;
   }
   
   
   //Computes soil CEC on the first day of the simulation to have a constant value for soil CEC
   //Which is later used as a base for when BC is applied (i am not sure if we should maintain pH at all?)
   private double get_soil_CEC(int layer)
   {
      if (soil_order == "Aridisol")
      {
         return Math.Exp(0.042 * Math.Log(oc[layer]) + 0.828 * Math.Log(nclay_portion * clay * 100) + 0.236);
      }
      else if (soil_order == "Entisol")
      {
         return Math.Exp(0.078 * Math.Log(oc[layer]) + 0.873 * Math.Log(nclay_portion * clay * 100) + 0.084);
      }
      else if (soil_order == "Gelisol")
      {
         return Math.Exp(0.359 * Math.Log(oc[layer]) + 0.49 * Math.Log(nclay_portion * clay * 100) + 1.05);
      }
      else if (soil_order == "Inceptisol")
      {
         return Math.Exp(0.134 * Math.Log(oc[layer]) + 0.794 * Math.Log(nclay_portion * clay * 100) + 0.239);
      }
      else if (soil_order == "Mollisol")
      {
         if (oc[layer] < 0.3)
            return Math.Exp(0.932 * Math.Log(nclay_portion * clay * 100) - 0.174);
         else
            return Math.Exp(0.113 * Math.Log(oc[layer]) + 0.786 * Math.Log(nclay_portion * clay * 100) + 0.475);
      }
      else if (soil_order == "Vertisol")
      {
         return Math.Exp(0.059 * Math.Log(oc[layer]) + 0.86 * Math.Log(nclay_portion * clay * 100) + 0.312);
      }
      else if (soil_order == "Histosol")
      {
         return Math.Exp(0.319 * Math.Log(oc[layer]) + 0.497 * Math.Log(nclay_portion * clay * 100) + 1.075);
      }
      else if (soil_order == "Alfisol")
      {
         if (oc[layer] < 0.3)
            return Math.Exp(0.911 * Math.Log(nclay_portion * clay * 100) - 0.308);
         else
            return Math.Exp(0.158 * Math.Log(oc[layer]) + 0.805 * Math.Log(nclay_portion * clay * 100) + 0.216);
      }
      else if (soil_order == "Spodosol")
      {
         return Math.Exp(0.045 * Math.Log(oc[layer]) + 0.798 * Math.Log(nclay_portion * clay * 100) + 0.029);
      }
      else if (soil_order == "Ultisol")
      {
         return Math.Exp(0.184 * Math.Log(oc[layer]) + 0.57 * Math.Log(nclay_portion * clay * 100) + 0.365*Math.Log((1 - clay - sand)*100) - 0.906);       
      }
      else if (soil_order == "Oxisol")
      {
         return 2.738 * oc[layer] + 0.103 * nclay_portion * clay * 100 + 0.123 * (100*(1 - clay - sand)) - 2.531;
      }
      else 
         return 20.0;
      
   }
   //Computes a new biochar adjusted value for soil CEC
   private double get_new_cec(int layer)
   {
      return soil_cec_orig[layer] * (1 - MassComparison[layer]) + bc_cec * MassComparison[layer];
   }
   //Computes a value for soil pH based off of the given values for CEC and acid, using that layer's particular titration curve value
   private double compute_ph_equation(double cec_val, double acid, int layer)
   {
      return (uph - lph) / (1 + titrat_val[layer] * Math.Exp(-acid/cec_val)) + lph;
   }
   //Computes a value that describes the lime effect that biochar has on soils
   private double compute_bc_limeing(int layer)
   {
      double bc_alkaline = MassComparison[layer] * bc_cce;
      return bc_alkaline * (uph - thisPH[layer]) * (thisPH[layer] - lph) * bot_slope / ((uph - lph) * soil_cec[layer]); 
   }
      

//TODO sand clay gravelw into arrays and gotten from simulation
  

}
```
        soybean
        wheat
          ModifyKL = yes  # Modify KL using CL, EC or ESP if found?
          MaxRootDepth = 0  # Maximum rooting depth (mm) 0=no restriction
        operations Operations Schedule
          21/04/1989  surfaceorganicmatter tillage type = user_defined, f_incorp = 0.9, tillage_depth = 110
          01/05/1989  surfaceorganicmatter tillage type = user_defined, f_incorp = 0.5, tillage_depth = 30
          01/05/1989  surfaceorganicmatter tillage type = user_defined, f_incorp = 0.1, tillage_depth = 5
          04/05/1989  maize sow plants = 6, sowing_depth = 50, cultivar = b_80, row_spacing = 762, crop_class = plant
          26/06/1989  fertiliser apply amount = 124 (kg/ha), depth = 50 (mm), type = NO3_N
          25/05/1990  surfaceorganicmatter tillage type = user_defined, f_incorp = 0.9, tillage_depth = 110
          25/05/1990  surfaceorganicmatter tillage type = user_defined, f_incorp = 0.5, tillage_depth = 30
          25/05/1990  surfaceorganicmatter tillage type = user_defined, f_incorp = 0.1, tillage_depth = 5
          25/05/1990  surfaceorganicmatter tillage type = user_defined, f_incorp = 0.1, tillage_depth = 5
          29/05/1990  soybean sow plants = 47, sowing_depth = 50, cultivar = mg_4, row_spacing = 762, crop_class = plant
          25/04/1991  surfaceorganicmatter tillage type = user_defined, f_incorp = 0.9, tillage_depth = 110
          02/05/1991  surfaceorganicmatter tillage type = user_defined, f_incorp = 0.5, tillage_depth = 30
          02/05/1991  surfaceorganicmatter tillage type = user_defined, f_incorp = 0.1, tillage_depth = 5
          15/06/1991  fertiliser apply amount = 124 (kg/ha), depth = 50 (mm), type = NO3_N
          15/06/1991  maize sow plants = 6, sowing_depth = 50, cultivar = b_80, row_spacing = 762, crop_class = plant
          15/05/1992  surfaceorganicmatter tillage type = user_defined, f_incorp = 0.9, tillage_depth = 110
          15/05/1992  surfaceorganicmatter tillage type = user_defined, f_incorp = 0.5, tillage_depth = 30
          18/05/1992  soybean sow plants = 47, sowing_depth = 50, cultivar = mg_4, row_spacing = 762, crop_class = plant
          18/05/1992  surfaceorganicmatter tillage type = user_defined, f_incorp = 0.1, tillage_depth = 5
          28/04/1993  surfaceorganicmatter tillage type = user_defined, f_incorp = 0.9, tillage_depth = 110
          06/05/1993  surfaceorganicmatter tillage type = user_defined, f_incorp = 0.5, tillage_depth = 30
          07/05/1993  maize sow plants = 6, sowing_depth = 50, cultivar = b_80, row_spacing = 762, crop_class = plant
          07/05/1993  surfaceorganicmatter tillage type = user_defined, f_incorp = 0.1, tillage_depth = 5
          01/07/1993  fertiliser apply amount = 84 (kg/ha), depth = 50 (mm), type = NO3_N
          04/05/1994  surfaceorganicmatter tillage type = user_defined, f_incorp = 0.9, tillage_depth = 110
          13/05/1994  surfaceorganicmatter tillage type = user_defined, f_incorp = 0.5, tillage_depth = 30
          16/05/1994  surfaceorganicmatter tillage type = user_defined, f_incorp = 0.1, tillage_depth = 5
          16/05/1994  surfaceorganicmatter tillage type = user_defined, f_incorp = 0.1, tillage_depth = 5
          18/05/1994  soybean sow plants = 49, sowing_depth = 50, cultivar = mg_4, row_spacing = 762, crop_class = plant
          07/06/1994  surfaceorganicmatter tillage type = user_defined, f_incorp = 0.5, tillage_depth = 30
          12/10/1994  surfaceorganicmatter tillage type = user_defined, f_incorp = 0.5, tillage_depth = 30
          13/10/1994  wheat sow plants = 445, sowing_depth = 50, cultivar = avalon, row_spacing = 178, crop_class = plant
          17/04/1995  fertiliser apply amount = 56 (kg/ha), depth = 50 (mm), type = NO3_N
          18/04/1996  surfaceorganicmatter tillage type = user_defined, f_incorp = 0.9, tillage_depth = 110
          06/05/1996  surfaceorganicmatter tillage type = user_defined, f_incorp = 0.5, tillage_depth = 30
          14/05/1996  fertiliser apply amount = 27 (kg/ha), depth = 50 (mm), type = NO3_N
          14/05/1996  fertiliser apply amount = 28 (kg/ha), depth = 50 (mm), type = NO3_N
          14/05/1996  maize sow plants = 6, sowing_depth = 50, cultivar = b_80, row_spacing = 762, crop_class = plant
          14/05/1996  surfaceorganicmatter tillage type = user_defined, f_incorp = 0.1, tillage_depth = 5
          27/06/1996  fertiliser apply amount = 134 (kg/ha), depth = 50 (mm), type = NO3_N
          09/04/1997  fertiliser apply amount = 393 (kg/ha), depth = 50 (mm), type = Calcite_CA
          10/04/1997  fertiliser apply amount = 45 (kg/ha), depth = 50 (mm), type = Rock_P
          11/05/1997  surfaceorganicmatter tillage type = user_defined, f_incorp = 0.9, tillage_depth = 110
          13/05/1997  surfaceorganicmatter tillage type = user_defined, f_incorp = 0.5, tillage_depth = 30
          22/05/1997  soybean sow plants = 47, sowing_depth = 50, cultivar = mg_4, row_spacing = 762, crop_class = plant
          22/10/1997  wheat sow plants = 445, sowing_depth = 50, cultivar = avalon, row_spacing = 178, crop_class = plant
          22/10/1997  surfaceorganicmatter tillage type = user_defined, f_incorp = 0.1, tillage_depth = 5
          22/10/1997  surfaceorganicmatter tillage type = user_defined, f_incorp = 0.1, tillage_depth = 5
          20/04/1998  fertiliser apply amount = 56 (kg/ha), depth = 50 (mm), type = NO3_N
          20/04/1999  fertiliser apply amount = 1123 (kg/ha), depth = 50 (mm), type = Calcite_CA
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          25/05/2000  soybean sow plants = 52, sowing_depth = 50, cultivar = mg_4, row_spacing = 762, crop_class = plant
          20/10/2000  fertiliser apply amount = 2470 (kg/ha), depth = 50 (mm), type = Calcite_CA
          30/10/2000  wheat sow plants = 466, sowing_depth = 50, cultivar = avalon, row_spacing = 178, crop_class = plant
          05/04/2001  fertiliser apply amount = 40 (kg/ha), depth = 50 (mm), type = NO3_N
          24/08/2001  fertiliser apply amount = 3 (kg/ha), depth = 50 (mm), type = NO3_N
          10/05/2002  fertiliser apply amount = 11 (kg/ha), depth = 50 (mm), type = Rock_P
          10/05/2002  maize sow plants = 7, sowing_depth = 50, cultivar = b_80, row_spacing = 762, crop_class = plant
          26/04/2003  fertiliser apply amount = 7 (kg/ha), depth = 50 (mm), type = NO3_N
          26/04/2003  fertiliser apply amount = 14 (kg/ha), depth = 50 (mm), type = Rock_P
          28/05/2003  soybean sow plants = 44, sowing_depth = 50, cultivar = mg_4, row_spacing = 762, crop_class = plant
          08/10/2003  fertiliser apply amount = 36 (kg/ha), depth = 50 (mm), type = NO3_N
          08/10/2003  fertiliser apply amount = 16 (kg/ha), depth = 50 (mm), type = Rock_P
          10/10/2003  wheat sow plants = 494, sowing_depth = 50, cultivar = avalon, row_spacing = 178, crop_class = plant
          16/04/2004  fertiliser apply amount = 54 (kg/ha), depth = 50 (mm), type = NO3_N
          04/05/2005  fertiliser apply amount = 33 (kg/ha), depth = 50 (mm), type = NO3_N
          04/05/2005  fertiliser apply amount = 13 (kg/ha), depth = 50 (mm), type = Rock_P
          30/03/2007  fertiliser apply amount = 32 (kg/ha), depth = 50 (mm), type = NO3_N
          22/09/2007  fertiliser apply amount = 1 (kg/ha), depth = 50 (mm), type = NO3_N
          19/06/2008  fertiliser apply amount = 114 (kg/ha), depth = 50 (mm), type = NO3_N
          06/11/2009  wheat sow plants = 477, sowing_depth = 50, cultivar = avalon, row_spacing = 178, crop_class = plant
          21/04/2010  fertiliser apply amount = 50 (kg/ha), depth = 50 (mm), type = NO3_N
          29/04/2010  fertiliser apply amount = 37 (kg/ha), depth = 50 (mm), type = NO3_N
          09/05/2011  maize sow plants = 8, sowing_depth = 50, cultivar = b_80, row_spacing = 762, crop_class = plant
          11/04/2012  fertiliser apply amount = 0 (kg/ha), depth = 50 (mm), type = Calcite_CA
          19/04/2012  fertiliser apply amount = 8 (kg/ha), depth = 50 (mm), type = NO3_N
          19/04/2012  fertiliser apply amount = 17 (kg/ha), depth = 50 (mm), type = Rock_P
          02/05/2013  fertiliser apply amount = 91 (kg/ha), depth = 50 (mm), type = NO3_N
          14/04/2015  fertiliser apply amount = 10 (kg/ha), depth = 50 (mm), type = NO3_N
          14/04/2015  fertiliser apply amount = 26 (kg/ha), depth = 50 (mm), type = Rock_P
          06/10/2015  wheat sow plants = 371, sowing_depth = 50, cultivar = avalon, row_spacing = 178, crop_class = plant
          21/03/2016  fertiliser apply amount = 34 (kg/ha), depth = 50 (mm), type = NO3_N
          05/04/2016  fertiliser apply amount = 24 (kg/ha), depth = 50 (mm), type = NO3_N
          05/04/2016  fertiliser apply amount = 50 (kg/ha), depth = 50 (mm), type = Rock_P
          24/04/2016  fertiliser apply amount = 9 (kg/ha), depth = 50 (mm), type = NO3_N
          24/04/2016  fertiliser apply amount = 8 (kg/ha), depth = 50 (mm), type = Rock_P
          21/06/2017  fertiliser apply amount = 138 (kg/ha), depth = 50 (mm), type = NO3_N
          27/05/2018  soybean sow plants = 35, sowing_depth = 50, cultivar = mg_4, row_spacing = 762, crop_class = plant
          19/10/2018  wheat sow plants = 485, sowing_depth = 50, cultivar = avalon, row_spacing = 178, crop_class = plant
          13/05/2020  fertiliser apply amount = 34 (kg/ha), depth = 50 (mm), type = Rock_P
          10/05/2021  fertiliser apply amount = 11 (kg/ha), depth = 50 (mm), type = NO3_N
          10/05/2021  fertiliser apply amount = 28 (kg/ha), depth = 50 (mm), type = Rock_P
          14/05/2021  soybean sow plants = 37, sowing_depth = 50, cultivar = mg_4, row_spacing = 762, crop_class = plant
          09/11/2021  wheat sow plants = 519, sowing_depth = 50, cultivar = avalon, row_spacing = 178, crop_class = plant
          12/08/2021  biochar5v3 tillage  type = user_defined, f_incorp = 1.0, tillage_depth = 300
    simulation scen_1_621 -> /simulations/KBS/scen_1_611
      area paddock -> /simulations/KBS/scen_1_611/paddock
        folder Manager folder -> /simulations/KBS/scen_1_611/paddock/Manager folder
          manager Harvesting rule2: same as KBS.scen_1_611.paddock.Manager folder.Harvesting rule2
          manager Remove residues at harvest: same as KBS.scen_1_611.paddock.Manager folder.Remove residues at harvest
          manager Remove residues at harvest1: same as KBS.scen_1_611.paddock.Manager folder.Remove residues at harvest1
          manager Remove residues at harvest2: same as KBS.scen_1_611.paddock.Manager folder.Remove residues at harvest2
        manager Script
          on start_of_day:
```
! average values
 soil_res = dlt_res_c_atm + dlt_biom_c_atm(1) + dlt_fom_c_atm(1) + dlt_hum_c_atm(1) + dlt_biom_c_atm(2) + dlt_fom_c_atm(2) + dlt_hum_c_atm(2)
 soil_bio_res = soil_res + dlt_c_biochar_co2(1) + dlt_c_biochar_co2(2)

 AvgT = (MaxT + MinT)/2
 pawc_new1 = dul(1) - ll15(1)
 pawc_new2 = dul(2) - ll15(2)
 pawc_new3 = dul(3) - ll15(3)
 wfps_new1 = (sw(1) / sat(1)) * (1.0 - wfps_factor)
 wfps_new2 = (sw(2) / sat(2)) * (1.0 - wfps_factor)
 

 pawc_20 = pawc_new1 + pawc_new2
 oc_15 = oc(1)*10/15 + oc(2)*5/15
 pH_15 = ph(1)*10/15 + ph(2)*5/15

 n2o_20 = n2o_atm(1) + n2o_atm(2)

 net_n_20 = dlt_n_min_tot(1) + dlt_n_min_tot(2)


 pawc_new11 = dul_dep(1) - ll15_dep(1)
 pawc_new22 = dul_dep(2) - ll15_dep(2)
 pawc_202 = pawc_new11 + pawc_new22

oc_20kg = biom_c(1) + hum_c(1) + BiocharC(1) + biom_c(2) + hum_c(2) + BiocharC(2)
corn_yield15 = maize.yield/0.85
```
        outputfile -> /simulations/KBS/scen_1_611/paddock/outputfile: filename=scen_1_621.out; title=scen_1_621
          events Reporting Frequency -> /simulations/KBS/scen_1_611/paddock/outputfile/Reporting Frequency
          variables -> /simulations/KBS/scen_1_611/paddock/outputfile/Variables
        manager2 biochar5v3
          date_of_application = 08/12/2021  # Date of biochar application (mm/dd/yyyy)
          biochar_added = 38300  # amount of biochar applied (kg/ha)
          frac_c_biochar = 0.78  # fraction carbon in biochar (0-1)
          biochar_loss = 0.02  # fraction of biochar lost during application (0-1)
          MRT1 = 1  # mean residence time for labile biochar pool (years)
          MRT2 = 500  # mean residence time for resistant biochar pool (years)
          frac_labile = 0.13  # biochar labile fraction (0-1)
          ef_biochar = 0.4  # fraction of decomposed biochar that goes to OC pools (0-1) (biochar efficiency)
          fr_biochar_biom = 0.05  # fraction of decomposed biochar that goes to biom (0-1)
          biochar_cn = 281  # biochar CN ratio
          sand = 0.416  # sand (0-1)
          clay = 0.21  # clay (0-1)
          prim_biom = 0  # priming coefficient for biom pool (-1 to 1) use 0.05
          prim_hum = 0  # priming coefficient for hum pool (-1 to 1) use 0.05
          prim_cell = 0  # priming coefficient for cell pool (-1 to 1) use 0.08
          prim_carb = 0  # priming coefficient for carb pool (-1 to 1) use 0.08
          prim_lign = 0  # priming coefficient for lign pool (-1 to 1) use 0.08
          prim_ef = 0  # negative priming coefficient for internal C partitioning (use 0.1 for 20 Mg), biom
          prim_fr = 0  # negative priming coefficient for internal C partioning (use -0.1), biom
          prim_ef_fom = 0  # negative priming for internal C partitioning (use 0.1 for 20 mg),fom
          prim_fr_fom = 0  # negative priming for internal C partitioning (use -0.1 for 20 mg), fom
          biom_cn = 8  # C/N ratio of biom pool
          soil_cn = 12  # C/N ratio of soil stuff
          incorp_depth = 300  # Biochar incorporation depth (mm)
          dul_qual = 0.15  # Slope of dul quality equation (default 0.33)
          bd_qual = 0.15  # Slope of bd quality equation (default 0.33)
          bc_cce = 50  # Biochar LV (cmol/kg?)
          bc_cec = 187  # Biochar ECEC (cmol/kg)
          cnrf_bc_coeff = 0.693  # Biochar cnrf coefficient (0-1)
          cnrf_bc_optcn = 25  # Optimum cn ratio for bc
          bc_wfps_factor = 1  # Biochar WFPS factor (0-1)
          nh4_adsorption = 0.006  # Biochar nh4 absorption coefficient (Langmuir)
          nh4_desorption = 0.006  # Biochar nh4 desorption coefficient (Langmuir)
          # Tillage info
          tillage = 0.80  # % BD reduction due to tillage
          # Soil information
          soil_name = Loam  # Name of the soil as it appears in the simulation tree. This being wrong causes object reference errors.
          soil_order = Alfisol  # Order of the soil
          nclay_portion = 0.95  # Portion of soil clay that is nclay (0-1)
          uph = 9.3  # Soil upper ph
          lph = 3.5  # Soil lower ph
          ab_val = 0  # Acid - Base value
          bot_slope = 10  # Unit conversion for titration curve (use 10)
          # Switches for various biochar components (development purposes)
          decomp_switch = on  # Priming effects? (on/off)
          nitrification_switch = on  # Nitrification effects? (on/off)
          ph_switch = on  # PH effects ? (on/off)
          ll_switch = on  # LL and CLL effects? (on/off)
          dul_switch = on  # DUL effects ? (on/off)
          xf_switch = off  # XF effects? (on/off)
          kl_switch = off  # KL effects? (on/off)
          bd_switch = on  # BD effects? (on/off) (under development)
          biochar_c_switch = on  # Biochar module (on/off)
          swcon_switch = off  # SWCOM effects (on/off)
          ks_switch = off  # Ksat effects ? (on/off)
          sat_switch = on  # SAT effects? (on/off)
          script: same as in KBS.scen_1_611.paddock.biochar5v3
        wheat
          ModifyKL = yes  # Modify KL using CL, EC or ESP if found?
          MaxRootDepth = 0  # Maximum rooting depth (mm) 0=no restriction
        operations Operations Schedule: same as KBS.scen_1_611.paddock.Operations Schedule
    simulation scen_1_631 -> /simulations/KBS/scen_1_611
      area paddock -> /simulations/KBS/scen_1_611/paddock
        folder Manager folder -> /simulations/KBS/scen_1_611/paddock/Manager folder
          manager Harvesting rule2: same as KBS.scen_1_611.paddock.Manager folder.Harvesting rule2
          manager Remove residues at harvest: same as KBS.scen_1_611.paddock.Manager folder.Remove residues at harvest
          manager Remove residues at harvest1: same as KBS.scen_1_611.paddock.Manager folder.Remove residues at harvest1
          manager Remove residues at harvest2: same as KBS.scen_1_611.paddock.Manager folder.Remove residues at harvest2
        manager Script: same as KBS.scen_1_621.paddock.Script
        outputfile -> /simulations/KBS/scen_1_611/paddock/outputfile: filename=scen_1_631.out; title=scen_1_631
          events Reporting Frequency -> /simulations/KBS/scen_1_611/paddock/outputfile/Reporting Frequency
          variables -> /simulations/KBS/scen_1_611/paddock/outputfile/Variables
        manager2 biochar5v3
          date_of_application = 08/12/2021  # Date of biochar application (mm/dd/yyyy)
          biochar_added = 57000  # amount of biochar applied (kg/ha)
          frac_c_biochar = 0.78  # fraction carbon in biochar (0-1)
          biochar_loss = 0.02  # fraction of biochar lost during application (0-1)
          MRT1 = 1  # mean residence time for labile biochar pool (years)
          MRT2 = 500  # mean residence time for resistant biochar pool (years)
          frac_labile = 0.13  # biochar labile fraction (0-1)
          ef_biochar = 0.4  # fraction of decomposed biochar that goes to OC pools (0-1) (biochar efficiency)
          fr_biochar_biom = 0.05  # fraction of decomposed biochar that goes to biom (0-1)
          biochar_cn = 281  # biochar CN ratio
          sand = 0.416  # sand (0-1)
          clay = 0.21  # clay (0-1)
          prim_biom = 0  # priming coefficient for biom pool (-1 to 1) use 0.05
          prim_hum = 0  # priming coefficient for hum pool (-1 to 1) use 0.05
          prim_cell = 0  # priming coefficient for cell pool (-1 to 1) use 0.08
          prim_carb = 0  # priming coefficient for carb pool (-1 to 1) use 0.08
          prim_lign = 0  # priming coefficient for lign pool (-1 to 1) use 0.08
          prim_ef = 0  # negative priming coefficient for internal C partitioning (use 0.1 for 20 Mg), biom
          prim_fr = 0  # negative priming coefficient for internal C partioning (use -0.1), biom
          prim_ef_fom = 0  # negative priming for internal C partitioning (use 0.1 for 20 mg),fom
          prim_fr_fom = 0  # negative priming for internal C partitioning (use -0.1 for 20 mg), fom
          biom_cn = 8  # C/N ratio of biom pool
          soil_cn = 12  # C/N ratio of soil stuff
          incorp_depth = 300  # Biochar incorporation depth (mm)
          dul_qual = 0.15  # Slope of dul quality equation (default 0.33)
          bd_qual = 0.15  # Slope of bd quality equation (default 0.33)
          bc_cce = 50  # Biochar LV (cmol/kg?)
          bc_cec = 187  # Biochar ECEC (cmol/kg)
          cnrf_bc_coeff = 0.693  # Biochar cnrf coefficient (0-1)
          cnrf_bc_optcn = 25  # Optimum cn ratio for bc
          bc_wfps_factor = 1  # Biochar WFPS factor (0-1)
          nh4_adsorption = 0.006  # Biochar nh4 absorption coefficient (Langmuir)
          nh4_desorption = 0.006  # Biochar nh4 desorption coefficient (Langmuir)
          # Tillage info
          tillage = 0.80  # % BD reduction due to tillage
          # Soil information
          soil_name = Loam  # Name of the soil as it appears in the simulation tree. This being wrong causes object reference errors.
          soil_order = Alfisol  # Order of the soil
          nclay_portion = 0.95  # Portion of soil clay that is nclay (0-1)
          uph = 9.3  # Soil upper ph
          lph = 3.5  # Soil lower ph
          ab_val = 0  # Acid - Base value
          bot_slope = 10  # Unit conversion for titration curve (use 10)
          # Switches for various biochar components (development purposes)
          decomp_switch = on  # Priming effects? (on/off)
          nitrification_switch = on  # Nitrification effects? (on/off)
          ph_switch = on  # PH effects ? (on/off)
          ll_switch = on  # LL and CLL effects? (on/off)
          dul_switch = on  # DUL effects ? (on/off)
          xf_switch = off  # XF effects? (on/off)
          kl_switch = off  # KL effects? (on/off)
          bd_switch = on  # BD effects? (on/off) (under development)
          biochar_c_switch = on  # Biochar module (on/off)
          swcon_switch = off  # SWCOM effects (on/off)
          ks_switch = off  # Ksat effects ? (on/off)
          sat_switch = on  # SAT effects? (on/off)
          script: same as in KBS.scen_1_611.paddock.biochar5v3
        wheat
          ModifyKL = yes  # Modify KL using CL, EC or ESP if found?
          MaxRootDepth = 0  # Maximum rooting depth (mm) 0=no restriction
        operations Operations Schedule: same as KBS.scen_1_611.paddock.Operations Schedule
    simulation scen_1_641 -> /simulations/KBS/scen_1_611
      area paddock -> /simulations/KBS/scen_1_611/paddock
        folder Manager folder -> /simulations/KBS/scen_1_611/paddock/Manager folder
          manager Harvesting rule2: same as KBS.scen_1_611.paddock.Manager folder.Harvesting rule2
          manager Remove residues at harvest: same as KBS.scen_1_611.paddock.Manager folder.Remove residues at harvest
          manager Remove residues at harvest1: same as KBS.scen_1_611.paddock.Manager folder.Remove residues at harvest1
          manager Remove residues at harvest2: same as KBS.scen_1_611.paddock.Manager folder.Remove residues at harvest2
        manager Script: same as KBS.scen_1_621.paddock.Script
        outputfile -> /simulations/KBS/scen_1_611/paddock/outputfile: filename=scen_1_641.out; title=scen_1_641
          events Reporting Frequency -> /simulations/KBS/scen_1_611/paddock/outputfile/Reporting Frequency
          variables -> /simulations/KBS/scen_1_611/paddock/outputfile/Variables
        manager2 biochar5v3
          date_of_application = 08/12/2021  # Date of biochar application (mm/dd/yyyy)
          biochar_added = 76000  # amount of biochar applied (kg/ha)
          frac_c_biochar = 0.78  # fraction carbon in biochar (0-1)
          biochar_loss = 0.035  # fraction of biochar lost during application (0-1)
          MRT1 = 1  # mean residence time for labile biochar pool (years)
          MRT2 = 500  # mean residence time for resistant biochar pool (years)
          frac_labile = 0.13  # biochar labile fraction (0-1)
          ef_biochar = 0.4  # fraction of decomposed biochar that goes to OC pools (0-1) (biochar efficiency)
          fr_biochar_biom = 0.05  # fraction of decomposed biochar that goes to biom (0-1)
          biochar_cn = 281  # biochar CN ratio
          sand = 0.416  # sand (0-1)
          clay = 0.21  # clay (0-1)
          prim_biom = 0  # priming coefficient for biom pool (-1 to 1) use 0.05
          prim_hum = 0  # priming coefficient for hum pool (-1 to 1) use 0.05
          prim_cell = 0  # priming coefficient for cell pool (-1 to 1) use 0.08
          prim_carb = 0  # priming coefficient for carb pool (-1 to 1) use 0.08
          prim_lign = 0  # priming coefficient for lign pool (-1 to 1) use 0.08
          prim_ef = 0  # negative priming coefficient for internal C partitioning (use 0.1 for 20 Mg), biom
          prim_fr = 0  # negative priming coefficient for internal C partioning (use -0.1), biom
          prim_ef_fom = 0  # negative priming for internal C partitioning (use 0.1 for 20 mg),fom
          prim_fr_fom = 0  # negative priming for internal C partitioning (use -0.1 for 20 mg), fom
          biom_cn = 8  # C/N ratio of biom pool
          soil_cn = 12  # C/N ratio of soil stuff
          incorp_depth = 300  # Biochar incorporation depth (mm)
          dul_qual = 0.15  # Slope of dul quality equation (default 0.33)
          bd_qual = 0.15  # Slope of bd quality equation (default 0.33)
          bc_cce = 50  # Biochar LV (cmol/kg?)
          bc_cec = 187  # Biochar ECEC (cmol/kg)
          cnrf_bc_coeff = 0.693  # Biochar cnrf coefficient (0-1)
          cnrf_bc_optcn = 25  # Optimum cn ratio for bc
          bc_wfps_factor = 1  # Biochar WFPS factor (0-1)
          nh4_adsorption = 0.006  # Biochar nh4 absorption coefficient (Langmuir)
          nh4_desorption = 0.006  # Biochar nh4 desorption coefficient (Langmuir)
          # Tillage info
          tillage = 0.80  # % BD reduction due to tillage
          # Soil information
          soil_name = Loam  # Name of the soil as it appears in the simulation tree. This being wrong causes object reference errors.
          soil_order = Alfisol  # Order of the soil
          nclay_portion = 0.95  # Portion of soil clay that is nclay (0-1)
          uph = 9.3  # Soil upper ph
          lph = 3.5  # Soil lower ph
          ab_val = 0  # Acid - Base value
          bot_slope = 10  # Unit conversion for titration curve (use 10)
          # Switches for various biochar components (development purposes)
          decomp_switch = on  # Priming effects? (on/off)
          nitrification_switch = on  # Nitrification effects? (on/off)
          ph_switch = on  # PH effects ? (on/off)
          ll_switch = on  # LL and CLL effects? (on/off)
          dul_switch = on  # DUL effects ? (on/off)
          xf_switch = off  # XF effects? (on/off)
          kl_switch = off  # KL effects? (on/off)
          bd_switch = on  # BD effects? (on/off) (under development)
          biochar_c_switch = on  # Biochar module (on/off)
          swcon_switch = off  # SWCOM effects (on/off)
          ks_switch = off  # Ksat effects ? (on/off)
          sat_switch = on  # SAT effects? (on/off)
          script: same as in KBS.scen_1_611.paddock.biochar5v3
        wheat
          ModifyKL = yes  # Modify KL using CL, EC or ESP if found?
          MaxRootDepth = 0  # Maximum rooting depth (mm) 0=no restriction
        operations Operations Schedule: same as KBS.scen_1_611.paddock.Operations Schedule
    simulation scen_1_651 -> /simulations/KBS/scen_1_611
      area paddock -> /simulations/KBS/scen_1_611/paddock
        folder Manager folder -> /simulations/KBS/scen_1_611/paddock/Manager folder
          manager Harvesting rule2: same as KBS.scen_1_611.paddock.Manager folder.Harvesting rule2
          manager Remove residues at harvest: same as KBS.scen_1_611.paddock.Manager folder.Remove residues at harvest
          manager Remove residues at harvest1: same as KBS.scen_1_611.paddock.Manager folder.Remove residues at harvest1
          manager Remove residues at harvest2: same as KBS.scen_1_611.paddock.Manager folder.Remove residues at harvest2
        manager Script: same as KBS.scen_1_621.paddock.Script
        outputfile -> /simulations/KBS/scen_1_611/paddock/outputfile: filename=scen_1_651.out; title=scen_1_651
          events Reporting Frequency -> /simulations/KBS/scen_1_611/paddock/outputfile/Reporting Frequency
          variables -> /simulations/KBS/scen_1_611/paddock/outputfile/Variables
        manager2 biochar5v3
          date_of_application = 08/12/2021  # Date of biochar application (mm/dd/yyyy)
          biochar_added = 96000  # amount of biochar applied (kg/ha)
          frac_c_biochar = 0.78  # fraction carbon in biochar (0-1)
          biochar_loss = 0.05  # fraction of biochar lost during application (0-1)
          MRT1 = 1  # mean residence time for labile biochar pool (years)
          MRT2 = 500  # mean residence time for resistant biochar pool (years)
          frac_labile = 0.13  # biochar labile fraction (0-1)
          ef_biochar = 0.4  # fraction of decomposed biochar that goes to OC pools (0-1) (biochar efficiency)
          fr_biochar_biom = 0.05  # fraction of decomposed biochar that goes to biom (0-1)
          biochar_cn = 281  # biochar CN ratio
          sand = 0.416  # sand (0-1)
          clay = 0.21  # clay (0-1)
          prim_biom = 0  # priming coefficient for biom pool (-1 to 1) use 0.05
          prim_hum = 0  # priming coefficient for hum pool (-1 to 1) use 0.05
          prim_cell = 0  # priming coefficient for cell pool (-1 to 1) use 0.08
          prim_carb = 0  # priming coefficient for carb pool (-1 to 1) use 0.08
          prim_lign = 0  # priming coefficient for lign pool (-1 to 1) use 0.08
          prim_ef = 0  # negative priming coefficient for internal C partitioning (use 0.1 for 20 Mg), biom
          prim_fr = 0  # negative priming coefficient for internal C partioning (use -0.1), biom
          prim_ef_fom = 0  # negative priming for internal C partitioning (use 0.1 for 20 mg),fom
          prim_fr_fom = 0  # negative priming for internal C partitioning (use -0.1 for 20 mg), fom
          biom_cn = 8  # C/N ratio of biom pool
          soil_cn = 12  # C/N ratio of soil stuff
          incorp_depth = 300  # Biochar incorporation depth (mm)
          dul_qual = 0.15  # Slope of dul quality equation (default 0.33)
          bd_qual = 0.15  # Slope of bd quality equation (default 0.33)
          bc_cce = 50  # Biochar LV (cmol/kg?)
          bc_cec = 187  # Biochar ECEC (cmol/kg)
          cnrf_bc_coeff = 0.693  # Biochar cnrf coefficient (0-1)
          cnrf_bc_optcn = 25  # Optimum cn ratio for bc
          bc_wfps_factor = 1  # Biochar WFPS factor (0-1)
          nh4_adsorption = 0.006  # Biochar nh4 absorption coefficient (Langmuir)
          nh4_desorption = 0.006  # Biochar nh4 desorption coefficient (Langmuir)
          # Tillage info
          tillage = 0.80  # % BD reduction due to tillage
          # Soil information
          soil_name = Loam  # Name of the soil as it appears in the simulation tree. This being wrong causes object reference errors.
          soil_order = Alfisol  # Order of the soil
          nclay_portion = 0.95  # Portion of soil clay that is nclay (0-1)
          uph = 9.3  # Soil upper ph
          lph = 3.5  # Soil lower ph
          ab_val = 0  # Acid - Base value
          bot_slope = 10  # Unit conversion for titration curve (use 10)
          # Switches for various biochar components (development purposes)
          decomp_switch = on  # Priming effects? (on/off)
          nitrification_switch = on  # Nitrification effects? (on/off)
          ph_switch = on  # PH effects ? (on/off)
          ll_switch = on  # LL and CLL effects? (on/off)
          dul_switch = on  # DUL effects ? (on/off)
          xf_switch = off  # XF effects? (on/off)
          kl_switch = off  # KL effects? (on/off)
          bd_switch = on  # BD effects? (on/off) (under development)
          biochar_c_switch = on  # Biochar module (on/off)
          swcon_switch = off  # SWCOM effects (on/off)
          ks_switch = off  # Ksat effects ? (on/off)
          sat_switch = on  # SAT effects? (on/off)
          script: same as in KBS.scen_1_611.paddock.biochar5v3
        wheat
          ModifyKL = yes  # Modify KL using CL, EC or ESP if found?
          MaxRootDepth = 0  # Maximum rooting depth (mm) 0=no restriction
        operations Operations Schedule: same as KBS.scen_1_611.paddock.Operations Schedule
    simulation scen_1_612
      metfile met: filename=basic_wth_1.met
      clock
        start_date = 01/01/1989  # Enter the start date of the simulation
        end_date = 31/12/2099  # Enter the end date of the simulation
      summaryfile
      area paddock
        surfaceom SurfaceOrganicMatter
          PoolName = soybean  # Organic Matter pool name
          type = soybean  # Organic Matter type
          mass = 1000  # Initial surface residue (kg/ha)
          cnr = 27  # C:N ratio of initial residue
          standing_fraction = 0  # Fraction of residue standing
        fertiliser
        maize
        Soil Loam: same as KBS.scen_1_611.paddock.Loam
        folder Manager folder: same as KBS.scen_1_611.paddock.Manager folder
        outputfile: filename=scen_1_612.out; title=scen_1_612
          events Reporting Frequency: event=daily
          variables
            variable:
              dd/mm/yyyy as Date
              bd(1)
              yield
              sw(1)
              st(1)
              biomass
              stover
              dul(1)
              sat(1)
              ph(1)
              n2o_atm_denitrification(1-5) format 8 as n2o_bylayer_kgha
              oc(1-5) format 8 as oc_bylayer_kgha
        manager2 biochar5v3
          date_of_application = 08/12/2021  # Date of biochar application (mm/dd/yyyy)
          biochar_added = 19200  # amount of biochar applied (kg/ha)
          frac_c_biochar = .72  # fraction carbon in biochar (0-1)
          biochar_loss = 0.02  # fraction of biochar lost during application (0-1)
          MRT1 = 1  # mean residence time for labile biochar pool (years)
          MRT2 = 500  # mean residence time for resistant biochar pool (years)
          frac_labile = 0.13  # biochar labile fraction (0-1)
          ef_biochar = 0.4  # fraction of decomposed biochar that goes to OC pools (0-1) (biochar efficiency)
          fr_biochar_biom = 0.05  # fraction of decomposed biochar that goes to biom (0-1)
          biochar_cn = 207  # biochar CN ratio
          sand = .416  # sand (0-1)
          clay = .21  # clay (0-1)
          prim_biom = 0  # priming coefficient for biom pool (-1 to 1) use 0.05
          prim_hum = 0  # priming coefficient for hum pool (-1 to 1) use 0.05
          prim_cell = 0  # priming coefficient for cell pool (-1 to 1) use 0.08
          prim_carb = 0  # priming coefficient for carb pool (-1 to 1) use 0.08
          prim_lign = 0  # priming coefficient for lign pool (-1 to 1) use 0.08
          prim_ef = 0  # negative priming coefficient for internal C partitioning (use 0.1 for 20 Mg), biom
          prim_fr = 0  # negative priming coefficient for internal C partioning (use -0.1), biom
          prim_ef_fom = 0  # negative priming for internal C partitioning (use 0.1 for 20 mg),fom
          prim_fr_fom = 0  # negative priming for internal C partitioning (use -0.1 for 20 mg), fom
          biom_cn = 8  # C/N ratio of biom pool
          soil_cn = 12  # C/N ratio of soil stuff
          incorp_depth = 300  # Biochar incorporation depth (mm)
          dul_qual = 0.15  # Slope of dul quality equation (default 0.33)
          bd_qual = 0.15  # Slope of bd quality equation (default 0.33)
          bc_cce = 50  # Biochar LV (cmol/kg?)
          bc_cec = 187  # Biochar ECEC (cmol/kg)
          cnrf_bc_coeff = 0.693  # Biochar cnrf coefficient (0-1)
          cnrf_bc_optcn = 25  # Optimum cn ratio for bc
          bc_wfps_factor = 1  # Biochar WFPS factor (0-1)
          nh4_adsorption = 0.006  # Biochar nh4 absorption coefficient (Langmuir)
          nh4_desorption = 0.006  # Biochar nh4 desorption coefficient (Langmuir)
          # Tillage info
          tillage = 0.80  # % BD reduction due to tillage
          # Soil information
          soil_name = Loam  # Name of the soil as it appears in the simulation tree. This being wrong causes object reference errors.
          soil_order = Alfisol  # Order of the soil
          nclay_portion = 0.95  # Portion of soil clay that is nclay (0-1)
          uph = 9.3  # Soil upper ph
          lph = 3.5  # Soil lower ph
          ab_val = 0  # Acid - Base value
          bot_slope = 10  # Unit conversion for titration curve (use 10)
          # Switches for various biochar components (development purposes)
          decomp_switch = on  # Priming effects? (on/off)
          nitrification_switch = on  # Nitrification effects? (on/off)
          ph_switch = on  # PH effects ? (on/off)
          ll_switch = on  # LL and CLL effects? (on/off)
          dul_switch = on  # DUL effects ? (on/off)
          xf_switch = off  # XF effects? (on/off)
          kl_switch = off  # KL effects? (on/off)
          bd_switch = on  # BD effects? (on/off) (under development)
          biochar_c_switch = on  # Biochar module (on/off)
          swcon_switch = off  # SWCOM effects (on/off)
          ks_switch = off  # Ksat effects ? (on/off)
          sat_switch = on  # SAT effects? (on/off)
          script: same as in KBS.scen_1_611.paddock.biochar5v3
        soybean
        wheat
          ModifyKL = yes  # Modify KL using CL, EC or ESP if found?
          MaxRootDepth = 0  # Maximum rooting depth (mm) 0=no restriction
        operations Operations Schedule: same as KBS.scen_1_611.paddock.Operations Schedule
    simulation scen_1_613
      metfile met: filename=basic_wth_1.met
      clock
        start_date = 01/01/1989  # Enter the start date of the simulation
        end_date = 31/12/2099  # Enter the end date of the simulation
      summaryfile
      area paddock
        surfaceom SurfaceOrganicMatter
          PoolName = soybean  # Organic Matter pool name
          type = soybean  # Organic Matter type
          mass = 1000  # Initial surface residue (kg/ha)
          cnr = 27  # C:N ratio of initial residue
          standing_fraction = 0  # Fraction of residue standing
        fertiliser
        maize
        Soil Loam: same as KBS.scen_1_611.paddock.Loam
        folder Manager folder: same as KBS.scen_1_611.paddock.Manager folder
        outputfile: filename=scen_1_613.out; title=scen_1_613
          events Reporting Frequency: event=daily
          variables
            variable:
              dd/mm/yyyy as Date
              bd(1)
              yield
              sw(1)
              st(1)
              biomass
              stover
              dul(1)
              sat(1)
              ph(1)
              n2o_atm_denitrification(1-5) format 8 as n2o_bylayer_kgha
              oc(1-5) format 8 as oc_bylayer_kgha
        manager2 biochar5v3
          date_of_application = 08/12/2021  # Date of biochar application (mm/dd/yyyy)
          biochar_added = 19200  # amount of biochar applied (kg/ha)
          frac_c_biochar = .658  # fraction carbon in biochar (0-1)
          biochar_loss = 0.02  # fraction of biochar lost during application (0-1)
          MRT1 = 1  # mean residence time for labile biochar pool (years)
          MRT2 = 500  # mean residence time for resistant biochar pool (years)
          frac_labile = 0.13  # biochar labile fraction (0-1)
          ef_biochar = 0.4  # fraction of decomposed biochar that goes to OC pools (0-1) (biochar efficiency)
          fr_biochar_biom = 0.05  # fraction of decomposed biochar that goes to biom (0-1)
          biochar_cn = 29.5  # biochar CN ratio
          sand = .416  # sand (0-1)
          clay = .21  # clay (0-1)
          prim_biom = 0  # priming coefficient for biom pool (-1 to 1) use 0.05
          prim_hum = 0  # priming coefficient for hum pool (-1 to 1) use 0.05
          prim_cell = 0  # priming coefficient for cell pool (-1 to 1) use 0.08
          prim_carb = 0  # priming coefficient for carb pool (-1 to 1) use 0.08
          prim_lign = 0  # priming coefficient for lign pool (-1 to 1) use 0.08
          prim_ef = 0  # negative priming coefficient for internal C partitioning (use 0.1 for 20 Mg), biom
          prim_fr = 0  # negative priming coefficient for internal C partioning (use -0.1), biom
          prim_ef_fom = 0  # negative priming for internal C partitioning (use 0.1 for 20 mg),fom
          prim_fr_fom = 0  # negative priming for internal C partitioning (use -0.1 for 20 mg), fom
          biom_cn = 8  # C/N ratio of biom pool
          soil_cn = 12  # C/N ratio of soil stuff
          incorp_depth = 300  # Biochar incorporation depth (mm)
          dul_qual = 0.15  # Slope of dul quality equation (default 0.33)
          bd_qual = 0.15  # Slope of bd quality equation (default 0.33)
          bc_cce = 50  # Biochar LV (cmol/kg?)
          bc_cec = 187  # Biochar ECEC (cmol/kg)
          cnrf_bc_coeff = 0.693  # Biochar cnrf coefficient (0-1)
          cnrf_bc_optcn = 25  # Optimum cn ratio for bc
          bc_wfps_factor = 1  # Biochar WFPS factor (0-1)
          nh4_adsorption = 0.006  # Biochar nh4 absorption coefficient (Langmuir)
          nh4_desorption = 0.006  # Biochar nh4 desorption coefficient (Langmuir)
          # Tillage info
          tillage = 0.80  # % BD reduction due to tillage
          # Soil information
          soil_name = Loam  # Name of the soil as it appears in the simulation tree. This being wrong causes object reference errors.
          soil_order = Alfisol  # Order of the soil
          nclay_portion = 0.95  # Portion of soil clay that is nclay (0-1)
          uph = 9.3  # Soil upper ph
          lph = 3.5  # Soil lower ph
          ab_val = 0  # Acid - Base value
          bot_slope = 10  # Unit conversion for titration curve (use 10)
          # Switches for various biochar components (development purposes)
          decomp_switch = on  # Priming effects? (on/off)
          nitrification_switch = on  # Nitrification effects? (on/off)
          ph_switch = on  # PH effects ? (on/off)
          ll_switch = on  # LL and CLL effects? (on/off)
          dul_switch = on  # DUL effects ? (on/off)
          xf_switch = off  # XF effects? (on/off)
          kl_switch = off  # KL effects? (on/off)
          bd_switch = on  # BD effects? (on/off) (under development)
          biochar_c_switch = on  # Biochar module (on/off)
          swcon_switch = off  # SWCOM effects (on/off)
          ks_switch = off  # Ksat effects ? (on/off)
          sat_switch = on  # SAT effects? (on/off)
          script: same as in KBS.scen_1_611.paddock.biochar5v3
        soybean
        wheat
          ModifyKL = yes  # Modify KL using CL, EC or ESP if found?
          MaxRootDepth = 0  # Maximum rooting depth (mm) 0=no restriction
        operations Operations Schedule: same as KBS.scen_1_611.paddock.Operations Schedule
    simulation scen_1_614
      metfile met: filename=basic_wth_1.met
      clock
        start_date = 01/01/1989  # Enter the start date of the simulation
        end_date = 31/12/2099  # Enter the end date of the simulation
      summaryfile
      area paddock
        surfaceom SurfaceOrganicMatter
          PoolName = soybean  # Organic Matter pool name
          type = soybean  # Organic Matter type
          mass = 1000  # Initial surface residue (kg/ha)
          cnr = 27  # C:N ratio of initial residue
          standing_fraction = 0  # Fraction of residue standing
        fertiliser
        maize
        Soil Loam: same as KBS.scen_1_611.paddock.Loam
        folder Manager folder: same as KBS.scen_1_611.paddock.Manager folder
        outputfile: filename=scen_1_614.out; title=scen_1_614
          events Reporting Frequency: event=daily
          variables
            variable:
              dd/mm/yyyy as Date
              bd(1)
              yield
              sw(1)
              st(1)
              biomass
              stover
              dul(1)
              sat(1)
              ph(1)
              n2o_atm_denitrification(1-5) format 8 as n2o_bylayer_kgha
              oc(1-5) format 8 as oc_bylayer_kgha
        manager2 biochar5v3
          date_of_application = 08/12/2021  # Date of biochar application (mm/dd/yyyy)
          biochar_added = 19200  # amount of biochar applied (kg/ha)
          frac_c_biochar = .592  # fraction carbon in biochar (0-1)
          biochar_loss = 0.02  # fraction of biochar lost during application (0-1)
          MRT1 = 1  # mean residence time for labile biochar pool (years)
          MRT2 = 500  # mean residence time for resistant biochar pool (years)
          frac_labile = 0.13  # biochar labile fraction (0-1)
          ef_biochar = 0.4  # fraction of decomposed biochar that goes to OC pools (0-1) (biochar efficiency)
          fr_biochar_biom = 0.05  # fraction of decomposed biochar that goes to biom (0-1)
          biochar_cn = 29.7  # biochar CN ratio
          sand = .416  # sand (0-1)
          clay = .21  # clay (0-1)
          prim_biom = 0  # priming coefficient for biom pool (-1 to 1) use 0.05
          prim_hum = 0  # priming coefficient for hum pool (-1 to 1) use 0.05
          prim_cell = 0  # priming coefficient for cell pool (-1 to 1) use 0.08
          prim_carb = 0  # priming coefficient for carb pool (-1 to 1) use 0.08
          prim_lign = 0  # priming coefficient for lign pool (-1 to 1) use 0.08
          prim_ef = 0  # negative priming coefficient for internal C partitioning (use 0.1 for 20 Mg), biom
          prim_fr = 0  # negative priming coefficient for internal C partioning (use -0.1), biom
          prim_ef_fom = 0  # negative priming for internal C partitioning (use 0.1 for 20 mg),fom
          prim_fr_fom = 0  # negative priming for internal C partitioning (use -0.1 for 20 mg), fom
          biom_cn = 8  # C/N ratio of biom pool
          soil_cn = 12  # C/N ratio of soil stuff
          incorp_depth = 300  # Biochar incorporation depth (mm)
          dul_qual = 0.15  # Slope of dul quality equation (default 0.33)
          bd_qual = 0.15  # Slope of bd quality equation (default 0.33)
          bc_cce = 50  # Biochar LV (cmol/kg?)
          bc_cec = 187  # Biochar ECEC (cmol/kg)
          cnrf_bc_coeff = 0.693  # Biochar cnrf coefficient (0-1)
          cnrf_bc_optcn = 25  # Optimum cn ratio for bc
          bc_wfps_factor = 1  # Biochar WFPS factor (0-1)
          nh4_adsorption = 0.006  # Biochar nh4 absorption coefficient (Langmuir)
          nh4_desorption = 0.006  # Biochar nh4 desorption coefficient (Langmuir)
          # Tillage info
          tillage = 0.80  # % BD reduction due to tillage
          # Soil information
          soil_name = Loam  # Name of the soil as it appears in the simulation tree. This being wrong causes object reference errors.
          soil_order = Alfisol  # Order of the soil
          nclay_portion = 0.95  # Portion of soil clay that is nclay (0-1)
          uph = 9.3  # Soil upper ph
          lph = 3.5  # Soil lower ph
          ab_val = 0  # Acid - Base value
          bot_slope = 10  # Unit conversion for titration curve (use 10)
          # Switches for various biochar components (development purposes)
          decomp_switch = on  # Priming effects? (on/off)
          nitrification_switch = on  # Nitrification effects? (on/off)
          ph_switch = on  # PH effects ? (on/off)
          ll_switch = on  # LL and CLL effects? (on/off)
          dul_switch = on  # DUL effects ? (on/off)
          xf_switch = off  # XF effects? (on/off)
          kl_switch = off  # KL effects? (on/off)
          bd_switch = on  # BD effects? (on/off) (under development)
          biochar_c_switch = on  # Biochar module (on/off)
          swcon_switch = off  # SWCOM effects (on/off)
          ks_switch = off  # Ksat effects ? (on/off)
          sat_switch = on  # SAT effects? (on/off)
          script: same as in KBS.scen_1_611.paddock.biochar5v3
        soybean
        wheat
          ModifyKL = yes  # Modify KL using CL, EC or ESP if found?
          MaxRootDepth = 0  # Maximum rooting depth (mm) 0=no restriction
        operations Operations Schedule: same as KBS.scen_1_611.paddock.Operations Schedule
    simulation scen_1_652 -> /simulations/KBS/scen_1_611
      area paddock -> /simulations/KBS/scen_1_611/paddock
        folder Manager folder -> /simulations/KBS/scen_1_611/paddock/Manager folder
          manager Harvesting rule2: same as KBS.scen_1_611.paddock.Manager folder.Harvesting rule2
          manager Remove residues at harvest: same as KBS.scen_1_611.paddock.Manager folder.Remove residues at harvest
          manager Remove residues at harvest1: same as KBS.scen_1_611.paddock.Manager folder.Remove residues at harvest1
          manager Remove residues at harvest2: same as KBS.scen_1_611.paddock.Manager folder.Remove residues at harvest2
        manager Script: same as KBS.scen_1_621.paddock.Script
        outputfile -> /simulations/KBS/scen_1_611/paddock/outputfile: filename=scen_1_652.out; title=scen_1_652
          events Reporting Frequency -> /simulations/KBS/scen_1_611/paddock/outputfile/Reporting Frequency
          variables -> /simulations/KBS/scen_1_611/paddock/outputfile/Variables
        manager2 biochar5v3
          date_of_application = 08/12/2021  # Date of biochar application (mm/dd/yyyy)
          biochar_added = 96000  # amount of biochar applied (kg/ha)
          frac_c_biochar = 0.72  # fraction carbon in biochar (0-1)
          biochar_loss = 0.05  # fraction of biochar lost during application (0-1)
          MRT1 = 1  # mean residence time for labile biochar pool (years)
          MRT2 = 500  # mean residence time for resistant biochar pool (years)
          frac_labile = 0.13  # biochar labile fraction (0-1)
          ef_biochar = 0.4  # fraction of decomposed biochar that goes to OC pools (0-1) (biochar efficiency)
          fr_biochar_biom = 0.05  # fraction of decomposed biochar that goes to biom (0-1)
          biochar_cn = 207  # biochar CN ratio
          sand = 0.416  # sand (0-1)
          clay = 0.21  # clay (0-1)
          prim_biom = 0  # priming coefficient for biom pool (-1 to 1) use 0.05
          prim_hum = 0  # priming coefficient for hum pool (-1 to 1) use 0.05
          prim_cell = 0  # priming coefficient for cell pool (-1 to 1) use 0.08
          prim_carb = 0  # priming coefficient for carb pool (-1 to 1) use 0.08
          prim_lign = 0  # priming coefficient for lign pool (-1 to 1) use 0.08
          prim_ef = 0  # negative priming coefficient for internal C partitioning (use 0.1 for 20 Mg), biom
          prim_fr = 0  # negative priming coefficient for internal C partioning (use -0.1), biom
          prim_ef_fom = 0  # negative priming for internal C partitioning (use 0.1 for 20 mg),fom
          prim_fr_fom = 0  # negative priming for internal C partitioning (use -0.1 for 20 mg), fom
          biom_cn = 8  # C/N ratio of biom pool
          soil_cn = 12  # C/N ratio of soil stuff
          incorp_depth = 300  # Biochar incorporation depth (mm)
          dul_qual = 0.15  # Slope of dul quality equation (default 0.33)
          bd_qual = 0.15  # Slope of bd quality equation (default 0.33)
          bc_cce = 50  # Biochar LV (cmol/kg?)
          bc_cec = 187  # Biochar ECEC (cmol/kg)
          cnrf_bc_coeff = 0.693  # Biochar cnrf coefficient (0-1)
          cnrf_bc_optcn = 25  # Optimum cn ratio for bc
          bc_wfps_factor = 1  # Biochar WFPS factor (0-1)
          nh4_adsorption = 0.006  # Biochar nh4 absorption coefficient (Langmuir)
          nh4_desorption = 0.006  # Biochar nh4 desorption coefficient (Langmuir)
          # Tillage info
          tillage = 0.80  # % BD reduction due to tillage
          # Soil information
          soil_name = Loam  # Name of the soil as it appears in the simulation tree. This being wrong causes object reference errors.
          soil_order = Alfisol  # Order of the soil
          nclay_portion = 0.95  # Portion of soil clay that is nclay (0-1)
          uph = 9.3  # Soil upper ph
          lph = 3.5  # Soil lower ph
          ab_val = 0  # Acid - Base value
          bot_slope = 10  # Unit conversion for titration curve (use 10)
          # Switches for various biochar components (development purposes)
          decomp_switch = on  # Priming effects? (on/off)
          nitrification_switch = on  # Nitrification effects? (on/off)
          ph_switch = on  # PH effects ? (on/off)
          ll_switch = on  # LL and CLL effects? (on/off)
          dul_switch = on  # DUL effects ? (on/off)
          xf_switch = off  # XF effects? (on/off)
          kl_switch = off  # KL effects? (on/off)
          bd_switch = on  # BD effects? (on/off) (under development)
          biochar_c_switch = on  # Biochar module (on/off)
          swcon_switch = off  # SWCOM effects (on/off)
          ks_switch = off  # Ksat effects ? (on/off)
          sat_switch = on  # SAT effects? (on/off)
          script: same as in KBS.scen_1_611.paddock.biochar5v3
        wheat
          ModifyKL = yes  # Modify KL using CL, EC or ESP if found?
          MaxRootDepth = 0  # Maximum rooting depth (mm) 0=no restriction
        operations Operations Schedule: same as KBS.scen_1_611.paddock.Operations Schedule
    simulation scen_1_653 -> /simulations/KBS/scen_1_611
      area paddock -> /simulations/KBS/scen_1_611/paddock
        folder Manager folder -> /simulations/KBS/scen_1_611/paddock/Manager folder
          manager Harvesting rule2: same as KBS.scen_1_611.paddock.Manager folder.Harvesting rule2
          manager Remove residues at harvest: same as KBS.scen_1_611.paddock.Manager folder.Remove residues at harvest
          manager Remove residues at harvest1: same as KBS.scen_1_611.paddock.Manager folder.Remove residues at harvest1
          manager Remove residues at harvest2: same as KBS.scen_1_611.paddock.Manager folder.Remove residues at harvest2
        manager Script: same as KBS.scen_1_621.paddock.Script
        outputfile -> /simulations/KBS/scen_1_611/paddock/outputfile: filename=scen_1_653.out; title=scen_1_653
          events Reporting Frequency -> /simulations/KBS/scen_1_611/paddock/outputfile/Reporting Frequency
          variables -> /simulations/KBS/scen_1_611/paddock/outputfile/Variables
        manager2 biochar5v3
          date_of_application = 08/12/2021  # Date of biochar application (mm/dd/yyyy)
          biochar_added = 96000  # amount of biochar applied (kg/ha)
          frac_c_biochar = 0.658  # fraction carbon in biochar (0-1)
          biochar_loss = 0.05  # fraction of biochar lost during application (0-1)
          MRT1 = 1  # mean residence time for labile biochar pool (years)
          MRT2 = 500  # mean residence time for resistant biochar pool (years)
          frac_labile = 0.13  # biochar labile fraction (0-1)
          ef_biochar = 0.4  # fraction of decomposed biochar that goes to OC pools (0-1) (biochar efficiency)
          fr_biochar_biom = 0.05  # fraction of decomposed biochar that goes to biom (0-1)
          biochar_cn = 29.5  # biochar CN ratio
          sand = 0.416  # sand (0-1)
          clay = 0.21  # clay (0-1)
          prim_biom = 0  # priming coefficient for biom pool (-1 to 1) use 0.05
          prim_hum = 0  # priming coefficient for hum pool (-1 to 1) use 0.05
          prim_cell = 0  # priming coefficient for cell pool (-1 to 1) use 0.08
          prim_carb = 0  # priming coefficient for carb pool (-1 to 1) use 0.08
          prim_lign = 0  # priming coefficient for lign pool (-1 to 1) use 0.08
          prim_ef = 0  # negative priming coefficient for internal C partitioning (use 0.1 for 20 Mg), biom
          prim_fr = 0  # negative priming coefficient for internal C partioning (use -0.1), biom
          prim_ef_fom = 0  # negative priming for internal C partitioning (use 0.1 for 20 mg),fom
          prim_fr_fom = 0  # negative priming for internal C partitioning (use -0.1 for 20 mg), fom
          biom_cn = 8  # C/N ratio of biom pool
          soil_cn = 12  # C/N ratio of soil stuff
          incorp_depth = 300  # Biochar incorporation depth (mm)
          dul_qual = 0.15  # Slope of dul quality equation (default 0.33)
          bd_qual = 0.15  # Slope of bd quality equation (default 0.33)
          bc_cce = 50  # Biochar LV (cmol/kg?)
          bc_cec = 187  # Biochar ECEC (cmol/kg)
          cnrf_bc_coeff = 0.693  # Biochar cnrf coefficient (0-1)
          cnrf_bc_optcn = 25  # Optimum cn ratio for bc
          bc_wfps_factor = 1  # Biochar WFPS factor (0-1)
          nh4_adsorption = 0.006  # Biochar nh4 absorption coefficient (Langmuir)
          nh4_desorption = 0.006  # Biochar nh4 desorption coefficient (Langmuir)
          # Tillage info
          tillage = 0.80  # % BD reduction due to tillage
          # Soil information
          soil_name = Loam  # Name of the soil as it appears in the simulation tree. This being wrong causes object reference errors.
          soil_order = Alfisol  # Order of the soil
          nclay_portion = 0.95  # Portion of soil clay that is nclay (0-1)
          uph = 9.3  # Soil upper ph
          lph = 3.5  # Soil lower ph
          ab_val = 0  # Acid - Base value
          bot_slope = 10  # Unit conversion for titration curve (use 10)
          # Switches for various biochar components (development purposes)
          decomp_switch = on  # Priming effects? (on/off)
          nitrification_switch = on  # Nitrification effects? (on/off)
          ph_switch = on  # PH effects ? (on/off)
          ll_switch = on  # LL and CLL effects? (on/off)
          dul_switch = on  # DUL effects ? (on/off)
          xf_switch = off  # XF effects? (on/off)
          kl_switch = off  # KL effects? (on/off)
          bd_switch = on  # BD effects? (on/off) (under development)
          biochar_c_switch = on  # Biochar module (on/off)
          swcon_switch = off  # SWCOM effects (on/off)
          ks_switch = off  # Ksat effects ? (on/off)
          sat_switch = on  # SAT effects? (on/off)
          script: same as in KBS.scen_1_611.paddock.biochar5v3
        wheat
          ModifyKL = yes  # Modify KL using CL, EC or ESP if found?
          MaxRootDepth = 0  # Maximum rooting depth (mm) 0=no restriction
        operations Operations Schedule: same as KBS.scen_1_611.paddock.Operations Schedule
    simulation scen_1_654 -> /simulations/KBS/scen_1_611
      area paddock -> /simulations/KBS/scen_1_611/paddock
        folder Manager folder -> /simulations/KBS/scen_1_611/paddock/Manager folder
          manager Harvesting rule2: same as KBS.scen_1_611.paddock.Manager folder.Harvesting rule2
          manager Remove residues at harvest: same as KBS.scen_1_611.paddock.Manager folder.Remove residues at harvest
          manager Remove residues at harvest1: same as KBS.scen_1_611.paddock.Manager folder.Remove residues at harvest1
          manager Remove residues at harvest2: same as KBS.scen_1_611.paddock.Manager folder.Remove residues at harvest2
        manager Script: same as KBS.scen_1_621.paddock.Script
        outputfile -> /simulations/KBS/scen_1_611/paddock/outputfile: filename=scen_1_654.out; title=scen_1_654
          events Reporting Frequency -> /simulations/KBS/scen_1_611/paddock/outputfile/Reporting Frequency
          variables -> /simulations/KBS/scen_1_611/paddock/outputfile/Variables
        manager2 biochar5v3
          date_of_application = 08/12/2021  # Date of biochar application (mm/dd/yyyy)
          biochar_added = 96000  # amount of biochar applied (kg/ha)
          frac_c_biochar = 0.592  # fraction carbon in biochar (0-1)
          biochar_loss = 0.05  # fraction of biochar lost during application (0-1)
          MRT1 = 1  # mean residence time for labile biochar pool (years)
          MRT2 = 500  # mean residence time for resistant biochar pool (years)
          frac_labile = 0.13  # biochar labile fraction (0-1)
          ef_biochar = 0.4  # fraction of decomposed biochar that goes to OC pools (0-1) (biochar efficiency)
          fr_biochar_biom = 0.05  # fraction of decomposed biochar that goes to biom (0-1)
          biochar_cn = 29.7  # biochar CN ratio
          sand = 0.416  # sand (0-1)
          clay = 0.21  # clay (0-1)
          prim_biom = 0  # priming coefficient for biom pool (-1 to 1) use 0.05
          prim_hum = 0  # priming coefficient for hum pool (-1 to 1) use 0.05
          prim_cell = 0  # priming coefficient for cell pool (-1 to 1) use 0.08
          prim_carb = 0  # priming coefficient for carb pool (-1 to 1) use 0.08
          prim_lign = 0  # priming coefficient for lign pool (-1 to 1) use 0.08
          prim_ef = 0  # negative priming coefficient for internal C partitioning (use 0.1 for 20 Mg), biom
          prim_fr = 0  # negative priming coefficient for internal C partioning (use -0.1), biom
          prim_ef_fom = 0  # negative priming for internal C partitioning (use 0.1 for 20 mg),fom
          prim_fr_fom = 0  # negative priming for internal C partitioning (use -0.1 for 20 mg), fom
          biom_cn = 8  # C/N ratio of biom pool
          soil_cn = 12  # C/N ratio of soil stuff
          incorp_depth = 300  # Biochar incorporation depth (mm)
          dul_qual = 0.15  # Slope of dul quality equation (default 0.33)
          bd_qual = 0.15  # Slope of bd quality equation (default 0.33)
          bc_cce = 50  # Biochar LV (cmol/kg?)
          bc_cec = 187  # Biochar ECEC (cmol/kg)
          cnrf_bc_coeff = 0.693  # Biochar cnrf coefficient (0-1)
          cnrf_bc_optcn = 25  # Optimum cn ratio for bc
          bc_wfps_factor = 1  # Biochar WFPS factor (0-1)
          nh4_adsorption = 0.006  # Biochar nh4 absorption coefficient (Langmuir)
          nh4_desorption = 0.006  # Biochar nh4 desorption coefficient (Langmuir)
          # Tillage info
          tillage = 0.80  # % BD reduction due to tillage
          # Soil information
          soil_name = Loam  # Name of the soil as it appears in the simulation tree. This being wrong causes object reference errors.
          soil_order = Alfisol  # Order of the soil
          nclay_portion = 0.95  # Portion of soil clay that is nclay (0-1)
          uph = 9.3  # Soil upper ph
          lph = 3.5  # Soil lower ph
          ab_val = 0  # Acid - Base value
          bot_slope = 10  # Unit conversion for titration curve (use 10)
          # Switches for various biochar components (development purposes)
          decomp_switch = on  # Priming effects? (on/off)
          nitrification_switch = on  # Nitrification effects? (on/off)
          ph_switch = on  # PH effects ? (on/off)
          ll_switch = on  # LL and CLL effects? (on/off)
          dul_switch = on  # DUL effects ? (on/off)
          xf_switch = off  # XF effects? (on/off)
          kl_switch = off  # KL effects? (on/off)
          bd_switch = on  # BD effects? (on/off) (under development)
          biochar_c_switch = on  # Biochar module (on/off)
          swcon_switch = off  # SWCOM effects (on/off)
          ks_switch = off  # Ksat effects ? (on/off)
          sat_switch = on  # SAT effects? (on/off)
          script: same as in KBS.scen_1_611.paddock.biochar5v3
        wheat
          ModifyKL = yes  # Modify KL using CL, EC or ESP if found?
          MaxRootDepth = 0  # Maximum rooting depth (mm) 0=no restriction
        operations Operations Schedule: same as KBS.scen_1_611.paddock.Operations Schedule
  factorial Factorials: active=0
    settings
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