folder simulations: version=37; creator=Apsim 7.10-r4220
  memo
    This biochar study was modified from the biochar sims used in the GCB-Bioenergy paper (Archontoulis et al., 2016)

    Archontoulis, S.V., Huber, I., Miguez, F.E., Thorburn, P.J., Rogovska, N., Laird, D.A., 2016. A model for mechanistic and system assessments of biochar effects on soils and crops and trade-offs. GCB Bioenergy 8, 1028–1045. doi:10.1111/gcbb.12314
  folder LFR
    simulation scen_2_61
      metfile met: filename=basic_wth_2.met
      clock
        start_date = 01/01/1987  # Enter the start date of the simulation
        end_date = 31/12/2100  # Enter the end date of the simulation
      summaryfile
      area paddock
        surfaceom SurfaceOrganicMatter
          PoolName = soybean  # Organic Matter pool name
          type = soybean  # Organic Matter type
          mass = 1000  # Initial surface residue (kg/ha)
          cnr = 27  # C:N ratio of initial residue
          standing_fraction = 0  # Fraction of residue standing
        fertiliser
        outputfile: filename=scen_2_61.out; title=scen_2_61
          events Reporting Frequency: event=daily
          variables
            variable:
              dd/mm/yyyy as Date
              bd(1)
              yield
              sw(1)
              st(1)
              biomass
              dul(1)
              sat(1)
              ph(1)
              n2o_atm_denitrification(1-5) format 8 as n2o_bylayer_kgha
              oc(1-5) format 8 as oc_bylayer_pct
              bd(2)
              dlt_biom_c_hum(1-2)
              dlt_fom_c_hum(1-2)
              dlt_res_c_hum(1-2)
              fom_c_pool1(1-2)
              fom_c_pool2(1-2)
              fom_c_pool3(1-2)
              fr_carb
              fr_cell
              fr_lign
              hum_c(1-2)
              soilp_dlt_res_c_hum(1-2)
        cotton2 cotton
          initsection
            crop_type = cotton
            leaf_res_n_conc = 0.02
            hucut = 40  # oC
            baset = 12  # oC
            open_def = 60  # %
            a_root_leaf = 1.01
            a_stem_leaf = 1.25
            e_par = 2.5  # g/MJ
            specific_lw = 58  # g/m^2
            t_opt = 25  # oC
            t_base = 8  # oC
            wt_area_max = 150
            embryo = 0.75  # g
            f_leaf = 0.6
            f_stem = 0.15
            f_root = 0.25
            elevation_default = 200  # m
            wlog_assimilate_red = 0.2
            wlog_carcap_red = 0.2
            watlog_c = 0.87
            watlog_n = 0.87
            wlog_carcap_red_stress = 0.01
            smi_affect_wlog = 0.75
            days_relief_wlog = 7  # days
            frost_kill_immediate = 2  # oC
            rtdep_max = 130  # cm
            harvest_n_frac = 0.85
            cutout_smi_crit = 0.75
            cutout_smi_days = 5  # days
            cutout_smi_site_red = 0.1
            epcoef1 = 3.051
            epcoef2 = 2.436
            epcoef_smi_crit = 0.5
            fbwstr_low = 0
            fbwstr_high = 0.5
            fbwstr_a = 1
            fbnstr_low = 0
            fbnstr_high = 0.5
            fbnstr_a = 1
            relp_smi_crit = 0.5
            relp_intercept = 0.25
            relp_slope = 0.864
            relp_low = 0
            relp_high = 1
            relp_a = 0.5
            vsnstr_low = 0
            vsnstr_high = 0.9
            vsnstr_a = 1
            flfsmi_low = 0
            flfsmi_high = 0.5
            flfsmi_a = 1
            vlnstr_low = 0
            vlnstr_high = 0.9
            vlnstr_a = 1
            fw_low = 0
            fw_high = 0.25
            fw_a = 1
            adjust_low = 0
            adjust_high = 5
            adjust_a = 1
            fwstrs_low = 0
            fwstrs_high = 0.5
            fwstrs_a = 4
            smi_delay_crit = 0.25
            cold_shock_delay_crit = 11  # oC
            cold_shock_delay = 5.2  # dd
            fert_crit = 1  # kg/ha
            fert_detect = 10  # kg/ha
            days_since_fert_max = 100  # days
            cultivar_default = S71BR
            init cultivars: array=T
              element
                cultivar = _Default_S71BR
                percent_l = 40
                scboll = 5
                respcon = 0.01593
                sqcon = 0.0217
                fcutout = 0.5411
                flai = 0.87
                DDISQ = 402
                TIPOUT = 52
                FRUDD = [50, 161, 307, 338, 484, 630, 848, 1071]
                BLTME = [0, 0, 0, 0.07, 0.21, 0.33, 0.55, 1]
                WT = [0.0104, 0.0272, 0.1441, 0.0988, 0.5042, 0.9617, 1, 0.5785]
                dlds_max = 0.12
                rate_emergence = 1
                popcon = 0.03633
                fburr = 1.23
                ACOTYL = 525
                RLAI = 0.01
                BckGndRetn = 0.9
              element
                cultivar = S71
                percent_l = 42
                scboll = 5.2
                respcon = 0.01593
                sqcon = 0.0217
                fcutout = 0.5411
                flai = 0.87
                DDISQ = 402
                TIPOUT = 52
                FRUDD = [50, 161, 307, 338, 484, 630, 848, 1071]
                BLTME = [0, 0, 0, 0.07, 0.21, 0.33, 0.55, 1]
                WT = [0.0104, 0.0272, 0.1441, 0.0988, 0.5042, 0.9617, 1, 0.5785]
                dlds_max = 0.12
                rate_emergence = 1
                popcon = 0.03633
                fburr = 1.23
                ACOTYL = 525
                RLAI = 0.01
                BckGndRetn = 0.8
              element
                cultivar = S71BR
                percent_l = 40
                scboll = 5
                respcon = 0.01593
                sqcon = 0.0217
                fcutout = 0.5411
                flai = 0.87
                DDISQ = 402
                TIPOUT = 52
                FRUDD = [50, 161, 307, 338, 484, 630, 848, 1071]
                BLTME = [0, 0, 0, 0.07, 0.21, 0.33, 0.55, 1]
                WT = [0.0104, 0.0272, 0.1441, 0.0988, 0.5042, 0.9617, 1, 0.5785]
                dlds_max = 0.12
                rate_emergence = 1
                popcon = 0.03633
                fburr = 1.23
                ACOTYL = 525
                RLAI = 0.01
                BckGndRetn = 0.9
              element
                cultivar = Siok
                percent_l = 42
                scboll = 4.5
                respcon = 0.01593
                sqcon = 0.0228
                fcutout = 0.5411
                flai = 0.52
                DDISQ = 420
                TIPOUT = 52
                FRUDD = [50, 180, 350, 380, 520, 660, 870, 1100]
                BLTME = [0, 0, 0, 0.07, 0.21, 0.33, 0.55, 1]
                WT = [0.0104, 0.0272, 0.1441, 0.0988, 0.5042, 0.9617, 1, 0.5785]
                dlds_max = 0.12
                rate_emergence = 1
                popcon = 0.03633
                fburr = 1.23
                ACOTYL = 525
                RLAI = 0.01
                BckGndRetn = 0.9
              element
                cultivar = Sica
                percent_l = 40
                scboll = 5.5
                respcon = 0.02306
                sqcon = 0.0206
                fcutout = 0.4789
                flai = 0.87
                DDISQ = 420
                TIPOUT = 52
                FRUDD = [50, 180, 350, 380, 520, 660, 870, 1100]
                BLTME = [0, 0, 0, 0.07, 0.21, 0.33, 0.55, 1]
                WT = [0.0104, 0.0272, 0.1441, 0.0988, 0.5042, 0.9617, 1, 0.5785]
                dlds_max = 0.12
                rate_emergence = 1
                popcon = 0.03633
                fburr = 1.23
                ACOTYL = 525
                RLAI = 0.01
                BckGndRetn = 0.9
        sorghum
        manager2 biochar5v3
          date_of_application = 08/12/2021  # Date of biochar application (mm/dd/yyyy)
          biochar_added = 19200  # amount of biochar applied (kg/ha)
          frac_c_biochar = 0.78  # fraction carbon in biochar (0-1)
          biochar_loss = 0.02  # fraction of biochar lost during application (0-1)
          MRT1 = 1  # mean residence time for labile biochar pool (years)
          MRT2 = 500  # mean residence time for resistant biochar pool (years)
          frac_labile = 0.13  # biochar labile fraction (0-1)
          ef_biochar = 0.4  # fraction of decomposed biochar that goes to OC pools (0-1) (biochar efficiency)
          fr_biochar_biom = 0.05  # fraction of decomposed biochar that goes to biom (0-1)
          biochar_cn = 132  # biochar CN ratio
          sand = 0.416  # sand (0-1)
          clay = 0.21  # clay (0-1)
          prim_biom = 0  # priming coefficient for biom pool (-1 to 1) use 0.05
          prim_hum = 0  # priming coefficient for hum pool (-1 to 1) use 0.05
          prim_cell = 0  # priming coefficient for cell pool (-1 to 1) use 0.08
          prim_carb = 0  # priming coefficient for carb pool (-1 to 1) use 0.08
          prim_lign = 0  # priming coefficient for lign pool (-1 to 1) use 0.08
          prim_ef = 0  # negative priming coefficient for internal C partitioning (use 0.1 for 20 Mg), biom
          prim_fr = 0  # negative priming coefficient for internal C partioning (use -0.1), biom
          prim_ef_fom = 0  # negative priming for internal C partitioning (use 0.1 for 20 mg),fom
          prim_fr_fom = 0  # negative priming for internal C partitioning (use -0.1 for 20 mg), fom
          biom_cn = 8  # C/N ratio of biom pool
          soil_cn = 12  # C/N ratio of soil stuff
          incorp_depth = 300  # Biochar incorporation depth (mm)
          dul_qual = 0.15  # Slope of dul quality equation (default 0.33)
          bd_qual = 0.15  # Slope of bd quality equation (default 0.33)
          bc_cce = 50  # Biochar LV (cmol/kg?)
          bc_cec = 187  # Biochar ECEC (cmol/kg)
          cnrf_bc_coeff = 0.693  # Biochar cnrf coefficient (0-1)
          cnrf_bc_optcn = 25  # Optimum cn ratio for bc
          bc_wfps_factor = 1  # Biochar WFPS factor (0-1)
          nh4_adsorption = 0.006  # Biochar nh4 absorption coefficient (Langmuir)
          nh4_desorption = 0.006  # Biochar nh4 desorption coefficient (Langmuir)
          # Tillage info
          tillage = 0.8  # % BD reduction due to tillage
          # Soil information
          soil_name = Soil  # Name of the soil as it appears in the simulation tree. This being wrong causes object reference errors.
          soil_order = Mollisol  # Order of the soil
          nclay_portion = 0.95  # Portion of soil clay that is nclay (0-1)
          uph = 9.3  # Soil upper ph
          lph = 3.5  # Soil lower ph
          ab_val = 0  # Acid - Base value
          bot_slope = 10  # Unit conversion for titration curve (use 10)
          # Switches for various biochar components (development purposes)
          decomp_switch = on  # Priming effects? (on/off)
          nitrification_switch = on  # Nitrification effects? (on/off)
          ph_switch = on  # PH effects ? (on/off)
          ll_switch = on  # LL and CLL effects? (on/off)
          dul_switch = on  # DUL effects ? (on/off)
          xf_switch = off  # XF effects? (on/off)
          kl_switch = off  # KL effects? (on/off)
          bd_switch = on  # BD effects? (on/off) (under development)
          biochar_c_switch = on  # Biochar module (on/off)
          swcon_switch = off  # SWCOM effects (on/off)
          ks_switch = off  # Ksat effects ? (on/off)
          sat_switch = on  # SAT effects? (on/off)
```csharp
using System;

using ModelFramework;

using CSGeneral;

 

public class Script
{     
   [Link] Paddock MyPaddock; // Can be used to dynamically get access to simulation structure and variables\
   [Input] DateTime Today; // Equates to the value of the current simulation date - value comes from CLOCK   
   [Input] double wf;      // Use the same water factor (SoilN)
   [Input] double[] oc; //Soil OC percent
   [Input] double[] ph; //Soil pH
   [Input] double[] nh4;
   [Input] double[] no3;
   [Input] double[] dlayer;
   [Input] double[] hum_c;
   [Input] double[] biom_c;
   [Input] double[] bd;
   [Input] double rain;
   [Input] double[] nit_tot;
   
   [Input] double[] no3_min; //Min NO3 in soil per layer
   [Input] double[] nh4_min; //Min NH4 in soil per layer
   double[] tf;      // Use the same temperature factor (SoilN)
  
   [Param] int biochar_added;      // in kg/ha
   [Param] double frac_c_biochar;  // C in biochar
   [Param] double biochar_loss;    // usually there is a loss during application that might impact calculations
   [Param] double MRT1;             // mean residence time for the labile biochar pool
   [Param] double MRT2;             // mean residence time for the resistant biochar pool
   [Param] double frac_labile;     // labile fraction of biochar; this depends on the biochar type - varies from 1 to 30%.
   [Param] double ef_biochar;      // efficiency of biochar retained in the system
   [Param] double fr_biochar_biom; // a small portion goes to BIOM (usually this is zero) and the rest goes to HUM
   [Param] double biochar_cn;         // CN ratio of the new biochar pool
   [Param] string date_of_application; //The date biochar was adde
   [Param] double sand; // Sand percent of soil
   [Param] double clay; //Clay percent of soil 
   [Param] string decomp_switch; //Whether or not biochar affects decomposition  
   [Param] string nitrification_switch; //Whether or not biochar affects nitrification
   [Param] string ph_switch; //whether biochar affects ph
   [Param] string ll_switch;
   [Param] string dul_switch;
   [Param] string xf_switch;
   [Param] string kl_switch;
   [Param] string bd_switch;
   [Param] string biochar_c_switch;
   [Param] string swcon_switch;
   [Param] string ks_switch;
   [Param] string sat_switch;
   [Param] double prim_hum;//priming effects
   [Param] double prim_biom;
   [Param] double prim_cell;
   [Param] double prim_carb;
   [Param] double prim_lign;
   [Param] double prim_fr;
   [Param] double prim_ef;
   [Param] double prim_fr_fom;
   [Param] double prim_ef_fom;
   [Param] string soil_name;
   [Param] double soil_cn; //C:N ratio of soil (SoilN)
   [Param] double biom_cn;
   [Param] double incorp_depth;
   [Param] double tillage;
   [Param] double dul_qual;
   [Param] double bd_qual;
   [Param] string soil_order;
   [Param] double nclay_portion;
   [Param] double bc_cce;
   [Param] double bc_cec;
   [Param] double cnrf_bc_coeff;
   [Param] double cnrf_bc_optcn;
   [Param] double uph;
   [Param] double lph;
   [Param] double ab_val;
   [Param] double bot_slope;
   [Param] double bc_wfps_factor;
   
   [Param] double nh4_adsorption;
   [Param] double nh4_desorption;

   [Output] double[] BiocharC;             // BiocharC = biochar_added * frac_c_biochar * biochar_loss
   [Output] double BiocharC_total;    // Ammount of biochar c in each individual soil layer
   [Output] double[] dlt_c_min_biochar;    // here I use a douple exponential function instead of a first order decay
   [Output] double[] dlt_c_biochar_co2;    // 1 - efficiency
   [Output] double[] dlt_c_biochar_biom;   //
   [Output] double[] dlt_c_biochar_hum;
   [Output] double[] dlt_n_min_biochar;
   [Output] double[] n_demand_bc;
   [Output] double[] n_avail_bc;
   [Output] double[] bc_nh4;
   [Output] double[] BiocharC_labile;
   [Output] double[] BiocharC_resistant;
   [Output] double BiocharC_labile_total;
   [Output] double BiocharC_resistant_total;
   [Output] double rd_hum_fac = 0.0, rd_fr_fom_fac = 0.0, rd_ef_fom_fac = 0.0; 
   [Output] double rd_biom_fac = 0.0, rd_carb_fac = 0.0, rd_cell_fac = 0.0, rd_lign_fac = 0.0, rd_ef_fac = 0.0, rd_fr_fac = 0.0;
   [Output] double[] saxon_bd;
   [Output] double[] saxon_sat;
   [Output] double[] till_bd;
   [Output] double[] till_sat;
   [Output] double[] cnr_bcf; //the cnrf_bc. called as such to avoid a name conflict with SurfaceOrganicMatter (need to look into)
   [Output] double[] scale_factor;
   [Output] double[] dlt_dlayer;
   [Output] double[] biochar_bd; //internal virtual bd for soil water
   [Output] double[] dlt_c_min_biochar_pot;
   [Output] double[] total_stress;
   
   private double[] init_soil_fac;



   //Debugging related output variables
   //How we communicate with other modules
   [Event] public event BiocharDecomposedDelegate BiocharDecomposed;
   [Event] public event BiocharAppliedDelegate BiocharApplied;
   
   private int dayApp;
   private int moApp;
   private int yearApp;
  
   //kb1 = labile pool, kb2 is resistant (decomp rate constants)
   private double kb1, kb2;
   
   //thisPH = conversion of soil pH, the rest are soil parameters
   private double[] thisPH, dul, ll15, sat, swcon, ks;
   //the date of application
   private DateTime date;
   //nh4 date
   private DateTime nh4_date;
   
   //The base titration value calcutated from default soil pH
   private double[] titrat_val;
   
   private double biochar_ph_value; //10^-(bc_ph)
   
   private double[] yesterday_oc; //OC from yesterday so we can compute delta
   private double rainAmt;
   private double[] initialBD;
   //The ratio of biochar mass in the soil to mass of that segment of soil
   private double[] MassComparison;
   //Respective mass of each layer, computed using bulk density on day 1
   private double[] LayerMass;
   
   private bool firstTill;
   private int till_depth_layer;
   private double q_ll;//Quality factors
   
   
   [Output] double[] soil_cec;
   [Output] double[] soil_cec_orig;
   
   [Output] double wfps_factor;
   

   // The following event handler will be called once at the beginning of the simulation
   [EventHandler] public void OnInitialised()
   {
      bc_nh4 = new double[oc.Length];
      thisPH = new double[ph.Length];
      soil_cec = new double[oc.Length];
      soil_cec_orig = new double[oc.Length];
      titrat_val = new double[oc.Length];
      MassComparison = new double[oc.Length];
      LayerMass = new double[oc.Length];
      biochar_bd = bd;
      for(int i = 0; i < ph.Length; i++)
      {
         thisPH[i] = ph[i];
         soil_cec[i] = get_soil_CEC(i);
         titrat_val[i] = 216.51*Math.Exp(ph[i]*(-0.91));
         soil_cec_orig[i] = get_soil_CEC(i);
         LayerMass[i] = bd[i] * dlayer[i] * 10000;
      }
      biochar_ph_value = Math.Pow(10, -bc_cce);
      
      //To convert MRT to kb
      
      kb1 = Math.Log(2.0) / (MRT1 * 365);
      kb2 = Math.Log(2.0) / (MRT2 * 365);
      
      init_soil_fac = new double[oc.Length];
      for (int i = 0; i < oc.Length; i++)
      {
         init_soil_fac[i] = 100 / (dlayer[i] * bd[i]);
      }
      
      //Only works for USA format dates - change in future? Maybe change input format?
      dayApp = Convert.ToInt32(date_of_application.Substring(3, 2));
      moApp = Convert.ToInt32(date_of_application.Substring(0, 2));
      yearApp = Convert.ToInt32(date_of_application.Substring(6, 4));
      
      date = new DateTime(yearApp, moApp, dayApp);
      
      
      BiocharC_labile = new double[oc.Length];
      BiocharC_resistant = new double[oc.Length];
      BiocharC = new double[oc.Length];
      
      firstTill = false;
      
      //initialize a lot of things
      dlt_c_biochar_co2 = new double[oc.Length];
      dlt_c_biochar_biom = new double[oc.Length];
      dlt_c_biochar_hum = new double[oc.Length];
      dlt_c_min_biochar = new double[oc.Length];
      dlt_n_min_biochar = new double[oc.Length];
      n_demand_bc = new double[oc.Length];
      n_avail_bc = new double[oc.Length];
      yesterday_oc = new double[oc.Length];
      saxon_bd = new double[oc.Length];
      saxon_sat = new double[oc.Length];
      till_bd = new double[oc.Length];
      till_sat = new double[oc.Length];
      cnr_bcf = new double[oc.Length];
      scale_factor = new double[oc.Length];
      dlt_dlayer = new double[oc.Length];
      dlt_c_min_biochar_pot = new double[oc.Length];
      total_stress = new double[oc.Length];
      
      rainAmt = 0.0;
      initialBD = bd;
      q_ll = 0.01;
    
   }

     
   //Called each daily timestep
   
   
   [EventHandler] void OnProcess()
   {
      //Delta arrays for each variable
      rainAmt += rain;
      
      double[] dlt_ks = new double[oc.Length];
      double[] dlt_dul = new double[oc.Length];
      double[] dlt_ll = new double[oc.Length];
      double[] dlt_bd = new double[oc.Length];
      double[] dlt_swcon = new double[oc.Length];
      double[] dlt_sat = new double[oc.Length];
      double[] dlt_hum = new double[oc.Length];
      double[] dlt_biom = new double[oc.Length];
      double[] dlt_ph = new double[oc.Length];
      double[] dlt_n_avail = new double[oc.Length];
      double[] dlt_biochar_c = new double[oc.Length];
      double[] bc_nh4_dlt = new double[oc.Length];
      double[] dlt_kl = new double[oc.Length];
      
      
      
      for (int i = 0; i < oc.Length; i++)//Since kl's effect is multiplicative, its default needs to be 1
         dlt_kl[i] = 1.0;
      
      //computeDULandBD(out saxon_dul, out saxon_bd, 0);
      //saxon_ll = computeLL(0);
      //saxon_sat = giveSAT(0);
      if (Today < date)
      {
         for (int i = 0; i < dlayer.Length; i++)
         {
            saxon_bd[i] = bd[i];
         }
      }
      if (Today == date)
         //Step 1
         applyBiochar();
      if (Today > date)
      {
         for (int i = 0; i < oc.Length; i++)//try looping through all layers
         {
            MyPaddock.Get(soil_name + " Nitrogen.tf", out tf);//This si why soil name needs to be an input parameter
         
            MassComparison[i] = (BiocharC[i] / frac_c_biochar)/(LayerMass[i]);
            double n_demand, dlt_n_min_tot_bc;
         
         //double rd_hum_fac = 0.0, rd_biom_fac = 0.0, rd_carb_fac = 0.0, rd_cell_fac = 0.0, rd_lign_fac = 0.0, rd_ef_fac = 0.0, rd_fr_fac = 0.0;
            double nh4_change;
         
            double new_ph;
            //Local variables for this specific soil layer
            double new_layer_ll, new_layer_bd, new_layer_dul, new_layer_ks, new_layer_sat, new_layer_swcon = 0.0;
            //step 2
            //When biochar functionality is expanded, every instance of a '0' method argument or array index will be changed to a layer index, and layers that biochar 
            //alters will be iterated over in a for loop, but for now biochar only changes the first layer
            dlt_c_min_biochar[i] = computeDailyBCCarbDecomp(i);
            //step 3
            computeDLTs(out dlt_c_biochar_biom[i], out dlt_c_biochar_hum[i], out dlt_c_biochar_co2[i], dlt_c_min_biochar[i]);
            //step 4 -inactive
            
         
            n_demand = getNDemand(dlt_c_biochar_biom[i], dlt_c_biochar_hum[i]);
            dlt_n_min_tot_bc = computeNFromDecomp(dlt_c_min_biochar[i]);
         
            n_demand_bc[i] = n_demand;
            n_avail_bc[i] = dlt_n_min_tot_bc;
            dlt_n_min_biochar[i] = dlt_n_min_tot_bc - n_demand; //This will get added to dlt_n_min_tot I think
            //Step 5 happens in model
         
            //Step 6 
         
            get_rd_factors(out rd_hum_fac, out rd_biom_fac, out rd_carb_fac, out rd_cell_fac, out rd_lign_fac, 
               out rd_ef_fac, out rd_fr_fac, out rd_ef_fom_fac, out rd_fr_fom_fac, i);
            
            //Step 7 
         
            nh4_change = get_NH4_changes(i);
            //Step 8
         
            soil_cec[i] = get_new_cec(i);
            new_ph = get_new_ph(i);
         
            //For computing delta locally.
         
            getCurrentSoilWatValues();
         
         
            //Step 9
            new_layer_ll = computeLL(i);
            computeDULandBD(out new_layer_dul, out new_layer_bd, i);
            
            //new_layer_sat = giveSAT(i); //Active but not being used
            /**
            new_layer_swcon = computeSWCON(0, new_layer_sat, new_layer_bd); 
            new_layer_ks = computeKS(0, new_layer_sat, new_layer_dul, new_layer_ll);
            **/
         
         
            //End of steps
            /**
            * The biochar decomposed event requires that changes be in terms of delta. 
            * However, our equations give the total value, not the change, so we must compute
            * the change within this script.
            **/
            //dlt_ks[0] = new_layer_ks - ks[0];
            dlt_dul[i] = new_layer_dul;// -dul[i];
            dlt_ll[i] = new_layer_ll;// -ll15[i];
        
         
         
         //not actually a delta, model stops working if it is. Instead, is the next wanted value of bd
            if (BiocharC[i] != 0.0)
            {
               dlt_bd[i] = new_layer_bd + saxon_bd[i];
            }
            else
               dlt_bd[i] = initialBD[i];
            
         
            dlt_hum[i] = dlt_c_biochar_hum[i];
            dlt_biom[i] = dlt_c_biochar_biom[i];
         
            dlt_biochar_c[i] = dlt_c_min_biochar[i];
         
            dlt_ph[i] = new_ph - ph[i];
         
            dlt_n_avail[i] = dlt_n_min_biochar[i];
         
            bc_nh4_dlt[i] = nh4_change;
            if (kl_switch.Equals("on")) //So that kl does not go to 0
               dlt_kl[i] = 1; //what became of step 10
            
            
         }
            //End of loop
            //The data structure for our decomposition event
            BiocharDecomposedType BiocharDecomp = new BiocharDecomposedType();
         
         getCurrentSoilWatValues();
         //region for andales saxon mergeing - to later integrate with 
         double[] andales_bd = AndalesBD();
         double[] bd_new = biggest_bd_dlt(dlt_bd, andales_bd);
         double[] sat_dlt_new = sat_in_terms_of_dlt(bd_new);
         
         for (int i = 0; i < oc.Length; i++)
         {
            double temp;
            saxon_sat[i] = (-(dlt_bd[i] - saxon_bd[i]) / 2.65) * 0.9 + sat[i];
            saxon_bd[i] = dlt_bd[i];
            till_bd[i] = andales_bd[i];
            till_sat[i] = ( -(andales_bd[i] - biochar_bd[i]) / 2.65) * 0.9 + sat[i];
            temp = 100 / (bd_new[i] * init_soil_fac[i]);
            dlt_dlayer[i] = temp - dlayer[i];
         }
         
         biochar_bd = bd_new;
            //Script control area
            if (dul_switch.Equals("on"))
            {
               BiocharDecomp.dlt_dul = dlt_dul;
            }
            if (ll_switch.Equals("on"))
            {
               BiocharDecomp.dlt_ll = dlt_ll;
            }
            if (sat_switch.Equals("on"))
            {
               BiocharDecomp.dlt_sat = sat_dlt_new;
            }
         //Since errors occur if bd is in terms of delta, we need to ensure that if bd is off, we still get what we want
            if(bd_switch.Equals("on"))
            {
            BiocharDecomp.dlt_bd = bd;   
            //BiocharDecomp.dlt_bd = bd_new;
               //MyPaddock.Set("dlt_dlayer", dlt_dlayer);
            }
            else 
            {
               BiocharDecomp.dlt_bd = bd;
            }
            if (swcon_switch.Equals("on"))
            {
               BiocharDecomp.dlt_swcon = dlt_swcon;
            }
            if (ks_switch.Equals("on"))
            {
               BiocharDecomp.dlt_ks = dlt_ks;
            }
         
         
            if (biochar_c_switch.Equals("on"))
            {
               BiocharDecomp.hum_c = dlt_hum;
               BiocharDecomp.biom_c = dlt_biom;
               BiocharDecomp.dlt_biochar_c = dlt_biochar_c;
            }
         
            if (nitrification_switch.Equals("on"))
            {
               BiocharDecomp.bc_nh4_change = bc_nh4_dlt;
            }
         
            if (decomp_switch.Equals("on"))
            {
               BiocharDecomp.dlt_rd_hum = rd_hum_fac;
               BiocharDecomp.dlt_rd_biom = rd_biom_fac;
               BiocharDecomp.dlt_rd_carb = rd_carb_fac;
               BiocharDecomp.dlt_rd_cell = rd_cell_fac;
               BiocharDecomp.dlt_rd_lign = rd_lign_fac;
               BiocharDecomp.dlt_rd_ef = rd_ef_fac;
               BiocharDecomp.dlt_rd_fr = rd_fr_fac;
            BiocharDecomp.dlt_rd_ef_fom = rd_ef_fom_fac;
            BiocharDecomp.dlt_rd_fr_fom = rd_fr_fom_fac;
            
            }
         
         
            BiocharDecomp.dlt_n_biochar = dlt_n_avail;
            if (ph_switch.Equals("on"))
            {
               BiocharDecomp.dlt_ph = dlt_ph;
            }
         
         BiocharDecomp.bc_wfps_factor = 1.0 - this.bc_wfps_factor;
         
         
            BiocharDecomp.dlt_kl = dlt_kl; //Since KL is a multiplicative effect, if we do not always assign this KL will go to 0
            //If uninitialized, it is 0 by default
         
            BiocharDecomposed.Invoke(BiocharDecomp);
         Console.WriteLine("Biochar bd: " + biochar_bd[0]);
         
         
      }
      
      
      for (int i = 0; i < oc.Length; i++)
         yesterday_oc[i] = oc[i]; //Make a deep copy
      
      
   }
      
   
   //Step 1 section
   private void applyBiochar()
   {
      /**
      * This puts the proper amount of biochar into the necessary soil layers
      * based off of how deeply the biochar was applied, assuming even distribution
      * of BC throughout its application range. Based off an implementation already 
      * in APSIM.
      **/
      wfps_factor = 1.0 - bc_wfps_factor;
      double depth_so_far = 0.0;
      double depth_to_go;
      double frac_bc_layer;
      double layer_incorp_depth;
      for (int i = 0; i < dlayer.Length; i++)
      {
         depth_to_go = incorp_depth - depth_so_far;
         if (depth_to_go <= 0.0)
            depth_to_go = 0.0;
         layer_incorp_depth = Math.Min(depth_to_go, dlayer[i]);
         frac_bc_layer = layer_incorp_depth / incorp_depth;
         BiocharC[i] = biochar_added * frac_c_biochar * (1 - biochar_loss) * frac_bc_layer;
         BiocharC_labile[i] = BiocharC[i] * frac_labile;
         BiocharC_resistant[i] = BiocharC[i] * (1 - frac_labile);
         
         depth_so_far += dlayer[i];
      }
      BiocharAppliedType BioApp = new BiocharAppliedType();
      double[] bc_carb_applied = new double[oc.Length];
      for (int i = 0; i < bc_carb_applied.Length; i++)
         bc_carb_applied[i] = BiocharC[i];
      
      BioApp.bc_carbon_ammount = bc_carb_applied;
      BiocharApplied.Invoke(BioApp);
         
      Console.WriteLine("Biochar has been applied \nAmmount: " + biochar_added + " kg/ha" + "\nDepth: " + incorp_depth + " (mm)");
      sumSoilBCFirstTime();
      
   
   }
   //Step 2 section
   
   private double computeDailyBCCarbDecomp(int layer)
   {
      double pot_hum, pot_biom, pot_co2, pot_tot;
      cnr_bcf[layer] = calculateCNR_BCF(layer);
      calculatePotentialDecomp(layer, cnr_bcf[layer], out pot_hum, out pot_biom, out pot_co2, out pot_tot);
      scale_factor[layer] = calculateScale(layer, pot_biom, pot_hum, pot_tot);
      
      
      return calculateActualDecomp(layer, scale_factor[layer], cnr_bcf[layer]);
   }
   
   //Helper methods for biochar decomposition
   
   private double calculateCNR_BCF (int layer)
   {
      double cnr_bc; //Biochar cn ratio for decomposition
      double n_available_cnr; // Potential nitrogen available for bc decomposition?
      
      //bc available N + mineral N in layer
      n_available_cnr = (BiocharC_labile[layer] / biochar_cn) + nh4[layer] - nh4_min[layer] + no3[layer] - no3_min[layer];
      if (n_available_cnr != 0.0)
         cnr_bc = (BiocharC_labile[layer] / n_available_cnr);
      else
         cnr_bc = 0.0;
      
      
      double cnrf_bc = Math.Exp(-cnrf_bc_coeff * (cnr_bc - cnrf_bc_optcn) / cnrf_bc_optcn);
      if (cnrf_bc > 1)
         cnrf_bc = 1;
      if (cnrf_bc < 0)
         cnrf_bc = 0;
      
      return cnrf_bc;
   }
   
   private void calculatePotentialDecomp(int layer, double cnrf_bc, out double pot_hum, out double pot_biom, out double pot_co2, out double pot_tot)
   {
      double pot_labile = BiocharC_labile[layer] * kb1 * Math.Min( Math.Min(wf , tf[layer]) , cnrf_bc);
      double pot_resist = BiocharC_resistant[layer] * kb2 * Math.Min( Math.Min(wf , tf[layer]) , cnrf_bc);
      
      pot_tot = pot_labile + pot_resist;
      dlt_c_min_biochar_pot[layer] = BiocharC_labile[layer] * kb1 + BiocharC_resistant[layer] * kb2;
      total_stress[layer] = Math.Min( Math.Min(wf , tf[layer]) , cnrf_bc);
      pot_co2 = pot_tot * (1 - ef_biochar);
      pot_biom = pot_tot * ef_biochar * fr_biochar_biom;
      pot_hum = pot_tot * ef_biochar * (1 - fr_biochar_biom);
   }
   
   private double calculateScale(int layer, double pot_biom, double pot_hum, double pot_tot)
   {
      double bc_n_min_tot = pot_tot / biochar_cn;
      double n_demand = (pot_biom / biom_cn) + (pot_hum / soil_cn);
      //Calculate n available from mineral n
      double n_avail = nh4[layer] - nh4_min[layer] + no3[layer] - no3_min[layer] + bc_n_min_tot;
      
      double scale_of;
      
      if (n_demand > n_avail)
      {
         scale_of = (nit_tot[layer] / (n_demand - bc_n_min_tot));
         if (scale_of > 1)
            scale_of = 1;
         
      }
      else
         scale_of = 1;
      
      return scale_of;
      
   }
   
   //Performs the actual decomposition of biochar, based off of the limitations the potential runs into
   private double calculateActualDecomp(int layer, double scale_of, double cnrf_bc)
   {
      double decomp1 = BiocharC_labile[layer] * kb1 * Math.Min( Math.Min(wf , tf[layer]) , cnrf_bc) * scale_of;
      BiocharC_labile[layer] -= decomp1;
      double decomp2 = BiocharC_resistant[layer] * kb2 * Math.Min( Math.Min(wf , tf[layer]) , cnrf_bc) * scale_of;
      BiocharC_resistant[layer] -= decomp2;
      if (BiocharC_labile[layer] < 0)
         BiocharC_labile[layer] = 0;
      if (BiocharC_resistant[layer] < 0)
         BiocharC_resistant[layer] = 0;
      
      
      BiocharC[layer] = BiocharC_labile[layer] + BiocharC_resistant[layer]; //Remove decomposed ammount from biochar pool
      
      updateSoilBCTotals(layer);
      return decomp1 + decomp2;
   }
   
   //End of decomposition helper methods
   
   //Computes the changes in co2, biom c and humic c due to a change in biochar c
   
   //Step 3 section
   
   private void computeDLTs(out double dlt_c_biochar_biom, out double dlt_c_biochar_hum, out double dlt_c_biochar_co2, double dlt_c_min_biochar)
   {
      dlt_c_biochar_co2 = dlt_c_min_biochar * (1 - ef_biochar);
      dlt_c_biochar_biom = dlt_c_min_biochar * ef_biochar * fr_biochar_biom;
      dlt_c_biochar_hum = dlt_c_min_biochar * ef_biochar * (1 - fr_biochar_biom);
      
      
   }
   
   
   
   //Step 4 section 
   
   private double getNDemand(double dlt_c_biochar_biom, double dlt_c_biochar_hum)
   {
      return (dlt_c_biochar_biom / biom_cn) + (dlt_c_biochar_hum / soil_cn);  // this biochar n demand, n_demand_bc
   }
   
   private double computeNFromDecomp(double dlt_c_min_biochar) 
   {
      return (dlt_c_min_biochar / biochar_cn); // this is n released during biochar decomposition, n_avail_bc
   }
   
   
   
   //Step 5 happens within the apsim model itself 
   
   //Step 6 
   private void get_rd_factors(out double rd_hum_fac, out double rd_biom_fac, out double rd_carb_fac,
      out double rd_cell_fac, out double rd_lign_fac, out double rd_ef_fac, out double rd_fr_fac, out double rd_ef_fom_fac,
      out double rd_fr_fom_fac, int layer)
   {
      
         rd_hum_fac = (prim_hum * BiocharC_total / 10000);
         rd_biom_fac = (prim_biom * BiocharC_total / 10000);
         rd_carb_fac = (prim_carb * BiocharC_total / 10000);
         rd_cell_fac = (prim_cell * BiocharC_total / 10000);
         rd_lign_fac = (prim_lign * BiocharC_total / 10000);
         rd_ef_fac = (prim_ef * BiocharC_total / 10000);
         rd_fr_fac = (prim_fr * BiocharC_total / 10000);
         rd_ef_fom_fac = (prim_ef_fom * BiocharC_total / 10000);
         rd_fr_fom_fac = (prim_fr_fom * BiocharC_total / 10000);
         
         
         
      
   }
   
   //Step 7 big work here pretty sure does not matter ppm or kg/ha since both related by constant
   
   private double get_NH4_changes(int layer)
   {
      if (BiocharC[layer] > 0.0)
      {
         double cec_ratio = soil_cec[layer] / soil_cec_orig[layer];
         double nh4_absorbed = nh4[layer] * cec_ratio * nh4_adsorption / (1 + cec_ratio * nh4_adsorption);
         double nh4_desorbed = bc_nh4[layer] * cec_ratio * nh4_desorption / (1 + cec_ratio * nh4_desorption);
         double nh4_change = nh4_desorbed - nh4_absorbed;
         bc_nh4[layer] = bc_nh4[layer] - nh4_change;
         return nh4_change;
      }
      else 
         return 0.0;
   }
   
   
   //Step 8
   private double get_new_ph(int layer)
   {
      return compute_ph_equation(soil_cec[layer], ab_val, layer) + compute_bc_limeing(layer);
     
      
      
   }
   
   
   //Step 9 area - Changes to DUL and LL and the like 

   
   private double computeLL(int layer)
   {
      
     
      double dlt_oc = oc[layer] - yesterday_oc[layer];
      
      //double ll15_temp = -0.024 * sand + 0.487 * clay + 0.006 * om + 0.005 * sand * om - 0.013 * clay * om + 0.068 * sand * clay + 0.031;
      //ll15_temp = ll15_temp + 0.14 * ll15_temp - 0.02;
      if (BiocharC[layer] != 0.0)
      {
         return q_ll * (0.0118 + 0.0098 * sand - 0.0255 * clay) * dlt_oc;
      }
      else 
         return 0.0;
      
   }
   
   //Returns a two element array containing values used in computing DUL and bd for a specific layer, as well as in sat
   private double[] computeDULMidway(int layer)
   {
      
      double om;
      //four temporary values needed 
      double temp1, temp2, temp3, temp4;
      
      //Based off of documentation equations
      
     /**
      temp1 = -0.251 * sand + 0.195 * clay + 0.011 * om + 0.006 * sand * om - 0.027 * clay * om + 0.452 * sand * clay + 0.299;//dula
      temp1 = temp1 + (1.283 * temp1 * temp1 - 0.374 * temp1 - 0.015);//dulb
      temp2 = -0.097 * sand + 0.043;//dulc
      temp3 = 0.278 * sand + 0.034 * clay + 0.022 * om - 0.018 * sand * om - 0.027 * clay * om - 0.584 * sand * clay + 0.078;//duld
      temp3 = temp3 + (0.636 * temp3 - 0.107);//dule
      temp4 = temp1 + temp3;//dulf
      temp4 = temp4 + temp2;//dulg
      **/
      
      //Returns return[0] = DULh from documentation, return[1] = DULb from documentation, as both values are needed elsewhere
      return new double[] {0.0, 0.0};
      
      
      
   }
   
   //Computes DUL and BD based off of changes to soil OC due to biochar in that layer
   private void computeDULandBD(out double layer_dul, out double layer_bd, int layer)
   {
      
      
      double dlt_oc = oc[layer] - yesterday_oc[layer];
      
      double q_dul = 1.3067 * Math.Exp(-dul_qual * oc[layer]);
      double q_bd = 1.3067 * Math.Exp(-bd_qual * oc[layer]);
      /**
      midDUL = computeDULMidway(layer);
      BDa = midDUL[0] * df;
      
      gravels = ((BDa / 2.65) * gravelw) / (1 - gravelw * (1 - BDa / 2.65));
      **/
      if (BiocharC[layer] != 0.0)
      {
         layer_bd = q_bd * (-0.2332 + 0.115 * sand + 0.35 * clay) * dlt_oc;
      
         layer_dul = q_dul * (0.0261 + 0.0072 * sand - 0.0561 * clay) * dlt_oc;
      }
      else
      {
         layer_bd = 0.0;
         layer_dul = 0.0;
      }
      
      
      
   }
      
   //Gives the SAT for a given layer based off of the layer's newly computed bulk density
   /**
   private double giveSAT (int layer)
   {
      
      
      
      double dlt_oc = oc[layer] - yesterday_oc[layer];
      if (BiocharC[layer] != 0.0)
      {
         return ( 0.0836 - 0.0412 * sand - 0.1255 * clay)  * dlt_oc;
      }
      else
         return 0.0;
   }
   **/
   
   //deprecated
   private double computeKS(int layer, double layer_sat, double layer_dul, double layer_ll)
   {
      return 0.0;
      
      
   }
   //deprecated
   private double computeSWCON(int layer, double layer_sat, double layer_dul)
   {
      double SWCON = (layer_sat / 0.95 - layer_dul) / (layer_sat / 0.95);
      
      return SWCON;
      
   }
   
   //Gets the current values of various soil water associated variables so we can compute our dlts based off of the difference
   private void getCurrentSoilWatValues()
   {
      
      MyPaddock.Get(soil_name + " Water.dul", out dul);
      MyPaddock.Get(soil_name + " Water.ll15", out ll15);
      MyPaddock.Get(soil_name + " Water.sat", out sat);
      //MyPaddock.Get(soil_name + " Water.bd", out bd);
      MyPaddock.Get(soil_name + " Water.swcon", out swcon); //doesn't work
      MyPaddock.Get(soil_name + " Water.ks", out ks);
   }
   

   //Updates the total amount of soil biochar in the system. We need to make how this is done better, so it is only run once,
   //as it is a O(n) operation being run within a O(n) operation, making our whole daily algorithm O(n^2) when it doesn't 
   //need to be. Done?
   private void updateSoilBCTotals(int layer)
   {
      if (layer == 0)//Zero all values the first time this is called each day
      {
         BiocharC_total = 0;
         BiocharC_labile_total = 0;
         BiocharC_resistant_total = 0;
      }
      BiocharC_total += BiocharC[layer];
      BiocharC_labile_total += BiocharC_labile[layer];
      BiocharC_resistant_total += BiocharC_resistant[layer];
   }
   
   
   //Special method that sums the total BC in the system. Used only during the apply biochar process.
   private void sumSoilBCFirstTime()
   {
      BiocharC_total = 0;
      BiocharC_labile_total = 0;
      BiocharC_resistant_total = 0;
      for (int i = 0; i < dlayer.Length; i++)
      {
         BiocharC_total += BiocharC[i];
         BiocharC_labile_total += BiocharC_labile[i];
         BiocharC_resistant_total += BiocharC_resistant[i];
      }
      
   }
   //For the andales methods of bd
   [EventHandler] void OnTillage(TillageType Till)
   {
      firstTill = true;
      
      rainAmt = 0.0;
      float depth = Till.tillage_depth;
      for (int i = 0; i < oc.Length; i++)
      {
         depth -= (float) dlayer[i];
         till_depth_layer = i;
         if ( depth <= 0)
         {
            break;  
         }
         
      }
   }
   //Method that gives BD computed with the andales equation
   private double[] AndalesBD()
   {
      double[] ret = new double[oc.Length];
      double q_bd; 
      double q_const = 1.3067;
      
      for (int layer = 0; layer < ret.Length; layer++)
      {
         if (oc[layer] < 0.5)
            q_const = 1.8067;
         if (firstTill && layer <= till_depth_layer)
         {
            q_bd = q_const * Math.Exp(-bd_qual * oc[layer]);
            ret[layer] = q_bd * (tillage * initialBD[layer] - initialBD[layer]) * Math.Exp(-(5 * (1 - 0.205 * oc[layer])) * rainAmt * 0.00217);//Based off of Andales equation
            ret[layer] = ret[layer] + initialBD[layer];
            if (ret[layer] < initialBD[layer] - ((1.0 - tillage) * initialBD[layer] * q_bd))//really confusing. basically if it is lower than it could possibly be (the andales equation fails to capture reality for oc > 4.8) 
               ret[layer] = initialBD[layer] - ((1.0 - tillage) * initialBD[layer] * q_bd);// we set it to the lowest possible and regard it as (mostly) constant
         }
         else
            ret[layer] = initialBD[layer];
      }
      
      return ret;
   }
   //Computes the biggest delta associated with bd
   private double[] biggest_bd_dlt(double[] dlt_bd, double[] andales_bd)
   {
      double[] ret = new double[saxon_bd.Length];
      for (int layer = 0; layer < oc.Length; layer++)
      {
         if (Math.Abs(dlt_bd[layer] - initialBD[layer])>= Math.Abs(andales_bd[layer] - initialBD[layer]))
         {
            ret[layer] = dlt_bd[layer];
         }
         else
            ret[layer] = andales_bd[layer];
      }
      
      return ret;
   }
   
   private double[] sat_in_terms_of_dlt(double[] bd_new)
   {
      double[] ret = new double[bd_new.Length];
      if (bd_switch == "on")
      {
         for (int layer = 0; layer < bd_new.Length; layer++)
         {
         
         
            ret[layer] = (-(bd_new[layer] - biochar_bd[layer]) / 2.65) * 0.9;
         
         }
      }
      else//still need SAT estimation if no bd change... (old... maybe unneccessary with new change?? but then bd off is unmeaningful)
      {
         for (int layer = 0; layer < oc.Length; layer++)
         {
            double dlt_oc = oc[layer] - yesterday_oc[layer];
            if (BiocharC[layer] != 0.0)
            {
               ret[layer] = ( 0.0836 - 0.0412 * sand - 0.1255 * clay) * dlt_oc;
            }
            else
               ret[layer] = 0.0;
            
         }
      }
      return ret;
   }
   
   
   //Computes soil CEC on the first day of the simulation to have a constant value for soil CEC
   //Which is later used as a base for when BC is applied (i am not sure if we should maintain pH at all?)
   private double get_soil_CEC(int layer)
   {
      if (soil_order == "Aridisol")
      {
         return Math.Exp(0.042 * Math.Log(oc[layer]) + 0.828 * Math.Log(nclay_portion * clay * 100) + 0.236);
      }
      else if (soil_order == "Entisol")
      {
         return Math.Exp(0.078 * Math.Log(oc[layer]) + 0.873 * Math.Log(nclay_portion * clay * 100) + 0.084);
      }
      else if (soil_order == "Gelisol")
      {
         return Math.Exp(0.359 * Math.Log(oc[layer]) + 0.49 * Math.Log(nclay_portion * clay * 100) + 1.05);
      }
      else if (soil_order == "Inceptisol")
      {
         return Math.Exp(0.134 * Math.Log(oc[layer]) + 0.794 * Math.Log(nclay_portion * clay * 100) + 0.239);
      }
      else if (soil_order == "Mollisol")
      {
         if (oc[layer] < 0.3)
            return Math.Exp(0.932 * Math.Log(nclay_portion * clay * 100) - 0.174);
         else
            return Math.Exp(0.113 * Math.Log(oc[layer]) + 0.786 * Math.Log(nclay_portion * clay * 100) + 0.475);
      }
      else if (soil_order == "Vertisol")
      {
         return Math.Exp(0.059 * Math.Log(oc[layer]) + 0.86 * Math.Log(nclay_portion * clay * 100) + 0.312);
      }
      else if (soil_order == "Histosol")
      {
         return Math.Exp(0.319 * Math.Log(oc[layer]) + 0.497 * Math.Log(nclay_portion * clay * 100) + 1.075);
      }
      else if (soil_order == "Alfisol")
      {
         if (oc[layer] < 0.3)
            return Math.Exp(0.911 * Math.Log(nclay_portion * clay * 100) - 0.308);
         else
            return Math.Exp(0.158 * Math.Log(oc[layer]) + 0.805 * Math.Log(nclay_portion * clay * 100) + 0.216);
      }
      else if (soil_order == "Spodosol")
      {
         return Math.Exp(0.045 * Math.Log(oc[layer]) + 0.798 * Math.Log(nclay_portion * clay * 100) + 0.029);
      }
      else if (soil_order == "Ultisol")
      {
         return Math.Exp(0.184 * Math.Log(oc[layer]) + 0.57 * Math.Log(nclay_portion * clay * 100) + 0.365*Math.Log((1 - clay - sand)*100) - 0.906);       
      }
      else if (soil_order == "Oxisol")
      {
         return 2.738 * oc[layer] + 0.103 * nclay_portion * clay * 100 + 0.123 * (100*(1 - clay - sand)) - 2.531;
      }
      else 
         return 20.0;
      
   }
   //Computes a new biochar adjusted value for soil CEC
   private double get_new_cec(int layer)
   {
      return soil_cec_orig[layer] * (1 - MassComparison[layer]) + bc_cec * MassComparison[layer];
   }
   //Computes a value for soil pH based off of the given values for CEC and acid, using that layer's particular titration curve value
   private double compute_ph_equation(double cec_val, double acid, int layer)
   {
      return (uph - lph) / (1 + titrat_val[layer] * Math.Exp(-acid/cec_val)) + lph;
   }
   //Computes a value that describes the lime effect that biochar has on soils
   private double compute_bc_limeing(int layer)
   {
      double bc_alkaline = MassComparison[layer] * bc_cce;
      return bc_alkaline * (uph - thisPH[layer]) * (thisPH[layer] - lph) * bot_slope / ((uph - lph) * soil_cec[layer]); 
   }
      

//TODO sand clay gravelw into arrays and gotten from simulation
  

}
```
        folder Manager folder1
          manager Harvesting and remove1
            # Harvesting criteria
            crop = cotton  # Enter name of crop to harvest when ripe
            # Tillage criteria
            surfaceom = SurfaceOrganicMatter  # Name of surface organic matter module
            removal = 0  # Removal fraction (0-1)
            on end_of_day:
```
           if ('[crop]' = 'cotton') then

               !!  cotton defoliation
                if ([crop].stageName = 'mature'  and  [crop].defol_das = 0) then
                    [crop] defoliate
                endif
          
                !! cotton harvest
                if ([crop].stageName = 'harvest_ripe' or [crop].PlantStatus = 'dead') then
                   !!report_harvest do_output
                   [crop] harvest
                   [crop] end_crop
                   '[surfaceom]' tillage type = user_defined, f_incorp = [removal] (), tillage_depth = 0.0 ()
                endif

           endif
```
          manager Harvesting and remove2
            # Harvesting criteria
            crop = sorghum  # Enter name of crop to harvest when ripe
            # Tillage criteria
            surfaceom = SurfaceOrganicMatter  # Name of surface organic matter module
            removal = 0  # Removal fraction (0-1)
            on end_of_day:
```
           if ('[crop]' = 'cotton') then
              if ([crop].ozcot_status > 0) then
                  [crop] harvest
              endif
           elseif ([crop].StageName = 'harvest_ripe' or [crop].plant_status = 'dead') then
              [crop]  harvest
              [crop]  end_crop
              '[surfaceom]' tillage type = user_defined, f_incorp = [removal] (), tillage_depth = 0.0 ()
           endif
```
        Soil: SoilType=Kalamazoo:187069; Site=Liberty Research Farm; NearestTown=Lubbock; State=TX; Country=USA; ApsoilNumber=0; Latitude=33.684; Longitude=-101.768; YearOfSampling=0
          DataSource=SSURGO (https://sdmdataaccess.nrcs.usda.gov/) through R package soilDB, R package apsimx function ssurgo2sp. Timestamp 2022-10-02 21:52:50
          Comments=cokey = 22386986 - acres percent = 95 - component percent = 95 - taxonomic classification name = Fine-loamy, mixed, active, mesic Typic Hapludalfs - drainage class = Well drained - elevation = 275 - slope = 3 - geomdesc = Head Slope, Interfluve, Nose Slope, Side Slope
          Water
            Thickness  BD    AirDry  LL15   DUL    SAT    KS
            50         1.27  0.0923  0.1    0.18   0.52   2154.5
            100        1.36  0.092   0.1    0.18   0.488  1619.9
            210        1.66  0.1034  0.109  0.198  0.374  328.8
            210        1.58  0.1777  0.182  0.293  0.404  82.9
            520        1.61  0.1646  0.166  0.274  0.396  105.4
            940        1.65  0.1305  0.13   0.222  0.377  238.7
            BD, DUL source: Field measured and checked for sensibility (layer 1, 2, 3, 4, 5)
            AirDry, LL15 source: Estimated based on local knowledge (layer 1, 2, 3, 4, 5)
            SAT source: Calculated from measured, estimated or calculated BD (layer 1, 2, 3, 4, 5)
            SoilCrop cotton: LL=[0.1, 0.1, 0.109, 0.182, 0.166, 0.13]; KL=[0.06, 0.0491, 0.0402, 0.0329, 0.027, 0.0221]; XF=[1, 1, 1, 1, 1, 1]
              LL source: Field measured and checked for sensibility (layer 1, 2, 3, 4, 5)
            SoilCrop sorghum: same as LFR.scen_2_61.paddock.Soil.Water.cotton
          SoilWater: SummerCona=3.5; SummerU=6; SummerDate=1-Nov; WinterCona=2.5; WinterU=4; WinterDate=1-Apr; DiffusConst=40; DiffusSlope=16; Salb=0.13; CN2Bare=73; CNRed=20; CNCov=0.8; Thickness=[50, 100, 210, 210, 520, 940]; SWCON=[0.4, 0.4, 0.4, 0.4, 0.4, 0.4]
          SoilOrganicMatter: RootCN=25; RootWt=1000; SoilCN=12; EnrACoeff=7.4; EnrBCoeff=0.2; OCUnits=WalkleyBlack
            Thickness  OC    FBiom   FInert
            50         0.11  0.04    0.8
            100        0.11  0.0327  0.808
            210        0.11  0.0268  0.816
            210        0.1   0.022   0.824
            520        0.1   0.018   0.833
            940        0.1   0.0147  0.841
            OC source: Estimated based on local knowledge (layer 1, 2, 3, 4, 5)
          Analysis: PHUnits=Water; BoronUnits=HotWater
            Thickness  PH    CEC  ParticleSizeSand  ParticleSizeSilt  ParticleSizeClay
            50         7.43  216  67                16                17
            100        7.43  212  67                16                17
            210        8     219  62                19.6              18.4
            210        8     221  48                21.7              30.3
            520        8.15  205  50.2              22.1              27.6
            940        8.4   183  60                18.1              21.9
            PH source: Estimated based on local knowledge (layer 1, 2, 3, 4, 5)
          InitialWater: FractionFull=1; PercentMethod=FilledFromTop; RelativeTo=cotton
          Sample InitialNitrogen: NO3Units=kgha; NH4Units=kgha; SWUnits=Volumetric; OCUnits=Total; PHUnits=Water
            Thickness  NO3    NH4     OC    PH
            50         0.5    0.05    0.11  7.43
            100        0.495  0.0495  0.11  7.43
            210        0.49   0.049   0.11  8
            210        0.485  0.0485  0.1   8
            520        0.48   0.048   0.1   8.15
            940        0.45   0.047   0.1   8.4
          ini: filename=Soil.xml
        operations Operations Schedule
          28/04/1987  surfaceorganicmatter tillage type = user_defined, f_incorp = 0.9, tillage_depth = 150
          28/04/1987  fertiliser apply amount = 10 (kg/ha), depth = 50 (mm), type = NO3_N
          20/05/1987  surfaceorganicmatter tillage type = user_defined, f_incorp = 0.1, tillage_depth = 80
          20/05/1987  cotton sow plants = 12, sowing_depth = 25.4, cultivar = s324, row_spacing = 1010, crop_class = plant
          28/04/1988  surfaceorganicmatter tillage type = user_defined, f_incorp = 0.9, tillage_depth = 150
          28/04/1988  fertiliser apply amount = 10 (kg/ha), depth = 50 (mm), type = NO3_N
          20/05/1988  surfaceorganicmatter tillage type = user_defined, f_incorp = 0.1, tillage_depth = 80
          20/05/1988  cotton sow plants = 12, sowing_depth = 25.4, cultivar = s324, row_spacing = 1010, crop_class = plant
          28/04/1989  surfaceorganicmatter tillage type = user_defined, f_incorp = 0.9, tillage_depth = 150
          28/04/1989  fertiliser apply amount = 10 (kg/ha), depth = 50 (mm), type = NO3_N
          20/05/1989  surfaceorganicmatter tillage type = user_defined, f_incorp = 0.1, tillage_depth = 80
          20/05/1989  cotton sow plants = 12, sowing_depth = 25.4, cultivar = s324, row_spacing = 1010, crop_class = plant
          28/04/1990  surfaceorganicmatter tillage type = user_defined, f_incorp = 0.9, tillage_depth = 150
          28/04/1990  fertiliser apply amount = 10 (kg/ha), depth = 50 (mm), type = NO3_N
          20/05/1990  surfaceorganicmatter tillage type = user_defined, f_incorp = 0.1, tillage_depth = 80
          20/05/1990  cotton sow plants = 12, sowing_depth = 25.4, cultivar = s324, row_spacing = 1010, crop_class = plant
          28/04/1991  surfaceorganicmatter tillage type = user_defined, f_incorp = 0.9, tillage_depth = 150
          28/04/1991  fertiliser apply amount = 10 (kg/ha), depth = 50 (mm), type = NO3_N
          20/05/1991  surfaceorganicmatter tillage type = user_defined, f_incorp = 0.1, tillage_depth = 80
          20/05/1991  cotton sow plants = 12, sowing_depth = 25.4, cultivar = s324, row_spacing = 1010, crop_class = plant
          28/04/1992  surfaceorganicmatter tillage type = user_defined, f_incorp = 0.9, tillage_depth = 150
          28/04/1992  fertiliser apply amount = 10 (kg/ha), depth = 50 (mm), type = NO3_N
          20/05/1992  surfaceorganicmatter tillage type = user_defined, f_incorp = 0.1, tillage_depth = 80
          20/05/1992  cotton sow plants = 12, sowing_depth = 25.4, cultivar = s324, row_spacing = 1010, crop_class = plant
          28/04/1993  surfaceorganicmatter tillage type = user_defined, f_incorp = 0.9, tillage_depth = 150
          28/04/1993  fertiliser apply amount = 10 (kg/ha), depth = 50 (mm), type = NO3_N
          20/05/1993  surfaceorganicmatter tillage type = user_defined, f_incorp = 0.1, tillage_depth = 80
          20/05/1993  cotton sow plants = 12, sowing_depth = 25.4, cultivar = s324, row_spacing = 1010, crop_class = plant
          28/04/1994  surfaceorganicmatter tillage type = user_defined, f_incorp = 0.9, tillage_depth = 150
          28/04/1994  fertiliser apply amount = 10 (kg/ha), depth = 50 (mm), type = NO3_N
          20/05/1994  surfaceorganicmatter tillage type = user_defined, f_incorp = 0.1, tillage_depth = 80
          20/05/1994  cotton sow plants = 12, sowing_depth = 25.4, cultivar = s324, row_spacing = 1010, crop_class = plant
          28/04/1995  surfaceorganicmatter tillage type = user_defined, f_incorp = 0.9, tillage_depth = 150
          28/04/1995  fertiliser apply amount = 10 (kg/ha), depth = 50 (mm), type = NO3_N
          20/05/1995  surfaceorganicmatter tillage type = user_defined, f_incorp = 0.1, tillage_depth = 80
          20/05/1995  cotton sow plants = 12, sowing_depth = 25.4, cultivar = s324, row_spacing = 1010, crop_class = plant
          28/04/1996  surfaceorganicmatter tillage type = user_defined, f_incorp = 0.9, tillage_depth = 150
          28/04/1996  fertiliser apply amount = 10 (kg/ha), depth = 50 (mm), type = NO3_N
          20/05/1996  surfaceorganicmatter tillage type = user_defined, f_incorp = 0.1, tillage_depth = 80
          20/05/1996  cotton sow plants = 12, sowing_depth = 25.4, cultivar = s324, row_spacing = 1010, crop_class = plant
          28/04/1997  surfaceorganicmatter tillage type = user_defined, f_incorp = 0.9, tillage_depth = 150
          28/04/1997  fertiliser apply amount = 10 (kg/ha), depth = 50 (mm), type = NO3_N
          20/05/1997  surfaceorganicmatter tillage type = user_defined, f_incorp = 0.1, tillage_depth = 80
          20/05/1997  cotton sow plants = 12, sowing_depth = 25.4, cultivar = s324, row_spacing = 1010, crop_class = plant
          28/04/1998  surfaceorganicmatter tillage type = user_defined, f_incorp = 0.9, tillage_depth = 150
          28/04/1998  fertiliser apply amount = 10 (kg/ha), depth = 50 (mm), type = NO3_N
          20/05/1998  surfaceorganicmatter tillage type = user_defined, f_incorp = 0.1, tillage_depth = 80
          20/05/1998  cotton sow plants = 12, sowing_depth = 25.4, cultivar = s324, row_spacing = 1010, crop_class = plant
          28/04/1999  surfaceorganicmatter tillage type = user_defined, f_incorp = 0.9, tillage_depth = 150
          28/04/1999  fertiliser apply amount = 10 (kg/ha), depth = 50 (mm), type = NO3_N
          20/05/1999  surfaceorganicmatter tillage type = user_defined, f_incorp = 0.1, tillage_depth = 80
          20/05/1999  cotton sow plants = 12, sowing_depth = 25.4, cultivar = s324, row_spacing = 1010, crop_class = plant
          28/04/2000  surfaceorganicmatter tillage type = user_defined, f_incorp = 0.9, tillage_depth = 150
          28/04/2000  fertiliser apply amount = 10 (kg/ha), depth = 50 (mm), type = NO3_N
          20/05/2000  surfaceorganicmatter tillage type = user_defined, f_incorp = 0.1, tillage_depth = 80
          20/05/2000  cotton sow plants = 12, sowing_depth = 25.4, cultivar = s324, row_spacing = 1010, crop_class = plant
          28/04/2001  surfaceorganicmatter tillage type = user_defined, f_incorp = 0.9, tillage_depth = 150
          28/04/2001  fertiliser apply amount = 10 (kg/ha), depth = 50 (mm), type = NO3_N
          20/05/2001  surfaceorganicmatter tillage type = user_defined, f_incorp = 0.1, tillage_depth = 80
          20/05/2001  cotton sow plants = 12, sowing_depth = 25.4, cultivar = s324, row_spacing = 1010, crop_class = plant
          28/04/2002  surfaceorganicmatter tillage type = user_defined, f_incorp = 0.9, tillage_depth = 150
          28/04/2002  fertiliser apply amount = 10 (kg/ha), depth = 50 (mm), type = NO3_N
          20/05/2002  surfaceorganicmatter tillage type = user_defined, f_incorp = 0.1, tillage_depth = 80
          20/05/2002  cotton sow plants = 12, sowing_depth = 25.4, cultivar = s324, row_spacing = 1010, crop_class = plant
          27/05/2003  sorghum sow plants = 3, sowing_depth = 25.4, cultivar = csh13r, row_spacing = 1010, tiller_no_fertile = 1, crop_class = plant
          27/05/2003  surfaceorganicmatter tillage type = user_defined, f_incorp = 0.1, tillage_depth = 80
          11/06/2003  surfaceorganicmatter tillage type = user_defined, f_incorp = 0.1, tillage_depth = 5
          15/08/2003  surfaceorganicmatter tillage type = user_defined, f_incorp = 0.9, tillage_depth = 150
          28/04/2004  fertiliser apply amount = 22 (kg/ha), depth = 50 (mm), type = NO3_N
          28/04/2004  surfaceorganicmatter tillage type = user_defined, f_incorp = 0.9, tillage_depth = 150
          10/05/2004  cotton sow plants = 12, sowing_depth = 25.4, cultivar = s324, row_spacing = 1010, crop_class = plant
          10/05/2004  surfaceorganicmatter tillage type = user_defined, f_incorp = 0.1, tillage_depth = 80
          20/12/2004  surfaceorganicmatter tillage type = user_defined, f_incorp = 0.9, tillage_depth = 150
          25/04/2005  fertiliser apply amount = 28 (kg/ha), depth = 50 (mm), type = NO3_N
          25/04/2005  surfaceorganicmatter tillage type = user_defined, f_incorp = 0.9, tillage_depth = 150
          18/05/2005  surfaceorganicmatter tillage type = user_defined, f_incorp = 0.1, tillage_depth = 80
          09/06/2005  sorghum sow plants = 3, sowing_depth = 25.4, cultivar = csh13r, row_spacing = 1010, tiller_no_fertile = 1, crop_class = plant
          10/05/2006  surfaceorganicmatter tillage type = user_defined, f_incorp = 0.1, tillage_depth = 80
          02/06/2006  cotton sow plants = 12, sowing_depth = 25.4, cultivar = s324, row_spacing = 1010, crop_class = plant
          13/02/2007  surfaceorganicmatter tillage type = user_defined, f_incorp = 0.9, tillage_depth = 150
          24/06/2007  sorghum sow plants = 3, sowing_depth = 25.4, cultivar = csh13r, row_spacing = 1010, tiller_no_fertile = 1, crop_class = plant
          24/02/2008  surfaceorganicmatter tillage type = user_defined, f_incorp = 0.9, tillage_depth = 150
          24/03/2008  fertiliser apply amount = 28 (kg/ha), depth = 50 (mm), type = NO3_N
          24/03/2008  fertiliser apply amount = 15 (kg/ha), depth = 50 (mm), type = Rock_P
          13/05/2008  cotton sow plants = 12, sowing_depth = 25.4, cultivar = s324, row_spacing = 1010, crop_class = plant
          17/01/2009  surfaceorganicmatter tillage type = user_defined, f_incorp = 0.9, tillage_depth = 150
          13/05/2009  sorghum sow plants = 3, sowing_depth = 25.4, cultivar = csh13r, row_spacing = 1010, tiller_no_fertile = 1, crop_class = plant
          12/03/2010  fertiliser apply amount = 28 (kg/ha), depth = 50 (mm), type = NO3_N
          21/03/2010  surfaceorganicmatter tillage type = user_defined, f_incorp = 0.9, tillage_depth = 150
          20/05/2010  cotton sow plants = 12, sowing_depth = 25.4, cultivar = s324, row_spacing = 1010, crop_class = plant
          17/01/2011  surfaceorganicmatter tillage type = user_defined, f_incorp = 0.9, tillage_depth = 150
          13/05/2011  sorghum sow plants = 3, sowing_depth = 25.4, cultivar = csh13r, row_spacing = 1010, tiller_no_fertile = 1, crop_class = plant
          12/03/2012  fertiliser apply amount = 28 (kg/ha), depth = 50 (mm), type = NO3_N
          21/03/2012  surfaceorganicmatter tillage type = user_defined, f_incorp = 0.9, tillage_depth = 150
          20/05/2012  cotton sow plants = 12, sowing_depth = 25.4, cultivar = s324, row_spacing = 1010, crop_class = plant
          17/01/2013  surfaceorganicmatter tillage type = user_defined, f_incorp = 0.9, tillage_depth = 150
          13/05/2013  sorghum sow plants = 3, sowing_depth = 25.4, cultivar = csh13r, row_spacing = 1010, tiller_no_fertile = 1, crop_class = plant
          12/03/2014  fertiliser apply amount = 28 (kg/ha), depth = 50 (mm), type = NO3_N
          21/03/2014  surfaceorganicmatter tillage type = user_defined, f_incorp = 0.9, tillage_depth = 150
          20/05/2014  cotton sow plants = 12, sowing_depth = 25.4, cultivar = s324, row_spacing = 1010, crop_class = plant
          17/01/2015  surfaceorganicmatter tillage type = user_defined, f_incorp = 0.9, tillage_depth = 150
          13/05/2015  sorghum sow plants = 3, sowing_depth = 25.4, cultivar = csh13r, row_spacing = 1010, tiller_no_fertile = 1, crop_class = plant
          12/03/2016  fertiliser apply amount = 28 (kg/ha), depth = 50 (mm), type = NO3_N
          21/03/2016  surfaceorganicmatter tillage type = user_defined, f_incorp = 0.9, tillage_depth = 150
          20/05/2016  cotton sow plants = 12, sowing_depth = 25.4, cultivar = s324, row_spacing = 1010, crop_class = plant
          17/01/2017  surfaceorganicmatter tillage type = user_defined, f_incorp = 0.9, tillage_depth = 150
          13/05/2017  sorghum sow plants = 3, sowing_depth = 25.4, cultivar = csh13r, row_spacing = 1010, tiller_no_fertile = 1, crop_class = plant
          12/03/2018  fertiliser apply amount = 28 (kg/ha), depth = 50 (mm), type = NO3_N
          21/03/2018  surfaceorganicmatter tillage type = user_defined, f_incorp = 0.9, tillage_depth = 150
          20/05/2018  cotton sow plants = 12, sowing_depth = 25.4, cultivar = s324, row_spacing = 1010, crop_class = plant
          17/01/2019  surfaceorganicmatter tillage type = user_defined, f_incorp = 0.9, tillage_depth = 150
          13/05/2019  sorghum sow plants = 3, sowing_depth = 25.4, cultivar = csh13r, row_spacing = 1010, tiller_no_fertile = 1, crop_class = plant
          12/03/2020  fertiliser apply amount = 28 (kg/ha), depth = 50 (mm), type = NO3_N
          21/03/2020  surfaceorganicmatter tillage type = user_defined, f_incorp = 0.9, tillage_depth = 150
          20/05/2020  cotton sow plants = 12, sowing_depth = 25.4, cultivar = s324, row_spacing = 1010, crop_class = plant
          17/01/2021  surfaceorganicmatter tillage type = user_defined, f_incorp = 0.9, tillage_depth = 150
          13/05/2021  sorghum sow plants = 3, sowing_depth = 25.4, cultivar = csh13r, row_spacing = 1010, tiller_no_fertile = 1, crop_class = plant
          12/08/2021  biochar5v3 tillage type = user_defined, f_incorp = 1.0, tillage_depth = 300
          12/03/2022  fertiliser apply amount = 28 (kg/ha), depth = 50 (mm), type = NO3_N
          21/03/2022  surfaceorganicmatter tillage type = user_defined, f_incorp = 0.9, tillage_depth = 150
          20/05/2022  cotton sow plants = 12, sowing_depth = 25.4, cultivar = s324, row_spacing = 1010, crop_class = plant
          17/01/2023  surfaceorganicmatter tillage type = user_defined, f_incorp = 0.9, tillage_depth = 150
          13/05/2023  sorghum sow plants = 3, sowing_depth = 25.4, cultivar = csh13r, row_spacing = 1010, tiller_no_fertile = 1, crop_class = plant
          12/03/2024  fertiliser apply amount = 28 (kg/ha), depth = 50 (mm), type = NO3_N
          21/03/2024  surfaceorganicmatter tillage type = user_defined, f_incorp = 0.9, tillage_depth = 150
          20/05/2024  cotton sow plants = 12, sowing_depth = 25.4, cultivar = s324, row_spacing = 1010, crop_class = plant
          17/01/2025  surfaceorganicmatter tillage type = user_defined, f_incorp = 0.9, tillage_depth = 150
          13/05/2025  sorghum sow plants = 3, sowing_depth = 25.4, cultivar = csh13r, row_spacing = 1010, tiller_no_fertile = 1, crop_class = plant
          12/03/2026  fertiliser apply amount = 28 (kg/ha), depth = 50 (mm), type = NO3_N
          21/03/2026  surfaceorganicmatter tillage type = user_defined, f_incorp = 0.9, tillage_depth = 150
          20/05/2026  cotton sow plants = 12, sowing_depth = 25.4, cultivar = s324, row_spacing = 1010, crop_class = plant
          17/01/2027  surfaceorganicmatter tillage type = user_defined, f_incorp = 0.9, tillage_depth = 150
          13/05/2027  sorghum sow plants = 3, sowing_depth = 25.4, cultivar = csh13r, row_spacing = 1010, tiller_no_fertile = 1, crop_class = plant
          12/03/2028  fertiliser apply amount = 28 (kg/ha), depth = 50 (mm), type = NO3_N
          21/03/2028  surfaceorganicmatter tillage type = user_defined, f_incorp = 0.9, tillage_depth = 150
          20/05/2028  cotton sow plants = 12, sowing_depth = 25.4, cultivar = s324, row_spacing = 1010, crop_class = plant
          17/01/2029  surfaceorganicmatter tillage type = user_defined, f_incorp = 0.9, tillage_depth = 150
          13/05/2029  sorghum sow plants = 3, sowing_depth = 25.4, cultivar = csh13r, row_spacing = 1010, tiller_no_fertile = 1, crop_class = plant
          12/03/2030  fertiliser apply amount = 28 (kg/ha), depth = 50 (mm), type = NO3_N
          21/03/2030  surfaceorganicmatter tillage type = user_defined, f_incorp = 0.9, tillage_depth = 150
          20/05/2030  cotton sow plants = 12, sowing_depth = 25.4, cultivar = s324, row_spacing = 1010, crop_class = plant
          17/01/2031  surfaceorganicmatter tillage type = user_defined, f_incorp = 0.9, tillage_depth = 150
          13/05/2031  sorghum sow plants = 3, sowing_depth = 25.4, cultivar = csh13r, row_spacing = 1010, tiller_no_fertile = 1, crop_class = plant
          12/03/2032  fertiliser apply amount = 28 (kg/ha), depth = 50 (mm), type = NO3_N
          21/03/2032  surfaceorganicmatter tillage type = user_defined, f_incorp = 0.9, tillage_depth = 150
          20/05/2032  cotton sow plants = 12, sowing_depth = 25.4, cultivar = s324, row_spacing = 1010, crop_class = plant
          17/01/2033  surfaceorganicmatter tillage type = user_defined, f_incorp = 0.9, tillage_depth = 150
          13/05/2033  sorghum sow plants = 3, sowing_depth = 25.4, cultivar = csh13r, row_spacing = 1010, tiller_no_fertile = 1, crop_class = plant
          12/03/2034  fertiliser apply amount = 28 (kg/ha), depth = 50 (mm), type = NO3_N
          21/03/2034  surfaceorganicmatter tillage type = user_defined, f_incorp = 0.9, tillage_depth = 150
          20/05/2034  cotton sow plants = 12, sowing_depth = 25.4, cultivar = s324, row_spacing = 1010, crop_class = plant
          17/01/2035  surfaceorganicmatter tillage type = user_defined, f_incorp = 0.9, tillage_depth = 150
          13/05/2035  sorghum sow plants = 3, sowing_depth = 25.4, cultivar = csh13r, row_spacing = 1010, tiller_no_fertile = 1, crop_class = plant
          12/03/2036  fertiliser apply amount = 28 (kg/ha), depth = 50 (mm), type = NO3_N
          21/03/2036  surfaceorganicmatter tillage type = user_defined, f_incorp = 0.9, tillage_depth = 150
          20/05/2036  cotton sow plants = 12, sowing_depth = 25.4, cultivar = s324, row_spacing = 1010, crop_class = plant
          17/01/2037  surfaceorganicmatter tillage type = user_defined, f_incorp = 0.9, tillage_depth = 150
          13/05/2037  sorghum sow plants = 3, sowing_depth = 25.4, cultivar = csh13r, row_spacing = 1010, tiller_no_fertile = 1, crop_class = plant
          12/03/2038  fertiliser apply amount = 28 (kg/ha), depth = 50 (mm), type = NO3_N
          21/03/2038  surfaceorganicmatter tillage type = user_defined, f_incorp = 0.9, tillage_depth = 150
          20/05/2038  cotton sow plants = 12, sowing_depth = 25.4, cultivar = s324, row_spacing = 1010, crop_class = plant
          17/01/2039  surfaceorganicmatter tillage type = user_defined, f_incorp = 0.9, tillage_depth = 150
          13/05/2039  sorghum sow plants = 3, sowing_depth = 25.4, cultivar = csh13r, row_spacing = 1010, tiller_no_fertile = 1, crop_class = plant
          12/03/2040  fertiliser apply amount = 28 (kg/ha), depth = 50 (mm), type = NO3_N
          21/03/2040  surfaceorganicmatter tillage type = user_defined, f_incorp = 0.9, tillage_depth = 150
          20/05/2040  cotton sow plants = 12, sowing_depth = 25.4, cultivar = s324, row_spacing = 1010, crop_class = plant
          17/01/2041  surfaceorganicmatter tillage type = user_defined, f_incorp = 0.9, tillage_depth = 150
          13/05/2041  sorghum sow plants = 3, sowing_depth = 25.4, cultivar = csh13r, row_spacing = 1010, tiller_no_fertile = 1, crop_class = plant
          12/03/2042  fertiliser apply amount = 28 (kg/ha), depth = 50 (mm), type = NO3_N
          21/03/2042  surfaceorganicmatter tillage type = user_defined, f_incorp = 0.9, tillage_depth = 150
          20/05/2042  cotton sow plants = 12, sowing_depth = 25.4, cultivar = s324, row_spacing = 1010, crop_class = plant
          17/01/2043  surfaceorganicmatter tillage type = user_defined, f_incorp = 0.9, tillage_depth = 150
          13/05/2043  sorghum sow plants = 3, sowing_depth = 25.4, cultivar = csh13r, row_spacing = 1010, tiller_no_fertile = 1, crop_class = plant
          12/03/2044  fertiliser apply amount = 28 (kg/ha), depth = 50 (mm), type = NO3_N
          21/03/2044  surfaceorganicmatter tillage type = user_defined, f_incorp = 0.9, tillage_depth = 150
          20/05/2044  cotton sow plants = 12, sowing_depth = 25.4, cultivar = s324, row_spacing = 1010, crop_class = plant
          17/01/2045  surfaceorganicmatter tillage type = user_defined, f_incorp = 0.9, tillage_depth = 150
          13/05/2045  sorghum sow plants = 3, sowing_depth = 25.4, cultivar = csh13r, row_spacing = 1010, tiller_no_fertile = 1, crop_class = plant
          12/03/2046  fertiliser apply amount = 28 (kg/ha), depth = 50 (mm), type = NO3_N
          21/03/2046  surfaceorganicmatter tillage type = user_defined, f_incorp = 0.9, tillage_depth = 150
          20/05/2046  cotton sow plants = 12, sowing_depth = 25.4, cultivar = s324, row_spacing = 1010, crop_class = plant
          17/01/2047  surfaceorganicmatter tillage type = user_defined, f_incorp = 0.9, tillage_depth = 150
          13/05/2047  sorghum sow plants = 3, sowing_depth = 25.4, cultivar = csh13r, row_spacing = 1010, tiller_no_fertile = 1, crop_class = plant
          12/03/2048  fertiliser apply amount = 28 (kg/ha), depth = 50 (mm), type = NO3_N
          21/03/2048  surfaceorganicmatter tillage type = user_defined, f_incorp = 0.9, tillage_depth = 150
          20/05/2048  cotton sow plants = 12, sowing_depth = 25.4, cultivar = s324, row_spacing = 1010, crop_class = plant
          17/01/2049  surfaceorganicmatter tillage type = user_defined, f_incorp = 0.9, tillage_depth = 150
          13/05/2049  sorghum sow plants = 3, sowing_depth = 25.4, cultivar = csh13r, row_spacing = 1010, tiller_no_fertile = 1, crop_class = plant
          12/03/2050  fertiliser apply amount = 28 (kg/ha), depth = 50 (mm), type = NO3_N
          21/03/2050  surfaceorganicmatter tillage type = user_defined, f_incorp = 0.9, tillage_depth = 150
          20/05/2050  cotton sow plants = 12, sowing_depth = 25.4, cultivar = s324, row_spacing = 1010, crop_class = plant
          17/01/2051  surfaceorganicmatter tillage type = user_defined, f_incorp = 0.9, tillage_depth = 150
          13/05/2051  sorghum sow plants = 3, sowing_depth = 25.4, cultivar = csh13r, row_spacing = 1010, tiller_no_fertile = 1, crop_class = plant
          12/03/2052  fertiliser apply amount = 28 (kg/ha), depth = 50 (mm), type = NO3_N
          21/03/2052  surfaceorganicmatter tillage type = user_defined, f_incorp = 0.9, tillage_depth = 150
          20/05/2052  cotton sow plants = 12, sowing_depth = 25.4, cultivar = s324, row_spacing = 1010, crop_class = plant
          17/01/2053  surfaceorganicmatter tillage type = user_defined, f_incorp = 0.9, tillage_depth = 150
          13/05/2053  sorghum sow plants = 3, sowing_depth = 25.4, cultivar = csh13r, row_spacing = 1010, tiller_no_fertile = 1, crop_class = plant
          12/03/2054  fertiliser apply amount = 28 (kg/ha), depth = 50 (mm), type = NO3_N
          21/03/2054  surfaceorganicmatter tillage type = user_defined, f_incorp = 0.9, tillage_depth = 150
          20/05/2054  cotton sow plants = 12, sowing_depth = 25.4, cultivar = s324, row_spacing = 1010, crop_class = plant
          17/01/2055  surfaceorganicmatter tillage type = user_defined, f_incorp = 0.9, tillage_depth = 150
          13/05/2055  sorghum sow plants = 3, sowing_depth = 25.4, cultivar = csh13r, row_spacing = 1010, tiller_no_fertile = 1, crop_class = plant
          12/03/2056  fertiliser apply amount = 28 (kg/ha), depth = 50 (mm), type = NO3_N
          21/03/2056  surfaceorganicmatter tillage type = user_defined, f_incorp = 0.9, tillage_depth = 150
          20/05/2056  cotton sow plants = 12, sowing_depth = 25.4, cultivar = s324, row_spacing = 1010, crop_class = plant
          17/01/2057  surfaceorganicmatter tillage type = user_defined, f_incorp = 0.9, tillage_depth = 150
          13/05/2057  sorghum sow plants = 3, sowing_depth = 25.4, cultivar = csh13r, row_spacing = 1010, tiller_no_fertile = 1, crop_class = plant
          12/03/2058  fertiliser apply amount = 28 (kg/ha), depth = 50 (mm), type = NO3_N
          21/03/2058  surfaceorganicmatter tillage type = user_defined, f_incorp = 0.9, tillage_depth = 150
          20/05/2058  cotton sow plants = 12, sowing_depth = 25.4, cultivar = s324, row_spacing = 1010, crop_class = plant
          17/01/2059  surfaceorganicmatter tillage type = user_defined, f_incorp = 0.9, tillage_depth = 150
          13/05/2059  sorghum sow plants = 3, sowing_depth = 25.4, cultivar = csh13r, row_spacing = 1010, tiller_no_fertile = 1, crop_class = plant
          12/03/2060  fertiliser apply amount = 28 (kg/ha), depth = 50 (mm), type = NO3_N
          21/03/2060  surfaceorganicmatter tillage type = user_defined, f_incorp = 0.9, tillage_depth = 150
          20/05/2060  cotton sow plants = 12, sowing_depth = 25.4, cultivar = s324, row_spacing = 1010, crop_class = plant
          17/01/2061  surfaceorganicmatter tillage type = user_defined, f_incorp = 0.9, tillage_depth = 150
          13/05/2061  sorghum sow plants = 3, sowing_depth = 25.4, cultivar = csh13r, row_spacing = 1010, tiller_no_fertile = 1, crop_class = plant
          12/03/2062  fertiliser apply amount = 28 (kg/ha), depth = 50 (mm), type = NO3_N
          21/03/2062  surfaceorganicmatter tillage type = user_defined, f_incorp = 0.9, tillage_depth = 150
          20/05/2062  cotton sow plants = 12, sowing_depth = 25.4, cultivar = s324, row_spacing = 1010, crop_class = plant
          17/01/2063  surfaceorganicmatter tillage type = user_defined, f_incorp = 0.9, tillage_depth = 150
          13/05/2063  sorghum sow plants = 3, sowing_depth = 25.4, cultivar = csh13r, row_spacing = 1010, tiller_no_fertile = 1, crop_class = plant
          12/03/2064  fertiliser apply amount = 28 (kg/ha), depth = 50 (mm), type = NO3_N
          21/03/2064  surfaceorganicmatter tillage type = user_defined, f_incorp = 0.9, tillage_depth = 150
          20/05/2064  cotton sow plants = 12, sowing_depth = 25.4, cultivar = s324, row_spacing = 1010, crop_class = plant
          17/01/2065  surfaceorganicmatter tillage type = user_defined, f_incorp = 0.9, tillage_depth = 150
          13/05/2065  sorghum sow plants = 3, sowing_depth = 25.4, cultivar = csh13r, row_spacing = 1010, tiller_no_fertile = 1, crop_class = plant
          12/03/2066  fertiliser apply amount = 28 (kg/ha), depth = 50 (mm), type = NO3_N
          21/03/2066  surfaceorganicmatter tillage type = user_defined, f_incorp = 0.9, tillage_depth = 150
          20/05/2066  cotton sow plants = 12, sowing_depth = 25.4, cultivar = s324, row_spacing = 1010, crop_class = plant
          17/01/2067  surfaceorganicmatter tillage type = user_defined, f_incorp = 0.9, tillage_depth = 150
          13/05/2067  sorghum sow plants = 3, sowing_depth = 25.4, cultivar = csh13r, row_spacing = 1010, tiller_no_fertile = 1, crop_class = plant
          12/03/2068  fertiliser apply amount = 28 (kg/ha), depth = 50 (mm), type = NO3_N
          21/03/2068  surfaceorganicmatter tillage type = user_defined, f_incorp = 0.9, tillage_depth = 150
          20/05/2068  cotton sow plants = 12, sowing_depth = 25.4, cultivar = s324, row_spacing = 1010, crop_class = plant
          17/01/2069  surfaceorganicmatter tillage type = user_defined, f_incorp = 0.9, tillage_depth = 150
          13/05/2069  sorghum sow plants = 3, sowing_depth = 25.4, cultivar = csh13r, row_spacing = 1010, tiller_no_fertile = 1, crop_class = plant
          12/03/2070  fertiliser apply amount = 28 (kg/ha), depth = 50 (mm), type = NO3_N
          21/03/2070  surfaceorganicmatter tillage type = user_defined, f_incorp = 0.9, tillage_depth = 150
          20/05/2070  cotton sow plants = 12, sowing_depth = 25.4, cultivar = s324, row_spacing = 1010, crop_class = plant
          17/01/2071  surfaceorganicmatter tillage type = user_defined, f_incorp = 0.9, tillage_depth = 150
          13/05/2071  sorghum sow plants = 3, sowing_depth = 25.4, cultivar = csh13r, row_spacing = 1010, tiller_no_fertile = 1, crop_class = plant
          12/03/2072  fertiliser apply amount = 28 (kg/ha), depth = 50 (mm), type = NO3_N
          21/03/2072  surfaceorganicmatter tillage type = user_defined, f_incorp = 0.9, tillage_depth = 150
          20/05/2072  cotton sow plants = 12, sowing_depth = 25.4, cultivar = s324, row_spacing = 1010, crop_class = plant
          17/01/2073  surfaceorganicmatter tillage type = user_defined, f_incorp = 0.9, tillage_depth = 150
          13/05/2073  sorghum sow plants = 3, sowing_depth = 25.4, cultivar = csh13r, row_spacing = 1010, tiller_no_fertile = 1, crop_class = plant
          12/03/2074  fertiliser apply amount = 28 (kg/ha), depth = 50 (mm), type = NO3_N
          21/03/2074  surfaceorganicmatter tillage type = user_defined, f_incorp = 0.9, tillage_depth = 150
          20/05/2074  cotton sow plants = 12, sowing_depth = 25.4, cultivar = s324, row_spacing = 1010, crop_class = plant
          17/01/2075  surfaceorganicmatter tillage type = user_defined, f_incorp = 0.9, tillage_depth = 150
          13/05/2075  sorghum sow plants = 3, sowing_depth = 25.4, cultivar = csh13r, row_spacing = 1010, tiller_no_fertile = 1, crop_class = plant
          12/03/2076  fertiliser apply amount = 28 (kg/ha), depth = 50 (mm), type = NO3_N
          21/03/2076  surfaceorganicmatter tillage type = user_defined, f_incorp = 0.9, tillage_depth = 150
          20/05/2076  cotton sow plants = 12, sowing_depth = 25.4, cultivar = s324, row_spacing = 1010, crop_class = plant
          17/01/2077  surfaceorganicmatter tillage type = user_defined, f_incorp = 0.9, tillage_depth = 150
          13/05/2077  sorghum sow plants = 3, sowing_depth = 25.4, cultivar = csh13r, row_spacing = 1010, tiller_no_fertile = 1, crop_class = plant
          12/03/2078  fertiliser apply amount = 28 (kg/ha), depth = 50 (mm), type = NO3_N
          21/03/2078  surfaceorganicmatter tillage type = user_defined, f_incorp = 0.9, tillage_depth = 150
          20/05/2078  cotton sow plants = 12, sowing_depth = 25.4, cultivar = s324, row_spacing = 1010, crop_class = plant
          17/01/2079  surfaceorganicmatter tillage type = user_defined, f_incorp = 0.9, tillage_depth = 150
          13/05/2079  sorghum sow plants = 3, sowing_depth = 25.4, cultivar = csh13r, row_spacing = 1010, tiller_no_fertile = 1, crop_class = plant
          12/03/2080  fertiliser apply amount = 28 (kg/ha), depth = 50 (mm), type = NO3_N
          21/03/2080  surfaceorganicmatter tillage type = user_defined, f_incorp = 0.9, tillage_depth = 150
          20/05/2080  cotton sow plants = 12, sowing_depth = 25.4, cultivar = s324, row_spacing = 1010, crop_class = plant
          17/01/2081  surfaceorganicmatter tillage type = user_defined, f_incorp = 0.9, tillage_depth = 150
          13/05/2081  sorghum sow plants = 3, sowing_depth = 25.4, cultivar = csh13r, row_spacing = 1010, tiller_no_fertile = 1, crop_class = plant
          12/03/2082  fertiliser apply amount = 28 (kg/ha), depth = 50 (mm), type = NO3_N
          21/03/2082  surfaceorganicmatter tillage type = user_defined, f_incorp = 0.9, tillage_depth = 150
          20/05/2082  cotton sow plants = 12, sowing_depth = 25.4, cultivar = s324, row_spacing = 1010, crop_class = plant
          17/01/2083  surfaceorganicmatter tillage type = user_defined, f_incorp = 0.9, tillage_depth = 150
          13/05/2083  sorghum sow plants = 3, sowing_depth = 25.4, cultivar = csh13r, row_spacing = 1010, tiller_no_fertile = 1, crop_class = plant
          12/03/2084  fertiliser apply amount = 28 (kg/ha), depth = 50 (mm), type = NO3_N
          21/03/2084  surfaceorganicmatter tillage type = user_defined, f_incorp = 0.9, tillage_depth = 150
          20/05/2084  cotton sow plants = 12, sowing_depth = 25.4, cultivar = s324, row_spacing = 1010, crop_class = plant
          17/01/2085  surfaceorganicmatter tillage type = user_defined, f_incorp = 0.9, tillage_depth = 150
          13/05/2085  sorghum sow plants = 3, sowing_depth = 25.4, cultivar = csh13r, row_spacing = 1010, tiller_no_fertile = 1, crop_class = plant
          12/03/2086  fertiliser apply amount = 28 (kg/ha), depth = 50 (mm), type = NO3_N
          21/03/2086  surfaceorganicmatter tillage type = user_defined, f_incorp = 0.9, tillage_depth = 150
          20/05/2086  cotton sow plants = 12, sowing_depth = 25.4, cultivar = s324, row_spacing = 1010, crop_class = plant
          17/01/2087  surfaceorganicmatter tillage type = user_defined, f_incorp = 0.9, tillage_depth = 150
          13/05/2087  sorghum sow plants = 3, sowing_depth = 25.4, cultivar = csh13r, row_spacing = 1010, tiller_no_fertile = 1, crop_class = plant
          12/03/2088  fertiliser apply amount = 28 (kg/ha), depth = 50 (mm), type = NO3_N
          21/03/2088  surfaceorganicmatter tillage type = user_defined, f_incorp = 0.9, tillage_depth = 150
          20/05/2088  cotton sow plants = 12, sowing_depth = 25.4, cultivar = s324, row_spacing = 1010, crop_class = plant
          17/01/2089  surfaceorganicmatter tillage type = user_defined, f_incorp = 0.9, tillage_depth = 150
          13/05/2089  sorghum sow plants = 3, sowing_depth = 25.4, cultivar = csh13r, row_spacing = 1010, tiller_no_fertile = 1, crop_class = plant
          12/03/2090  fertiliser apply amount = 28 (kg/ha), depth = 50 (mm), type = NO3_N
          21/03/2090  surfaceorganicmatter tillage type = user_defined, f_incorp = 0.9, tillage_depth = 150
          20/05/2090  cotton sow plants = 12, sowing_depth = 25.4, cultivar = s324, row_spacing = 1010, crop_class = plant
          17/01/2091  surfaceorganicmatter tillage type = user_defined, f_incorp = 0.9, tillage_depth = 150
          13/05/2091  sorghum sow plants = 3, sowing_depth = 25.4, cultivar = csh13r, row_spacing = 1010, tiller_no_fertile = 1, crop_class = plant
          12/03/2092  fertiliser apply amount = 28 (kg/ha), depth = 50 (mm), type = NO3_N
          21/03/2092  surfaceorganicmatter tillage type = user_defined, f_incorp = 0.9, tillage_depth = 150
          20/05/2092  cotton sow plants = 12, sowing_depth = 25.4, cultivar = s324, row_spacing = 1010, crop_class = plant
          17/01/2093  surfaceorganicmatter tillage type = user_defined, f_incorp = 0.9, tillage_depth = 150
          13/05/2093  sorghum sow plants = 3, sowing_depth = 25.4, cultivar = csh13r, row_spacing = 1010, tiller_no_fertile = 1, crop_class = plant
          12/03/2094  fertiliser apply amount = 28 (kg/ha), depth = 50 (mm), type = NO3_N
          21/03/2094  surfaceorganicmatter tillage type = user_defined, f_incorp = 0.9, tillage_depth = 150
          20/05/2094  cotton sow plants = 12, sowing_depth = 25.4, cultivar = s324, row_spacing = 1010, crop_class = plant
          17/01/2095  surfaceorganicmatter tillage type = user_defined, f_incorp = 0.9, tillage_depth = 150
          13/05/2095  sorghum sow plants = 3, sowing_depth = 25.4, cultivar = csh13r, row_spacing = 1010, tiller_no_fertile = 1, crop_class = plant
          12/03/2096  fertiliser apply amount = 28 (kg/ha), depth = 50 (mm), type = NO3_N
          21/03/2096  surfaceorganicmatter tillage type = user_defined, f_incorp = 0.9, tillage_depth = 150
          20/05/2096  cotton sow plants = 12, sowing_depth = 25.4, cultivar = s324, row_spacing = 1010, crop_class = plant
          17/01/2097  surfaceorganicmatter tillage type = user_defined, f_incorp = 0.9, tillage_depth = 150
          13/05/2097  sorghum sow plants = 3, sowing_depth = 25.4, cultivar = csh13r, row_spacing = 1010, tiller_no_fertile = 1, crop_class = plant
          12/03/2098  fertiliser apply amount = 28 (kg/ha), depth = 50 (mm), type = NO3_N
          21/03/2098  surfaceorganicmatter tillage type = user_defined, f_incorp = 0.9, tillage_depth = 150
          20/05/2098  cotton sow plants = 12, sowing_depth = 25.4, cultivar = s324, row_spacing = 1010, crop_class = plant
          17/01/2099  surfaceorganicmatter tillage type = user_defined, f_incorp = 0.9, tillage_depth = 150
          13/05/2099  sorghum sow plants = 3, sowing_depth = 25.4, cultivar = csh13r, row_spacing = 1010, tiller_no_fertile = 1, crop_class = plant
          12/03/2100  fertiliser apply amount = 28 (kg/ha), depth = 50 (mm), type = NO3_N
          21/03/2100  surfaceorganicmatter tillage type = user_defined, f_incorp = 0.9, tillage_depth = 150
          20/05/2100  cotton sow plants = 12, sowing_depth = 25.4, cultivar = s324, row_spacing = 1010, crop_class = plant
    simulation scen_2_62 -> /simulations/LFR/scen_2_61
      area paddock -> /simulations/LFR/scen_2_61/paddock
        outputfile: filename=scen_2_62.out; title=scen_2_62
          events Reporting Frequency -> /simulations/LFR/scen_2_61/paddock/outputfile/Reporting Frequency
          variables: same as LFR.scen_2_61.paddock.outputfile.Variables
        cotton2 cotton: same as LFR.scen_2_61.paddock.cotton
        manager2 biochar5v3
          date_of_application = 08/12/2010  # Date of biochar application (mm/dd/yyyy)
          biochar_added = 38300  # amount of biochar applied (kg/ha)
          frac_c_biochar = 0.78  # fraction carbon in biochar (0-1)
          biochar_loss = 0.02  # fraction of biochar lost during application (0-1)
          MRT1 = 1  # mean residence time for labile biochar pool (years)
          MRT2 = 500  # mean residence time for resistant biochar pool (years)
          frac_labile = 0.13  # biochar labile fraction (0-1)
          ef_biochar = 0.4  # fraction of decomposed biochar that goes to OC pools (0-1) (biochar efficiency)
          fr_biochar_biom = 0.05  # fraction of decomposed biochar that goes to biom (0-1)
          biochar_cn = 132  # biochar CN ratio
          sand = 0.416  # sand (0-1)
          clay = 0.21  # clay (0-1)
          prim_biom = 0  # priming coefficient for biom pool (-1 to 1) use 0.05
          prim_hum = 0  # priming coefficient for hum pool (-1 to 1) use 0.05
          prim_cell = 0  # priming coefficient for cell pool (-1 to 1) use 0.08
          prim_carb = 0  # priming coefficient for carb pool (-1 to 1) use 0.08
          prim_lign = 0  # priming coefficient for lign pool (-1 to 1) use 0.08
          prim_ef = 0  # negative priming coefficient for internal C partitioning (use 0.1 for 20 Mg), biom
          prim_fr = 0  # negative priming coefficient for internal C partioning (use -0.1), biom
          prim_ef_fom = 0  # negative priming for internal C partitioning (use 0.1 for 20 mg),fom
          prim_fr_fom = 0  # negative priming for internal C partitioning (use -0.1 for 20 mg), fom
          biom_cn = 8  # C/N ratio of biom pool
          soil_cn = 12  # C/N ratio of soil stuff
          incorp_depth = 300  # Biochar incorporation depth (mm)
          dul_qual = 0.15  # Slope of dul quality equation (default 0.33)
          bd_qual = 0.15  # Slope of bd quality equation (default 0.33)
          bc_cce = 50  # Biochar LV (cmol/kg?)
          bc_cec = 187  # Biochar ECEC (cmol/kg)
          cnrf_bc_coeff = 0.693  # Biochar cnrf coefficient (0-1)
          cnrf_bc_optcn = 25  # Optimum cn ratio for bc
          bc_wfps_factor = 1  # Biochar WFPS factor (0-1)
          nh4_adsorption = 0.006  # Biochar nh4 absorption coefficient (Langmuir)
          nh4_desorption = 0.006  # Biochar nh4 desorption coefficient (Langmuir)
          # Tillage info
          tillage = 0.8  # % BD reduction due to tillage
          # Soil information
          soil_name = Soil  # Name of the soil as it appears in the simulation tree. This being wrong causes object reference errors.
          soil_order = Mollisol  # Order of the soil
          nclay_portion = 0.95  # Portion of soil clay that is nclay (0-1)
          uph = 9.3  # Soil upper ph
          lph = 3.5  # Soil lower ph
          ab_val = 0  # Acid - Base value
          bot_slope = 10  # Unit conversion for titration curve (use 10)
          # Switches for various biochar components (development purposes)
          decomp_switch = on  # Priming effects? (on/off)
          nitrification_switch = on  # Nitrification effects? (on/off)
          ph_switch = on  # PH effects ? (on/off)
          ll_switch = on  # LL and CLL effects? (on/off)
          dul_switch = on  # DUL effects ? (on/off)
          xf_switch = off  # XF effects? (on/off)
          kl_switch = off  # KL effects? (on/off)
          bd_switch = on  # BD effects? (on/off) (under development)
          biochar_c_switch = on  # Biochar module (on/off)
          swcon_switch = off  # SWCOM effects (on/off)
          ks_switch = off  # Ksat effects ? (on/off)
          sat_switch = on  # SAT effects? (on/off)
          script: same as in LFR.scen_2_61.paddock.biochar5v3
        folder Manager folder1: same as LFR.scen_2_61.paddock.Manager folder1
        Soil: SoilType=Kalamazoo:187069; Site=Liberty Research Farm; NearestTown=Lubbock; State=TX; Country=USA; ApsoilNumber=0; Latitude=33.684; Longitude=-101.768; YearOfSampling=0
          DataSource=SSURGO (https://sdmdataaccess.nrcs.usda.gov/) through R package soilDB, R package apsimx function ssurgo2sp. Timestamp 2022-10-02 21:52:50
          Comments=cokey = 22386986 - acres percent = 95 - component percent = 95 - taxonomic classification name = Fine-loamy, mixed, active, mesic Typic Hapludalfs - drainage class = Well drained - elevation = 275 - slope = 3 - geomdesc = Head Slope, Interfluve, Nose Slope, Side Slope
          Water: same as LFR.scen_2_61.paddock.Soil.Water
          SoilWater: same as LFR.scen_2_61.paddock.Soil.SoilWater
          SoilOrganicMatter: RootCN=25; RootWt=1000; SoilCN=12; EnrACoeff=7.4; EnrBCoeff=0.2; OCUnits=WalkleyBlack
            Thickness  OC   FBiom   FInert
            50         0.2  0.04    0.8
            100        0.2  0.0327  0.808
            210        0.2  0.0268  0.816
            210        0.2  0.022   0.824
            520        0.1  0.018   0.833
            940        0.1  0.0147  0.841
            OC source: Estimated based on local knowledge (layer 1, 2, 3, 4, 5)
          Analysis: same as LFR.scen_2_61.paddock.Soil.Analysis
          InitialWater: FractionFull=1; PercentMethod=FilledFromTop; RelativeTo=cotton
          Sample InitialNitrogen: NO3Units=kgha; NH4Units=kgha; SWUnits=Volumetric; OCUnits=Total; PHUnits=Water
            Thickness  NO3    NH4     OC   PH
            50         0.5    0.05    0.2  7.43
            100        0.495  0.0495  0.2  7.43
            210        0.49   0.049   0.2  8
            210        0.485  0.0485  0.2  8
            520        0.48   0.048   0.1  8.15
            940        0.45   0.047   0.1  8.4
          ini: filename=Soil.xml
        operations Operations Schedule
          28/04/1987  surfaceorganicmatter tillage type = user_defined, f_incorp = 0.9, tillage_depth = 150
          28/04/1987  fertiliser apply amount = 10 (kg/ha), depth = 50 (mm), type = NO3_N
          20/05/1987  surfaceorganicmatter tillage type = user_defined, f_incorp = 0.1, tillage_depth = 80
          20/05/1987  cotton sow plants = 12, sowing_depth = 25.4, cultivar = s324, row_spacing = 1010, crop_class = plant
          28/04/1988  surfaceorganicmatter tillage type = user_defined, f_incorp = 0.9, tillage_depth = 150
          28/04/1988  fertiliser apply amount = 10 (kg/ha), depth = 50 (mm), type = NO3_N
          20/05/1988  surfaceorganicmatter tillage type = user_defined, f_incorp = 0.1, tillage_depth = 80
          20/05/1988  cotton sow plants = 12, sowing_depth = 25.4, cultivar = s324, row_spacing = 1010, crop_class = plant
          28/04/1989  surfaceorganicmatter tillage type = user_defined, f_incorp = 0.9, tillage_depth = 150
          28/04/1989  fertiliser apply amount = 10 (kg/ha), depth = 50 (mm), type = NO3_N
          20/05/1989  surfaceorganicmatter tillage type = user_defined, f_incorp = 0.1, tillage_depth = 80
          20/05/1989  cotton sow plants = 12, sowing_depth = 25.4, cultivar = s324, row_spacing = 1010, crop_class = plant
          28/04/1990  surfaceorganicmatter tillage type = user_defined, f_incorp = 0.9, tillage_depth = 150
          28/04/1990  fertiliser apply amount = 10 (kg/ha), depth = 50 (mm), type = NO3_N
          20/05/1990  surfaceorganicmatter tillage type = user_defined, f_incorp = 0.1, tillage_depth = 80
          20/05/1990  cotton sow plants = 12, sowing_depth = 25.4, cultivar = s324, row_spacing = 1010, crop_class = plant
          28/04/1991  surfaceorganicmatter tillage type = user_defined, f_incorp = 0.9, tillage_depth = 150
          28/04/1991  fertiliser apply amount = 10 (kg/ha), depth = 50 (mm), type = NO3_N
          20/05/1991  surfaceorganicmatter tillage type = user_defined, f_incorp = 0.1, tillage_depth = 80
          20/05/1991  cotton sow plants = 12, sowing_depth = 25.4, cultivar = s324, row_spacing = 1010, crop_class = plant
          28/04/1992  surfaceorganicmatter tillage type = user_defined, f_incorp = 0.9, tillage_depth = 150
          28/04/1992  fertiliser apply amount = 10 (kg/ha), depth = 50 (mm), type = NO3_N
          20/05/1992  surfaceorganicmatter tillage type = user_defined, f_incorp = 0.1, tillage_depth = 80
          20/05/1992  cotton sow plants = 12, sowing_depth = 25.4, cultivar = s324, row_spacing = 1010, crop_class = plant
          28/04/1993  surfaceorganicmatter tillage type = user_defined, f_incorp = 0.9, tillage_depth = 150
          28/04/1993  fertiliser apply amount = 10 (kg/ha), depth = 50 (mm), type = NO3_N
          20/05/1993  surfaceorganicmatter tillage type = user_defined, f_incorp = 0.1, tillage_depth = 80
          20/05/1993  cotton sow plants = 12, sowing_depth = 25.4, cultivar = s324, row_spacing = 1010, crop_class = plant
          28/04/1994  surfaceorganicmatter tillage type = user_defined, f_incorp = 0.9, tillage_depth = 150
          28/04/1994  fertiliser apply amount = 10 (kg/ha), depth = 50 (mm), type = NO3_N
          20/05/1994  surfaceorganicmatter tillage type = user_defined, f_incorp = 0.1, tillage_depth = 80
          20/05/1994  cotton sow plants = 12, sowing_depth = 25.4, cultivar = s324, row_spacing = 1010, crop_class = plant
          28/04/1995  surfaceorganicmatter tillage type = user_defined, f_incorp = 0.9, tillage_depth = 150
          28/04/1995  fertiliser apply amount = 10 (kg/ha), depth = 50 (mm), type = NO3_N
          20/05/1995  surfaceorganicmatter tillage type = user_defined, f_incorp = 0.1, tillage_depth = 80
          20/05/1995  cotton sow plants = 12, sowing_depth = 25.4, cultivar = s324, row_spacing = 1010, crop_class = plant
          28/04/1996  surfaceorganicmatter tillage type = user_defined, f_incorp = 0.9, tillage_depth = 150
          28/04/1996  fertiliser apply amount = 10 (kg/ha), depth = 50 (mm), type = NO3_N
          20/05/1996  surfaceorganicmatter tillage type = user_defined, f_incorp = 0.1, tillage_depth = 80
          20/05/1996  cotton sow plants = 12, sowing_depth = 25.4, cultivar = s324, row_spacing = 1010, crop_class = plant
          28/04/1997  surfaceorganicmatter tillage type = user_defined, f_incorp = 0.9, tillage_depth = 150
          28/04/1997  fertiliser apply amount = 10 (kg/ha), depth = 50 (mm), type = NO3_N
          20/05/1997  surfaceorganicmatter tillage type = user_defined, f_incorp = 0.1, tillage_depth = 80
          20/05/1997  cotton sow plants = 12, sowing_depth = 25.4, cultivar = s324, row_spacing = 1010, crop_class = plant
          28/04/1998  surfaceorganicmatter tillage type = user_defined, f_incorp = 0.9, tillage_depth = 150
          28/04/1998  fertiliser apply amount = 10 (kg/ha), depth = 50 (mm), type = NO3_N
          20/05/1998  surfaceorganicmatter tillage type = user_defined, f_incorp = 0.1, tillage_depth = 80
          20/05/1998  cotton sow plants = 12, sowing_depth = 25.4, cultivar = s324, row_spacing = 1010, crop_class = plant
          28/04/1999  surfaceorganicmatter tillage type = user_defined, f_incorp = 0.9, tillage_depth = 150
          28/04/1999  fertiliser apply amount = 10 (kg/ha), depth = 50 (mm), type = NO3_N
          20/05/1999  surfaceorganicmatter tillage type = user_defined, f_incorp = 0.1, tillage_depth = 80
          20/05/1999  cotton sow plants = 12, sowing_depth = 25.4, cultivar = s324, row_spacing = 1010, crop_class = plant
          28/04/2000  surfaceorganicmatter tillage type = user_defined, f_incorp = 0.9, tillage_depth = 150
          28/04/2000  fertiliser apply amount = 10 (kg/ha), depth = 50 (mm), type = NO3_N
          20/05/2000  surfaceorganicmatter tillage type = user_defined, f_incorp = 0.1, tillage_depth = 80
          20/05/2000  cotton sow plants = 12, sowing_depth = 25.4, cultivar = s324, row_spacing = 1010, crop_class = plant
          28/04/2001  surfaceorganicmatter tillage type = user_defined, f_incorp = 0.9, tillage_depth = 150
          28/04/2001  fertiliser apply amount = 10 (kg/ha), depth = 50 (mm), type = NO3_N
          20/05/2001  surfaceorganicmatter tillage type = user_defined, f_incorp = 0.1, tillage_depth = 80
          20/05/2001  cotton sow plants = 12, sowing_depth = 25.4, cultivar = s324, row_spacing = 1010, crop_class = plant
          28/04/2002  surfaceorganicmatter tillage type = user_defined, f_incorp = 0.9, tillage_depth = 150
          28/04/2002  fertiliser apply amount = 10 (kg/ha), depth = 50 (mm), type = NO3_N
          20/05/2002  surfaceorganicmatter tillage type = user_defined, f_incorp = 0.1, tillage_depth = 80
          20/05/2002  cotton sow plants = 12, sowing_depth = 25.4, cultivar = s324, row_spacing = 1010, crop_class = plant
          27/05/2003  sorghum sow plants = 3, sowing_depth = 25.4, cultivar = csh13r, row_spacing = 1010, tiller_no_fertile = 1, crop_class = plant
          27/05/2003  surfaceorganicmatter tillage type = user_defined, f_incorp = 0.1, tillage_depth = 80
          11/06/2003  surfaceorganicmatter tillage type = user_defined, f_incorp = 0.1, tillage_depth = 5
          15/08/2003  surfaceorganicmatter tillage type = user_defined, f_incorp = 0.9, tillage_depth = 150
          28/04/2004  fertiliser apply amount = 22 (kg/ha), depth = 50 (mm), type = NO3_N
          28/04/2004  surfaceorganicmatter tillage type = user_defined, f_incorp = 0.9, tillage_depth = 150
          10/05/2004  cotton sow plants = 12, sowing_depth = 25.4, cultivar = s324, row_spacing = 1010, crop_class = plant
          10/05/2004  surfaceorganicmatter tillage type = user_defined, f_incorp = 0.1, tillage_depth = 80
          20/12/2004  surfaceorganicmatter tillage type = user_defined, f_incorp = 0.9, tillage_depth = 150
          25/04/2005  fertiliser apply amount = 28 (kg/ha), depth = 50 (mm), type = NO3_N
          25/04/2005  surfaceorganicmatter tillage type = user_defined, f_incorp = 0.9, tillage_depth = 150
          18/05/2005  surfaceorganicmatter tillage type = user_defined, f_incorp = 0.1, tillage_depth = 80
          09/06/2005  sorghum sow plants = 3, sowing_depth = 25.4, cultivar = csh13r, row_spacing = 1010, tiller_no_fertile = 1, crop_class = plant
          10/05/2006  surfaceorganicmatter tillage type = user_defined, f_incorp = 0.1, tillage_depth = 80
          02/06/2006  cotton sow plants = 12, sowing_depth = 25.4, cultivar = s324, row_spacing = 1010, crop_class = plant
          13/02/2007  surfaceorganicmatter tillage type = user_defined, f_incorp = 0.9, tillage_depth = 150
          24/06/2007  sorghum sow plants = 3, sowing_depth = 25.4, cultivar = csh13r, row_spacing = 1010, tiller_no_fertile = 1, crop_class = plant
          24/02/2008  surfaceorganicmatter tillage type = user_defined, f_incorp = 0.9, tillage_depth = 150
          24/03/2008  fertiliser apply amount = 28 (kg/ha), depth = 50 (mm), type = NO3_N
          24/03/2008  fertiliser apply amount = 15 (kg/ha), depth = 50 (mm), type = Rock_P
          13/05/2008  cotton sow plants = 12, sowing_depth = 25.4, cultivar = s324, row_spacing = 1010, crop_class = plant
          17/01/2009  surfaceorganicmatter tillage type = user_defined, f_incorp = 0.9, tillage_depth = 150
          13/05/2009  sorghum sow plants = 3, sowing_depth = 25.4, cultivar = csh13r, row_spacing = 1010, tiller_no_fertile = 1, crop_class = plant
          12/03/2010  fertiliser apply amount = 28 (kg/ha), depth = 50 (mm), type = NO3_N
          21/03/2010  surfaceorganicmatter tillage type = user_defined, f_incorp = 0.9, tillage_depth = 150
          20/05/2010  cotton sow plants = 12, sowing_depth = 25.4, cultivar = s324, row_spacing = 1010, crop_class = plant
          17/01/2011  surfaceorganicmatter tillage type = user_defined, f_incorp = 0.9, tillage_depth = 150
          13/05/2011  sorghum sow plants = 3, sowing_depth = 25.4, cultivar = csh13r, row_spacing = 1010, tiller_no_fertile = 1, crop_class = plant
          12/03/2012  fertiliser apply amount = 28 (kg/ha), depth = 50 (mm), type = NO3_N
          21/03/2012  surfaceorganicmatter tillage type = user_defined, f_incorp = 0.9, tillage_depth = 150
          20/05/2012  cotton sow plants = 12, sowing_depth = 25.4, cultivar = s324, row_spacing = 1010, crop_class = plant
          17/01/2013  surfaceorganicmatter tillage type = user_defined, f_incorp = 0.9, tillage_depth = 150
          13/05/2013  sorghum sow plants = 3, sowing_depth = 25.4, cultivar = csh13r, row_spacing = 1010, tiller_no_fertile = 1, crop_class = plant
          12/03/2014  fertiliser apply amount = 28 (kg/ha), depth = 50 (mm), type = NO3_N
          21/03/2014  surfaceorganicmatter tillage type = user_defined, f_incorp = 0.9, tillage_depth = 150
          20/05/2014  cotton sow plants = 12, sowing_depth = 25.4, cultivar = s324, row_spacing = 1010, crop_class = plant
          17/01/2015  surfaceorganicmatter tillage type = user_defined, f_incorp = 0.9, tillage_depth = 150
          13/05/2015  sorghum sow plants = 3, sowing_depth = 25.4, cultivar = csh13r, row_spacing = 1010, tiller_no_fertile = 1, crop_class = plant
          12/03/2016  fertiliser apply amount = 28 (kg/ha), depth = 50 (mm), type = NO3_N
          21/03/2016  surfaceorganicmatter tillage type = user_defined, f_incorp = 0.9, tillage_depth = 150
          20/05/2016  cotton sow plants = 12, sowing_depth = 25.4, cultivar = s324, row_spacing = 1010, crop_class = plant
          17/01/2017  surfaceorganicmatter tillage type = user_defined, f_incorp = 0.9, tillage_depth = 150
          13/05/2017  sorghum sow plants = 3, sowing_depth = 25.4, cultivar = csh13r, row_spacing = 1010, tiller_no_fertile = 1, crop_class = plant
          12/03/2018  fertiliser apply amount = 28 (kg/ha), depth = 50 (mm), type = NO3_N
          21/03/2018  surfaceorganicmatter tillage type = user_defined, f_incorp = 0.9, tillage_depth = 150
          20/05/2018  cotton sow plants = 12, sowing_depth = 25.4, cultivar = s324, row_spacing = 1010, crop_class = plant
          17/01/2019  surfaceorganicmatter tillage type = user_defined, f_incorp = 0.9, tillage_depth = 150
          13/05/2019  sorghum sow plants = 3, sowing_depth = 25.4, cultivar = csh13r, row_spacing = 1010, tiller_no_fertile = 1, crop_class = plant
          12/03/2020  fertiliser apply amount = 28 (kg/ha), depth = 50 (mm), type = NO3_N
          21/03/2020  surfaceorganicmatter tillage type = user_defined, f_incorp = 0.9, tillage_depth = 150
          20/05/2020  cotton sow plants = 12, sowing_depth = 25.4, cultivar = s324, row_spacing = 1010, crop_class = plant
          17/01/2021  surfaceorganicmatter tillage type = user_defined, f_incorp = 0.9, tillage_depth = 150
          13/05/2021  sorghum sow plants = 3, sowing_depth = 25.4, cultivar = csh13r, row_spacing = 1010, tiller_no_fertile = 1, crop_class = plant
          12/08/2021  biochar5v3 tillage type = user_defined, f_incorp = 1.0, tillage_depth = 300
          12/03/2022  fertiliser apply amount = 28 (kg/ha), depth = 50 (mm), type = NO3_N
          21/03/2022  surfaceorganicmatter tillage type = user_defined, f_incorp = 0.9, tillage_depth = 150
          20/05/2022  cotton sow plants = 12, sowing_depth = 25.4, cultivar = s324, row_spacing = 1010, crop_class = plant
          17/01/2023  surfaceorganicmatter tillage type = user_defined, f_incorp = 0.9, tillage_depth = 150
          13/05/2023  sorghum sow plants = 3, sowing_depth = 25.4, cultivar = csh13r, row_spacing = 1010, tiller_no_fertile = 1, crop_class = plant
          12/03/2024  fertiliser apply amount = 28 (kg/ha), depth = 50 (mm), type = NO3_N
          21/03/2024  surfaceorganicmatter tillage type = user_defined, f_incorp = 0.9, tillage_depth = 150
          20/05/2024  cotton sow plants = 12, sowing_depth = 25.4, cultivar = s324, row_spacing = 1010, crop_class = plant
          17/01/2025  surfaceorganicmatter tillage type = user_defined, f_incorp = 0.9, tillage_depth = 150
          13/05/2025  sorghum sow plants = 3, sowing_depth = 25.4, cultivar = csh13r, row_spacing = 1010, tiller_no_fertile = 1, crop_class = plant
          12/03/2026  fertiliser apply amount = 28 (kg/ha), depth = 50 (mm), type = NO3_N
          21/03/2026  surfaceorganicmatter tillage type = user_defined, f_incorp = 0.9, tillage_depth = 150
          20/05/2026  cotton sow plants = 12, sowing_depth = 25.4, cultivar = s324, row_spacing = 1010, crop_class = plant
          17/01/2027  surfaceorganicmatter tillage type = user_defined, f_incorp = 0.9, tillage_depth = 150
          13/05/2027  sorghum sow plants = 3, sowing_depth = 25.4, cultivar = csh13r, row_spacing = 1010, tiller_no_fertile = 1, crop_class = plant
          12/03/2028  fertiliser apply amount = 28 (kg/ha), depth = 50 (mm), type = NO3_N
          21/03/2028  surfaceorganicmatter tillage type = user_defined, f_incorp = 0.9, tillage_depth = 150
          20/05/2028  cotton sow plants = 12, sowing_depth = 25.4, cultivar = s324, row_spacing = 1010, crop_class = plant
          17/01/2029  surfaceorganicmatter tillage type = user_defined, f_incorp = 0.9, tillage_depth = 150
          13/05/2029  sorghum sow plants = 3, sowing_depth = 25.4, cultivar = csh13r, row_spacing = 1010, tiller_no_fertile = 1, crop_class = plant
          12/03/2030  fertiliser apply amount = 28 (kg/ha), depth = 50 (mm), type = NO3_N
          21/03/2030  surfaceorganicmatter tillage type = user_defined, f_incorp = 0.9, tillage_depth = 150
          20/05/2030  cotton sow plants = 12, sowing_depth = 25.4, cultivar = s324, row_spacing = 1010, crop_class = plant
          17/01/2031  surfaceorganicmatter tillage type = user_defined, f_incorp = 0.9, tillage_depth = 150
          13/05/2031  sorghum sow plants = 3, sowing_depth = 25.4, cultivar = csh13r, row_spacing = 1010, tiller_no_fertile = 1, crop_class = plant
          12/03/2032  fertiliser apply amount = 28 (kg/ha), depth = 50 (mm), type = NO3_N
          21/03/2032  surfaceorganicmatter tillage type = user_defined, f_incorp = 0.9, tillage_depth = 150
          20/05/2032  cotton sow plants = 12, sowing_depth = 25.4, cultivar = s324, row_spacing = 1010, crop_class = plant
          17/01/2033  surfaceorganicmatter tillage type = user_defined, f_incorp = 0.9, tillage_depth = 150
          13/05/2033  sorghum sow plants = 3, sowing_depth = 25.4, cultivar = csh13r, row_spacing = 1010, tiller_no_fertile = 1, crop_class = plant
          12/03/2034  fertiliser apply amount = 28 (kg/ha), depth = 50 (mm), type = NO3_N
          21/03/2034  surfaceorganicmatter tillage type = user_defined, f_incorp = 0.9, tillage_depth = 150
          20/05/2034  cotton sow plants = 12, sowing_depth = 25.4, cultivar = s324, row_spacing = 1010, crop_class = plant
          17/01/2035  surfaceorganicmatter tillage type = user_defined, f_incorp = 0.9, tillage_depth = 150
          13/05/2035  sorghum sow plants = 3, sowing_depth = 25.4, cultivar = csh13r, row_spacing = 1010, tiller_no_fertile = 1, crop_class = plant
          12/03/2036  fertiliser apply amount = 28 (kg/ha), depth = 50 (mm), type = NO3_N
          21/03/2036  surfaceorganicmatter tillage type = user_defined, f_incorp = 0.9, tillage_depth = 150
          20/05/2036  cotton sow plants = 12, sowing_depth = 25.4, cultivar = s324, row_spacing = 1010, crop_class = plant
          17/01/2037  surfaceorganicmatter tillage type = user_defined, f_incorp = 0.9, tillage_depth = 150
          13/05/2037  sorghum sow plants = 3, sowing_depth = 25.4, cultivar = csh13r, row_spacing = 1010, tiller_no_fertile = 1, crop_class = plant
          12/03/2038  fertiliser apply amount = 28 (kg/ha), depth = 50 (mm), type = NO3_N
          21/03/2038  surfaceorganicmatter tillage type = user_defined, f_incorp = 0.9, tillage_depth = 150
          20/05/2038  cotton sow plants = 12, sowing_depth = 25.4, cultivar = s324, row_spacing = 1010, crop_class = plant
          17/01/2039  surfaceorganicmatter tillage type = user_defined, f_incorp = 0.9, tillage_depth = 150
          13/05/2039  sorghum sow plants = 3, sowing_depth = 25.4, cultivar = csh13r, row_spacing = 1010, tiller_no_fertile = 1, crop_class = plant
          12/03/2040  fertiliser apply amount = 28 (kg/ha), depth = 50 (mm), type = NO3_N
          21/03/2040  surfaceorganicmatter tillage type = user_defined, f_incorp = 0.9, tillage_depth = 150
          20/05/2040  cotton sow plants = 12, sowing_depth = 25.4, cultivar = s324, row_spacing = 1010, crop_class = plant
          17/01/2041  surfaceorganicmatter tillage type = user_defined, f_incorp = 0.9, tillage_depth = 150
          13/05/2041  sorghum sow plants = 3, sowing_depth = 25.4, cultivar = csh13r, row_spacing = 1010, tiller_no_fertile = 1, crop_class = plant
          12/03/2042  fertiliser apply amount = 28 (kg/ha), depth = 50 (mm), type = NO3_N
          21/03/2042  surfaceorganicmatter tillage type = user_defined, f_incorp = 0.9, tillage_depth = 150
          20/05/2042  cotton sow plants = 12, sowing_depth = 25.4, cultivar = s324, row_spacing = 1010, crop_class = plant
          17/01/2043  surfaceorganicmatter tillage type = user_defined, f_incorp = 0.9, tillage_depth = 150
          13/05/2043  sorghum sow plants = 3, sowing_depth = 25.4, cultivar = csh13r, row_spacing = 1010, tiller_no_fertile = 1, crop_class = plant
          12/03/2044  fertiliser apply amount = 28 (kg/ha), depth = 50 (mm), type = NO3_N
          21/03/2044  surfaceorganicmatter tillage type = user_defined, f_incorp = 0.9, tillage_depth = 150
          20/05/2044  cotton sow plants = 12, sowing_depth = 25.4, cultivar = s324, row_spacing = 1010, crop_class = plant
          17/01/2045  surfaceorganicmatter tillage type = user_defined, f_incorp = 0.9, tillage_depth = 150
          13/05/2045  sorghum sow plants = 3, sowing_depth = 25.4, cultivar = csh13r, row_spacing = 1010, tiller_no_fertile = 1, crop_class = plant
          12/03/2046  fertiliser apply amount = 28 (kg/ha), depth = 50 (mm), type = NO3_N
          21/03/2046  surfaceorganicmatter tillage type = user_defined, f_incorp = 0.9, tillage_depth = 150
          20/05/2046  cotton sow plants = 12, sowing_depth = 25.4, cultivar = s324, row_spacing = 1010, crop_class = plant
          17/01/2047  surfaceorganicmatter tillage type = user_defined, f_incorp = 0.9, tillage_depth = 150
          13/05/2047  sorghum sow plants = 3, sowing_depth = 25.4, cultivar = csh13r, row_spacing = 1010, tiller_no_fertile = 1, crop_class = plant
          12/03/2048  fertiliser apply amount = 28 (kg/ha), depth = 50 (mm), type = NO3_N
          21/03/2048  surfaceorganicmatter tillage type = user_defined, f_incorp = 0.9, tillage_depth = 150
          20/05/2048  cotton sow plants = 12, sowing_depth = 25.4, cultivar = s324, row_spacing = 1010, crop_class = plant
          17/01/2049  surfaceorganicmatter tillage type = user_defined, f_incorp = 0.9, tillage_depth = 150
          13/05/2049  sorghum sow plants = 3, sowing_depth = 25.4, cultivar = csh13r, row_spacing = 1010, tiller_no_fertile = 1, crop_class = plant
          12/03/2050  fertiliser apply amount = 28 (kg/ha), depth = 50 (mm), type = NO3_N
          21/03/2050  surfaceorganicmatter tillage type = user_defined, f_incorp = 0.9, tillage_depth = 150
          20/05/2050  cotton sow plants = 12, sowing_depth = 25.4, cultivar = s324, row_spacing = 1010, crop_class = plant
    simulation scen_2_63 -> /simulations/LFR/scen_2_61
      area paddock -> /simulations/LFR/scen_2_61/paddock
        outputfile: filename=scen_2_63.out; title=scen_2_63
          events Reporting Frequency -> /simulations/LFR/scen_2_61/paddock/outputfile/Reporting Frequency
          variables: same as LFR.scen_2_61.paddock.outputfile.Variables
        cotton2 cotton: same as LFR.scen_2_61.paddock.cotton
        manager2 biochar5v3
          date_of_application = 08/12/2010  # Date of biochar application (mm/dd/yyyy)
          biochar_added = 57000  # amount of biochar applied (kg/ha)
          frac_c_biochar = 0.78  # fraction carbon in biochar (0-1)
          biochar_loss = 0.02  # fraction of biochar lost during application (0-1)
          MRT1 = 1  # mean residence time for labile biochar pool (years)
          MRT2 = 500  # mean residence time for resistant biochar pool (years)
          frac_labile = 0.13  # biochar labile fraction (0-1)
          ef_biochar = 0.4  # fraction of decomposed biochar that goes to OC pools (0-1) (biochar efficiency)
          fr_biochar_biom = 0.05  # fraction of decomposed biochar that goes to biom (0-1)
          biochar_cn = 132  # biochar CN ratio
          sand = 0.416  # sand (0-1)
          clay = 0.21  # clay (0-1)
          prim_biom = 0  # priming coefficient for biom pool (-1 to 1) use 0.05
          prim_hum = 0  # priming coefficient for hum pool (-1 to 1) use 0.05
          prim_cell = 0  # priming coefficient for cell pool (-1 to 1) use 0.08
          prim_carb = 0  # priming coefficient for carb pool (-1 to 1) use 0.08
          prim_lign = 0  # priming coefficient for lign pool (-1 to 1) use 0.08
          prim_ef = 0  # negative priming coefficient for internal C partitioning (use 0.1 for 20 Mg), biom
          prim_fr = 0  # negative priming coefficient for internal C partioning (use -0.1), biom
          prim_ef_fom = 0  # negative priming for internal C partitioning (use 0.1 for 20 mg),fom
          prim_fr_fom = 0  # negative priming for internal C partitioning (use -0.1 for 20 mg), fom
          biom_cn = 8  # C/N ratio of biom pool
          soil_cn = 12  # C/N ratio of soil stuff
          incorp_depth = 300  # Biochar incorporation depth (mm)
          dul_qual = 0.15  # Slope of dul quality equation (default 0.33)
          bd_qual = 0.15  # Slope of bd quality equation (default 0.33)
          bc_cce = 50  # Biochar LV (cmol/kg?)
          bc_cec = 187  # Biochar ECEC (cmol/kg)
          cnrf_bc_coeff = 0.693  # Biochar cnrf coefficient (0-1)
          cnrf_bc_optcn = 25  # Optimum cn ratio for bc
          bc_wfps_factor = 1  # Biochar WFPS factor (0-1)
          nh4_adsorption = 0.006  # Biochar nh4 absorption coefficient (Langmuir)
          nh4_desorption = 0.006  # Biochar nh4 desorption coefficient (Langmuir)
          # Tillage info
          tillage = 0.8  # % BD reduction due to tillage
          # Soil information
          soil_name = Soil  # Name of the soil as it appears in the simulation tree. This being wrong causes object reference errors.
          soil_order = Mollisol  # Order of the soil
          nclay_portion = 0.95  # Portion of soil clay that is nclay (0-1)
          uph = 9.3  # Soil upper ph
          lph = 3.5  # Soil lower ph
          ab_val = 0  # Acid - Base value
          bot_slope = 10  # Unit conversion for titration curve (use 10)
          # Switches for various biochar components (development purposes)
          decomp_switch = on  # Priming effects? (on/off)
          nitrification_switch = on  # Nitrification effects? (on/off)
          ph_switch = on  # PH effects ? (on/off)
          ll_switch = on  # LL and CLL effects? (on/off)
          dul_switch = on  # DUL effects ? (on/off)
          xf_switch = off  # XF effects? (on/off)
          kl_switch = off  # KL effects? (on/off)
          bd_switch = on  # BD effects? (on/off) (under development)
          biochar_c_switch = on  # Biochar module (on/off)
          swcon_switch = off  # SWCOM effects (on/off)
          ks_switch = off  # Ksat effects ? (on/off)
          sat_switch = on  # SAT effects? (on/off)
          script: same as in LFR.scen_2_61.paddock.biochar5v3
        folder Manager folder1: same as LFR.scen_2_61.paddock.Manager folder1
        Soil: same as LFR.scen_2_62.paddock.Soil
        operations Operations Schedule: same as LFR.scen_2_62.paddock.Operations Schedule
    simulation scen_2_64 -> /simulations/LFR/scen_2_61
      area paddock -> /simulations/LFR/scen_2_61/paddock
        outputfile: filename=scen_2_64.out; title=scen_2_64
          events Reporting Frequency -> /simulations/LFR/scen_2_61/paddock/outputfile/Reporting Frequency
          variables: same as LFR.scen_2_61.paddock.outputfile.Variables
        cotton2 cotton: same as LFR.scen_2_61.paddock.cotton
        manager2 biochar5v3
          date_of_application = 08/12/2010  # Date of biochar application (mm/dd/yyyy)
          biochar_added = 76000  # amount of biochar applied (kg/ha)
          frac_c_biochar = 0.78  # fraction carbon in biochar (0-1)
          biochar_loss = 0.02  # fraction of biochar lost during application (0-1)
          MRT1 = 1  # mean residence time for labile biochar pool (years)
          MRT2 = 500  # mean residence time for resistant biochar pool (years)
          frac_labile = 0.13  # biochar labile fraction (0-1)
          ef_biochar = 0.4  # fraction of decomposed biochar that goes to OC pools (0-1) (biochar efficiency)
          fr_biochar_biom = 0.05  # fraction of decomposed biochar that goes to biom (0-1)
          biochar_cn = 132  # biochar CN ratio
          sand = 0.416  # sand (0-1)
          clay = 0.21  # clay (0-1)
          prim_biom = 0  # priming coefficient for biom pool (-1 to 1) use 0.05
          prim_hum = 0  # priming coefficient for hum pool (-1 to 1) use 0.05
          prim_cell = 0  # priming coefficient for cell pool (-1 to 1) use 0.08
          prim_carb = 0  # priming coefficient for carb pool (-1 to 1) use 0.08
          prim_lign = 0  # priming coefficient for lign pool (-1 to 1) use 0.08
          prim_ef = 0  # negative priming coefficient for internal C partitioning (use 0.1 for 20 Mg), biom
          prim_fr = 0  # negative priming coefficient for internal C partioning (use -0.1), biom
          prim_ef_fom = 0  # negative priming for internal C partitioning (use 0.1 for 20 mg),fom
          prim_fr_fom = 0  # negative priming for internal C partitioning (use -0.1 for 20 mg), fom
          biom_cn = 8  # C/N ratio of biom pool
          soil_cn = 12  # C/N ratio of soil stuff
          incorp_depth = 300  # Biochar incorporation depth (mm)
          dul_qual = 0.15  # Slope of dul quality equation (default 0.33)
          bd_qual = 0.15  # Slope of bd quality equation (default 0.33)
          bc_cce = 50  # Biochar LV (cmol/kg?)
          bc_cec = 187  # Biochar ECEC (cmol/kg)
          cnrf_bc_coeff = 0.693  # Biochar cnrf coefficient (0-1)
          cnrf_bc_optcn = 25  # Optimum cn ratio for bc
          bc_wfps_factor = 1  # Biochar WFPS factor (0-1)
          nh4_adsorption = 0.006  # Biochar nh4 absorption coefficient (Langmuir)
          nh4_desorption = 0.006  # Biochar nh4 desorption coefficient (Langmuir)
          # Tillage info
          tillage = 0.8  # % BD reduction due to tillage
          # Soil information
          soil_name = Soil  # Name of the soil as it appears in the simulation tree. This being wrong causes object reference errors.
          soil_order = Mollisol  # Order of the soil
          nclay_portion = 0.95  # Portion of soil clay that is nclay (0-1)
          uph = 9.3  # Soil upper ph
          lph = 3.5  # Soil lower ph
          ab_val = 0  # Acid - Base value
          bot_slope = 10  # Unit conversion for titration curve (use 10)
          # Switches for various biochar components (development purposes)
          decomp_switch = on  # Priming effects? (on/off)
          nitrification_switch = on  # Nitrification effects? (on/off)
          ph_switch = on  # PH effects ? (on/off)
          ll_switch = on  # LL and CLL effects? (on/off)
          dul_switch = on  # DUL effects ? (on/off)
          xf_switch = off  # XF effects? (on/off)
          kl_switch = off  # KL effects? (on/off)
          bd_switch = on  # BD effects? (on/off) (under development)
          biochar_c_switch = on  # Biochar module (on/off)
          swcon_switch = off  # SWCOM effects (on/off)
          ks_switch = off  # Ksat effects ? (on/off)
          sat_switch = on  # SAT effects? (on/off)
          script: same as in LFR.scen_2_61.paddock.biochar5v3
        folder Manager folder1: same as LFR.scen_2_61.paddock.Manager folder1
        Soil: same as LFR.scen_2_62.paddock.Soil
        operations Operations Schedule: same as LFR.scen_2_62.paddock.Operations Schedule
    simulation scen_2_65 -> /simulations/LFR/scen_2_61
      area paddock -> /simulations/LFR/scen_2_61/paddock
        outputfile: filename=scen_2_65.out; title=scen_2_65
          events Reporting Frequency -> /simulations/LFR/scen_2_61/paddock/outputfile/Reporting Frequency
          variables: same as LFR.scen_2_61.paddock.outputfile.Variables
        cotton2 cotton: same as LFR.scen_2_61.paddock.cotton
        manager2 biochar5v3
          date_of_application = 08/12/2010  # Date of biochar application (mm/dd/yyyy)
          biochar_added = 96000  # amount of biochar applied (kg/ha)
          frac_c_biochar = 0.78  # fraction carbon in biochar (0-1)
          biochar_loss = 0.02  # fraction of biochar lost during application (0-1)
          MRT1 = 1  # mean residence time for labile biochar pool (years)
          MRT2 = 500  # mean residence time for resistant biochar pool (years)
          frac_labile = 0.13  # biochar labile fraction (0-1)
          ef_biochar = 0.4  # fraction of decomposed biochar that goes to OC pools (0-1) (biochar efficiency)
          fr_biochar_biom = 0.05  # fraction of decomposed biochar that goes to biom (0-1)
          biochar_cn = 132  # biochar CN ratio
          sand = 0.416  # sand (0-1)
          clay = 0.21  # clay (0-1)
          prim_biom = 0  # priming coefficient for biom pool (-1 to 1) use 0.05
          prim_hum = 0  # priming coefficient for hum pool (-1 to 1) use 0.05
          prim_cell = 0  # priming coefficient for cell pool (-1 to 1) use 0.08
          prim_carb = 0  # priming coefficient for carb pool (-1 to 1) use 0.08
          prim_lign = 0  # priming coefficient for lign pool (-1 to 1) use 0.08
          prim_ef = 0  # negative priming coefficient for internal C partitioning (use 0.1 for 20 Mg), biom
          prim_fr = 0  # negative priming coefficient for internal C partioning (use -0.1), biom
          prim_ef_fom = 0  # negative priming for internal C partitioning (use 0.1 for 20 mg),fom
          prim_fr_fom = 0  # negative priming for internal C partitioning (use -0.1 for 20 mg), fom
          biom_cn = 8  # C/N ratio of biom pool
          soil_cn = 12  # C/N ratio of soil stuff
          incorp_depth = 300  # Biochar incorporation depth (mm)
          dul_qual = 0.15  # Slope of dul quality equation (default 0.33)
          bd_qual = 0.15  # Slope of bd quality equation (default 0.33)
          bc_cce = 50  # Biochar LV (cmol/kg?)
          bc_cec = 187  # Biochar ECEC (cmol/kg)
          cnrf_bc_coeff = 0.693  # Biochar cnrf coefficient (0-1)
          cnrf_bc_optcn = 25  # Optimum cn ratio for bc
          bc_wfps_factor = 1  # Biochar WFPS factor (0-1)
          nh4_adsorption = 0.006  # Biochar nh4 absorption coefficient (Langmuir)
          nh4_desorption = 0.006  # Biochar nh4 desorption coefficient (Langmuir)
          # Tillage info
          tillage = 0.8  # % BD reduction due to tillage
          # Soil information
          soil_name = Soil  # Name of the soil as it appears in the simulation tree. This being wrong causes object reference errors.
          soil_order = Mollisol  # Order of the soil
          nclay_portion = 0.95  # Portion of soil clay that is nclay (0-1)
          uph = 9.3  # Soil upper ph
          lph = 3.5  # Soil lower ph
          ab_val = 0  # Acid - Base value
          bot_slope = 10  # Unit conversion for titration curve (use 10)
          # Switches for various biochar components (development purposes)
          decomp_switch = on  # Priming effects? (on/off)
          nitrification_switch = on  # Nitrification effects? (on/off)
          ph_switch = on  # PH effects ? (on/off)
          ll_switch = on  # LL and CLL effects? (on/off)
          dul_switch = on  # DUL effects ? (on/off)
          xf_switch = off  # XF effects? (on/off)
          kl_switch = off  # KL effects? (on/off)
          bd_switch = on  # BD effects? (on/off) (under development)
          biochar_c_switch = on  # Biochar module (on/off)
          swcon_switch = off  # SWCOM effects (on/off)
          ks_switch = off  # Ksat effects ? (on/off)
          sat_switch = on  # SAT effects? (on/off)
          script: same as in LFR.scen_2_61.paddock.biochar5v3
        folder Manager folder1: same as LFR.scen_2_61.paddock.Manager folder1
        Soil: same as LFR.scen_2_62.paddock.Soil
        operations Operations Schedule: same as LFR.scen_2_62.paddock.Operations Schedule
  factorial Factorials: active=0
    settings
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