folder simulations: version=37; creator=Apsim 7.10-r4220
  memo
    This biochar study was modified from the biochar sims used in the GCB-Bioenergy paper (Archontoulis et al., 2016)

    Archontoulis, S.V., Huber, I., Miguez, F.E., Thorburn, P.J., Rogovska, N., Laird, D.A., 2016. A model for mechanistic and system assessments of biochar effects on soils and crops and trade-offs. GCB Bioenergy 8, 1028–1045. doi:10.1111/gcbb.12314
  folder LRF
    simulation scen_4_41 -> /simulations/LRF/scen_4_53
      area paddock -> /simulations/LRF/scen_4_53/paddock
        outputfile: filename=scen_4_41.out; title=scen_4_41
          events Reporting Frequency -> /simulations/LRF/scen_4_53/paddock/outputfile/Reporting Frequency
          variables
            variable:
              dd/mm/yyyy as Date
              bd(1)
              yield
              sw(1)
              st(1)
              biomass
              dul(1)
              sat(1)
              ph(1)
              n2o_atm_denitrification(1-5) format 8 as n2o_bylayer_kgha
              oc(1-5) format 8 as oc_bylayer_pct
              bd(2)
              dlt_biom_c_hum(1-2)
              dlt_fom_c_hum(1-2)
              dlt_res_c_hum(1-2)
              fom_c_pool1(1-2)
              fom_c_pool2(1-2)
              fom_c_pool3(1-2)
              fr_carb
              fr_cell
              fr_lign
              hum_c(1-2)
              soilp_dlt_res_c_hum(1-2)
              biom_c(1-2)
              hum_c(1-2)
              inert_c(1-2)
        cotton2 cotton
          initsection
            crop_type = cotton
            leaf_res_n_conc = 0.02
            hucut = 40  # oC
            baset = 12  # oC
            open_def = 60  # %
            a_root_leaf = 1.01
            a_stem_leaf = 1.25
            e_par = 2.5  # g/MJ
            specific_lw = 58  # g/m^2
            t_opt = 25  # oC
            t_base = 8  # oC
            wt_area_max = 150
            embryo = 0.75  # g
            f_leaf = 0.6
            f_stem = 0.15
            f_root = 0.25
            elevation_default = 200  # m
            wlog_assimilate_red = 0.2
            wlog_carcap_red = 0.2
            watlog_c = 0.87
            watlog_n = 0.87
            wlog_carcap_red_stress = 0.01
            smi_affect_wlog = 0.75
            days_relief_wlog = 7  # days
            frost_kill_immediate = 2  # oC
            rtdep_max = 130  # cm
            harvest_n_frac = 0.85
            cutout_smi_crit = 0.75
            cutout_smi_days = 5  # days
            cutout_smi_site_red = 0.1
            epcoef1 = 3.051
            epcoef2 = 2.436
            epcoef_smi_crit = 0.5
            fbwstr_low = 0
            fbwstr_high = 0.5
            fbwstr_a = 1
            fbnstr_low = 0
            fbnstr_high = 0.5
            fbnstr_a = 1
            relp_smi_crit = 0.5
            relp_intercept = 0.25
            relp_slope = 0.864
            relp_low = 0
            relp_high = 1
            relp_a = 0.5
            vsnstr_low = 0
            vsnstr_high = 0.9
            vsnstr_a = 1
            flfsmi_low = 0
            flfsmi_high = 0.5
            flfsmi_a = 1
            vlnstr_low = 0
            vlnstr_high = 0.9
            vlnstr_a = 1
            fw_low = 0
            fw_high = 0.25
            fw_a = 1
            adjust_low = 0
            adjust_high = 5
            adjust_a = 1
            fwstrs_low = 0
            fwstrs_high = 0.5
            fwstrs_a = 4
            smi_delay_crit = 0.25
            cold_shock_delay_crit = 11  # oC
            cold_shock_delay = 5.2  # dd
            fert_crit = 1  # kg/ha
            fert_detect = 10  # kg/ha
            days_since_fert_max = 100  # days
            cultivar_default = S71BR
            init cultivars: array=T
              element
                cultivar = _Default_S71BR
                percent_l = 40
                scboll = 5
                respcon = 0.01593
                sqcon = 0.0217
                fcutout = 0.5411
                flai = 0.87
                DDISQ = 402
                TIPOUT = 52
                FRUDD = [50, 161, 307, 338, 484, 630, 848, 1071]
                BLTME = [0, 0, 0, 0.07, 0.21, 0.33, 0.55, 1]
                WT = [0.0104, 0.0272, 0.1441, 0.0988, 0.5042, 0.9617, 1, 0.5785]
                dlds_max = 0.12
                rate_emergence = 1
                popcon = 0.03633
                fburr = 1.23
                ACOTYL = 525
                RLAI = 0.01
                BckGndRetn = 0.9
              element
                cultivar = S71
                percent_l = 42
                scboll = 5.2
                respcon = 0.01593
                sqcon = 0.0217
                fcutout = 0.5411
                flai = 0.87
                DDISQ = 402
                TIPOUT = 52
                FRUDD = [50, 161, 307, 338, 484, 630, 848, 1071]
                BLTME = [0, 0, 0, 0.07, 0.21, 0.33, 0.55, 1]
                WT = [0.0104, 0.0272, 0.1441, 0.0988, 0.5042, 0.9617, 1, 0.5785]
                dlds_max = 0.12
                rate_emergence = 1
                popcon = 0.03633
                fburr = 1.23
                ACOTYL = 525
                RLAI = 0.01
                BckGndRetn = 0.8
              element
                cultivar = S71BR
                percent_l = 40
                scboll = 5
                respcon = 0.01593
                sqcon = 0.0217
                fcutout = 0.5411
                flai = 0.87
                DDISQ = 402
                TIPOUT = 52
                FRUDD = [50, 161, 307, 338, 484, 630, 848, 1071]
                BLTME = [0, 0, 0, 0.07, 0.21, 0.33, 0.55, 1]
                WT = [0.0104, 0.0272, 0.1441, 0.0988, 0.5042, 0.9617, 1, 0.5785]
                dlds_max = 0.12
                rate_emergence = 1
                popcon = 0.03633
                fburr = 1.23
                ACOTYL = 525
                RLAI = 0.01
                BckGndRetn = 0.9
              element
                cultivar = Siok
                percent_l = 42
                scboll = 4.5
                respcon = 0.01593
                sqcon = 0.0228
                fcutout = 0.5411
                flai = 0.52
                DDISQ = 420
                TIPOUT = 52
                FRUDD = [50, 180, 350, 380, 520, 660, 870, 1100]
                BLTME = [0, 0, 0, 0.07, 0.21, 0.33, 0.55, 1]
                WT = [0.0104, 0.0272, 0.1441, 0.0988, 0.5042, 0.9617, 1, 0.5785]
                dlds_max = 0.12
                rate_emergence = 1
                popcon = 0.03633
                fburr = 1.23
                ACOTYL = 525
                RLAI = 0.01
                BckGndRetn = 0.9
              element
                cultivar = Sica
                percent_l = 40
                scboll = 5.5
                respcon = 0.02306
                sqcon = 0.0206
                fcutout = 0.4789
                flai = 0.87
                DDISQ = 420
                TIPOUT = 52
                FRUDD = [50, 180, 350, 380, 520, 660, 870, 1100]
                BLTME = [0, 0, 0, 0.07, 0.21, 0.33, 0.55, 1]
                WT = [0.0104, 0.0272, 0.1441, 0.0988, 0.5042, 0.9617, 1, 0.5785]
                dlds_max = 0.12
                rate_emergence = 1
                popcon = 0.03633
                fburr = 1.23
                ACOTYL = 525
                RLAI = 0.01
                BckGndRetn = 0.9
        Soil -> /simulations/LRF/scen_4_53/paddock/Soil
          SoilWater: SummerCona=3.5; SummerU=6; SummerDate=1-Nov; WinterCona=2.5; WinterU=4; WinterDate=1-Apr; DiffusConst=40; DiffusSlope=16; Salb=0.13; CN2Bare=73; CNRed=20; CNCov=0.8; Thickness=[50, 100, 210, 210, 520, 940]; SWCON=[0.4, 0.4, 0.4, 0.4, 0.4, 0.4]
          InitialWater: FractionFull=1; PercentMethod=FilledFromTop; RelativeTo=cotton
        operations Operations Schedule
          28/04/1987  surfaceorganicmatter tillage type = user_defined, f_incorp = 0.9, tillage_depth = 150
          28/04/1987  fertiliser apply amount = 10 (kg/ha), depth = 50 (mm), type = NO3_N
          20/05/1987  surfaceorganicmatter tillage type = user_defined, f_incorp = 0.1, tillage_depth = 80
          20/05/1987  cotton sow plants = 12, sowing_depth = 25.4, cultivar = s324, row_spacing = 1010, crop_class = plant
          28/04/1988  surfaceorganicmatter tillage type = user_defined, f_incorp = 0.9, tillage_depth = 150
          28/04/1988  fertiliser apply amount = 10 (kg/ha), depth = 50 (mm), type = NO3_N
          20/05/1988  surfaceorganicmatter tillage type = user_defined, f_incorp = 0.1, tillage_depth = 80
          20/05/1988  cotton sow plants = 12, sowing_depth = 25.4, cultivar = s324, row_spacing = 1010, crop_class = plant
          28/04/1989  surfaceorganicmatter tillage type = user_defined, f_incorp = 0.9, tillage_depth = 150
          28/04/1989  fertiliser apply amount = 10 (kg/ha), depth = 50 (mm), type = NO3_N
          20/05/1989  surfaceorganicmatter tillage type = user_defined, f_incorp = 0.1, tillage_depth = 80
          20/05/1989  cotton sow plants = 12, sowing_depth = 25.4, cultivar = s324, row_spacing = 1010, crop_class = plant
          28/04/1990  surfaceorganicmatter tillage type = user_defined, f_incorp = 0.9, tillage_depth = 150
          28/04/1990  fertiliser apply amount = 10 (kg/ha), depth = 50 (mm), type = NO3_N
          20/05/1990  surfaceorganicmatter tillage type = user_defined, f_incorp = 0.1, tillage_depth = 80
          20/05/1990  cotton sow plants = 12, sowing_depth = 25.4, cultivar = s324, row_spacing = 1010, crop_class = plant
          28/04/1991  surfaceorganicmatter tillage type = user_defined, f_incorp = 0.9, tillage_depth = 150
          28/04/1991  fertiliser apply amount = 10 (kg/ha), depth = 50 (mm), type = NO3_N
          20/05/1991  surfaceorganicmatter tillage type = user_defined, f_incorp = 0.1, tillage_depth = 80
          20/05/1991  cotton sow plants = 12, sowing_depth = 25.4, cultivar = s324, row_spacing = 1010, crop_class = plant
          28/04/1992  surfaceorganicmatter tillage type = user_defined, f_incorp = 0.9, tillage_depth = 150
          28/04/1992  fertiliser apply amount = 10 (kg/ha), depth = 50 (mm), type = NO3_N
          20/05/1992  surfaceorganicmatter tillage type = user_defined, f_incorp = 0.1, tillage_depth = 80
          20/05/1992  cotton sow plants = 12, sowing_depth = 25.4, cultivar = s324, row_spacing = 1010, crop_class = plant
          28/04/1993  surfaceorganicmatter tillage type = user_defined, f_incorp = 0.9, tillage_depth = 150
          28/04/1993  fertiliser apply amount = 10 (kg/ha), depth = 50 (mm), type = NO3_N
          20/05/1993  surfaceorganicmatter tillage type = user_defined, f_incorp = 0.1, tillage_depth = 80
          20/05/1993  cotton sow plants = 12, sowing_depth = 25.4, cultivar = s324, row_spacing = 1010, crop_class = plant
          28/04/1994  surfaceorganicmatter tillage type = user_defined, f_incorp = 0.9, tillage_depth = 150
          28/04/1994  fertiliser apply amount = 10 (kg/ha), depth = 50 (mm), type = NO3_N
          20/05/1994  surfaceorganicmatter tillage type = user_defined, f_incorp = 0.1, tillage_depth = 80
          20/05/1994  cotton sow plants = 12, sowing_depth = 25.4, cultivar = s324, row_spacing = 1010, crop_class = plant
          28/04/1995  surfaceorganicmatter tillage type = user_defined, f_incorp = 0.9, tillage_depth = 150
          28/04/1995  fertiliser apply amount = 10 (kg/ha), depth = 50 (mm), type = NO3_N
          20/05/1995  surfaceorganicmatter tillage type = user_defined, f_incorp = 0.1, tillage_depth = 80
          20/05/1995  cotton sow plants = 12, sowing_depth = 25.4, cultivar = s324, row_spacing = 1010, crop_class = plant
          28/04/1996  surfaceorganicmatter tillage type = user_defined, f_incorp = 0.9, tillage_depth = 150
          28/04/1996  fertiliser apply amount = 10 (kg/ha), depth = 50 (mm), type = NO3_N
          20/05/1996  surfaceorganicmatter tillage type = user_defined, f_incorp = 0.1, tillage_depth = 80
          20/05/1996  cotton sow plants = 12, sowing_depth = 25.4, cultivar = s324, row_spacing = 1010, crop_class = plant
          28/04/1997  surfaceorganicmatter tillage type = user_defined, f_incorp = 0.9, tillage_depth = 150
          28/04/1997  fertiliser apply amount = 10 (kg/ha), depth = 50 (mm), type = NO3_N
          20/05/1997  surfaceorganicmatter tillage type = user_defined, f_incorp = 0.1, tillage_depth = 80
          20/05/1997  cotton sow plants = 12, sowing_depth = 25.4, cultivar = s324, row_spacing = 1010, crop_class = plant
          28/04/1998  surfaceorganicmatter tillage type = user_defined, f_incorp = 0.9, tillage_depth = 150
          28/04/1998  fertiliser apply amount = 10 (kg/ha), depth = 50 (mm), type = NO3_N
          20/05/1998  surfaceorganicmatter tillage type = user_defined, f_incorp = 0.1, tillage_depth = 80
          20/05/1998  cotton sow plants = 12, sowing_depth = 25.4, cultivar = s324, row_spacing = 1010, crop_class = plant
          28/04/1999  surfaceorganicmatter tillage type = user_defined, f_incorp = 0.9, tillage_depth = 150
          28/04/1999  fertiliser apply amount = 10 (kg/ha), depth = 50 (mm), type = NO3_N
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          27/05/2003  sorghum sow plants = 3, sowing_depth = 25.4, cultivar = csh13r, row_spacing = 1010, tiller_no_fertile = 1, crop_class = plant
          11/06/2003  surfaceorganicmatter tillage type = user_defined, f_incorp = 0.1, tillage_depth = 5
          28/04/2004  fertiliser apply amount = 22 (kg/ha), depth = 50 (mm), type = NO3_N
          25/04/2005  fertiliser apply amount = 28 (kg/ha), depth = 50 (mm), type = NO3_N
          24/03/2008  fertiliser apply amount = 15 (kg/ha), depth = 50 (mm), type = Rock_P
          12/03/2012  fertiliser apply amount = 26.6 (kg/ha), depth = 50 (mm), type = NO3_N
    simulation scen_4_42 -> /simulations/LRF/scen_4_53
      area paddock -> /simulations/LRF/scen_4_53/paddock
        outputfile: filename=scen_4_42.out; title=scen_4_42
          events Reporting Frequency -> /simulations/LRF/scen_4_53/paddock/outputfile/Reporting Frequency
          variables: same as LRF.scen_4_41.paddock.outputfile.Variables
        cotton2 cotton: same as LRF.scen_4_41.paddock.cotton
        Soil -> /simulations/LRF/scen_4_53/paddock/Soil
          SoilWater: same as LRF.scen_4_41.paddock.Soil.SoilWater
          InitialWater: FractionFull=1; PercentMethod=FilledFromTop; RelativeTo=cotton
        operations Operations Schedule
          28/04/1987  surfaceorganicmatter tillage type = user_defined, f_incorp = 0.9, tillage_depth = 150
          28/04/1987  fertiliser apply amount = 10 (kg/ha), depth = 50 (mm), type = NO3_N
          20/05/1987  surfaceorganicmatter tillage type = user_defined, f_incorp = 0.1, tillage_depth = 80
          20/05/1987  cotton sow plants = 12, sowing_depth = 25.4, cultivar = s324, row_spacing = 1010, crop_class = plant
          28/04/1988  surfaceorganicmatter tillage type = user_defined, f_incorp = 0.9, tillage_depth = 150
          28/04/1988  fertiliser apply amount = 10 (kg/ha), depth = 50 (mm), type = NO3_N
          20/05/1988  surfaceorganicmatter tillage type = user_defined, f_incorp = 0.1, tillage_depth = 80
          20/05/1988  cotton sow plants = 12, sowing_depth = 25.4, cultivar = s324, row_spacing = 1010, crop_class = plant
          28/04/1989  surfaceorganicmatter tillage type = user_defined, f_incorp = 0.9, tillage_depth = 150
          28/04/1989  fertiliser apply amount = 10 (kg/ha), depth = 50 (mm), type = NO3_N
          20/05/1989  surfaceorganicmatter tillage type = user_defined, f_incorp = 0.1, tillage_depth = 80
          20/05/1989  cotton sow plants = 12, sowing_depth = 25.4, cultivar = s324, row_spacing = 1010, crop_class = plant
          28/04/1990  surfaceorganicmatter tillage type = user_defined, f_incorp = 0.9, tillage_depth = 150
          28/04/1990  fertiliser apply amount = 10 (kg/ha), depth = 50 (mm), type = NO3_N
          20/05/1990  surfaceorganicmatter tillage type = user_defined, f_incorp = 0.1, tillage_depth = 80
          20/05/1990  cotton sow plants = 12, sowing_depth = 25.4, cultivar = s324, row_spacing = 1010, crop_class = plant
          28/04/1991  surfaceorganicmatter tillage type = user_defined, f_incorp = 0.9, tillage_depth = 150
          28/04/1991  fertiliser apply amount = 10 (kg/ha), depth = 50 (mm), type = NO3_N
          20/05/1991  surfaceorganicmatter tillage type = user_defined, f_incorp = 0.1, tillage_depth = 80
          20/05/1991  cotton sow plants = 12, sowing_depth = 25.4, cultivar = s324, row_spacing = 1010, crop_class = plant
          28/04/1992  surfaceorganicmatter tillage type = user_defined, f_incorp = 0.9, tillage_depth = 150
          28/04/1992  fertiliser apply amount = 10 (kg/ha), depth = 50 (mm), type = NO3_N
          20/05/1992  surfaceorganicmatter tillage type = user_defined, f_incorp = 0.1, tillage_depth = 80
          20/05/1992  cotton sow plants = 12, sowing_depth = 25.4, cultivar = s324, row_spacing = 1010, crop_class = plant
          28/04/1993  surfaceorganicmatter tillage type = user_defined, f_incorp = 0.9, tillage_depth = 150
          28/04/1993  fertiliser apply amount = 10 (kg/ha), depth = 50 (mm), type = NO3_N
          20/05/1993  surfaceorganicmatter tillage type = user_defined, f_incorp = 0.1, tillage_depth = 80
          20/05/1993  cotton sow plants = 12, sowing_depth = 25.4, cultivar = s324, row_spacing = 1010, crop_class = plant
          28/04/1994  surfaceorganicmatter tillage type = user_defined, f_incorp = 0.9, tillage_depth = 150
          28/04/1994  fertiliser apply amount = 10 (kg/ha), depth = 50 (mm), type = NO3_N
          20/05/1994  surfaceorganicmatter tillage type = user_defined, f_incorp = 0.1, tillage_depth = 80
          20/05/1994  cotton sow plants = 12, sowing_depth = 25.4, cultivar = s324, row_spacing = 1010, crop_class = plant
          28/04/1995  surfaceorganicmatter tillage type = user_defined, f_incorp = 0.9, tillage_depth = 150
          28/04/1995  fertiliser apply amount = 10 (kg/ha), depth = 50 (mm), type = NO3_N
          20/05/1995  surfaceorganicmatter tillage type = user_defined, f_incorp = 0.1, tillage_depth = 80
          20/05/1995  cotton sow plants = 12, sowing_depth = 25.4, cultivar = s324, row_spacing = 1010, crop_class = plant
          28/04/1996  surfaceorganicmatter tillage type = user_defined, f_incorp = 0.9, tillage_depth = 150
          28/04/1996  fertiliser apply amount = 10 (kg/ha), depth = 50 (mm), type = NO3_N
          20/05/1996  surfaceorganicmatter tillage type = user_defined, f_incorp = 0.1, tillage_depth = 80
          20/05/1996  cotton sow plants = 12, sowing_depth = 25.4, cultivar = s324, row_spacing = 1010, crop_class = plant
          28/04/1997  surfaceorganicmatter tillage type = user_defined, f_incorp = 0.9, tillage_depth = 150
          28/04/1997  fertiliser apply amount = 10 (kg/ha), depth = 50 (mm), type = NO3_N
          20/05/1997  surfaceorganicmatter tillage type = user_defined, f_incorp = 0.1, tillage_depth = 80
          20/05/1997  cotton sow plants = 12, sowing_depth = 25.4, cultivar = s324, row_spacing = 1010, crop_class = plant
          28/04/1998  surfaceorganicmatter tillage type = user_defined, f_incorp = 0.9, tillage_depth = 150
          28/04/1998  fertiliser apply amount = 10 (kg/ha), depth = 50 (mm), type = NO3_N
          20/05/1998  surfaceorganicmatter tillage type = user_defined, f_incorp = 0.1, tillage_depth = 80
          20/05/1998  cotton sow plants = 12, sowing_depth = 25.4, cultivar = s324, row_spacing = 1010, crop_class = plant
          28/04/1999  surfaceorganicmatter tillage type = user_defined, f_incorp = 0.9, tillage_depth = 150
          28/04/1999  fertiliser apply amount = 10 (kg/ha), depth = 50 (mm), type = NO3_N
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          27/05/2003  sorghum sow plants = 3, sowing_depth = 25.4, cultivar = csh13r, row_spacing = 1010, tiller_no_fertile = 1, crop_class = plant
          11/06/2003  surfaceorganicmatter tillage type = user_defined, f_incorp = 0.1, tillage_depth = 5
          28/04/2004  fertiliser apply amount = 22 (kg/ha), depth = 50 (mm), type = NO3_N
          25/04/2005  fertiliser apply amount = 28 (kg/ha), depth = 50 (mm), type = NO3_N
          24/03/2008  fertiliser apply amount = 15 (kg/ha), depth = 50 (mm), type = Rock_P
          12/03/2012  fertiliser apply amount = 23.8 (kg/ha), depth = 50 (mm), type = NO3_N
    simulation scen_4_43 -> /simulations/LRF/scen_4_53
      area paddock -> /simulations/LRF/scen_4_53/paddock
        outputfile: filename=scen_4_43.out; title=scen_4_43
          events Reporting Frequency -> /simulations/LRF/scen_4_53/paddock/outputfile/Reporting Frequency
          variables: same as LRF.scen_4_41.paddock.outputfile.Variables
        cotton2 cotton: same as LRF.scen_4_41.paddock.cotton
        Soil -> /simulations/LRF/scen_4_53/paddock/Soil
          SoilWater: same as LRF.scen_4_41.paddock.Soil.SoilWater
          InitialWater: FractionFull=1; PercentMethod=FilledFromTop; RelativeTo=cotton
        operations Operations Schedule
          28/04/1987  surfaceorganicmatter tillage type = user_defined, f_incorp = 0.9, tillage_depth = 150
          28/04/1987  fertiliser apply amount = 10 (kg/ha), depth = 50 (mm), type = NO3_N
          20/05/1987  surfaceorganicmatter tillage type = user_defined, f_incorp = 0.1, tillage_depth = 80
          20/05/1987  cotton sow plants = 12, sowing_depth = 25.4, cultivar = s324, row_spacing = 1010, crop_class = plant
          28/04/1988  surfaceorganicmatter tillage type = user_defined, f_incorp = 0.9, tillage_depth = 150
          28/04/1988  fertiliser apply amount = 10 (kg/ha), depth = 50 (mm), type = NO3_N
          20/05/1988  surfaceorganicmatter tillage type = user_defined, f_incorp = 0.1, tillage_depth = 80
          20/05/1988  cotton sow plants = 12, sowing_depth = 25.4, cultivar = s324, row_spacing = 1010, crop_class = plant
          28/04/1989  surfaceorganicmatter tillage type = user_defined, f_incorp = 0.9, tillage_depth = 150
          28/04/1989  fertiliser apply amount = 10 (kg/ha), depth = 50 (mm), type = NO3_N
          20/05/1989  surfaceorganicmatter tillage type = user_defined, f_incorp = 0.1, tillage_depth = 80
          20/05/1989  cotton sow plants = 12, sowing_depth = 25.4, cultivar = s324, row_spacing = 1010, crop_class = plant
          28/04/1990  surfaceorganicmatter tillage type = user_defined, f_incorp = 0.9, tillage_depth = 150
          28/04/1990  fertiliser apply amount = 10 (kg/ha), depth = 50 (mm), type = NO3_N
          20/05/1990  surfaceorganicmatter tillage type = user_defined, f_incorp = 0.1, tillage_depth = 80
          20/05/1990  cotton sow plants = 12, sowing_depth = 25.4, cultivar = s324, row_spacing = 1010, crop_class = plant
          28/04/1991  surfaceorganicmatter tillage type = user_defined, f_incorp = 0.9, tillage_depth = 150
          28/04/1991  fertiliser apply amount = 10 (kg/ha), depth = 50 (mm), type = NO3_N
          20/05/1991  surfaceorganicmatter tillage type = user_defined, f_incorp = 0.1, tillage_depth = 80
          20/05/1991  cotton sow plants = 12, sowing_depth = 25.4, cultivar = s324, row_spacing = 1010, crop_class = plant
          28/04/1992  surfaceorganicmatter tillage type = user_defined, f_incorp = 0.9, tillage_depth = 150
          28/04/1992  fertiliser apply amount = 10 (kg/ha), depth = 50 (mm), type = NO3_N
          20/05/1992  surfaceorganicmatter tillage type = user_defined, f_incorp = 0.1, tillage_depth = 80
          20/05/1992  cotton sow plants = 12, sowing_depth = 25.4, cultivar = s324, row_spacing = 1010, crop_class = plant
          28/04/1993  surfaceorganicmatter tillage type = user_defined, f_incorp = 0.9, tillage_depth = 150
          28/04/1993  fertiliser apply amount = 10 (kg/ha), depth = 50 (mm), type = NO3_N
          20/05/1993  surfaceorganicmatter tillage type = user_defined, f_incorp = 0.1, tillage_depth = 80
          20/05/1993  cotton sow plants = 12, sowing_depth = 25.4, cultivar = s324, row_spacing = 1010, crop_class = plant
          28/04/1994  surfaceorganicmatter tillage type = user_defined, f_incorp = 0.9, tillage_depth = 150
          28/04/1994  fertiliser apply amount = 10 (kg/ha), depth = 50 (mm), type = NO3_N
          20/05/1994  surfaceorganicmatter tillage type = user_defined, f_incorp = 0.1, tillage_depth = 80
          20/05/1994  cotton sow plants = 12, sowing_depth = 25.4, cultivar = s324, row_spacing = 1010, crop_class = plant
          28/04/1995  surfaceorganicmatter tillage type = user_defined, f_incorp = 0.9, tillage_depth = 150
          28/04/1995  fertiliser apply amount = 10 (kg/ha), depth = 50 (mm), type = NO3_N
          20/05/1995  surfaceorganicmatter tillage type = user_defined, f_incorp = 0.1, tillage_depth = 80
          20/05/1995  cotton sow plants = 12, sowing_depth = 25.4, cultivar = s324, row_spacing = 1010, crop_class = plant
          28/04/1996  surfaceorganicmatter tillage type = user_defined, f_incorp = 0.9, tillage_depth = 150
          28/04/1996  fertiliser apply amount = 10 (kg/ha), depth = 50 (mm), type = NO3_N
          20/05/1996  surfaceorganicmatter tillage type = user_defined, f_incorp = 0.1, tillage_depth = 80
          20/05/1996  cotton sow plants = 12, sowing_depth = 25.4, cultivar = s324, row_spacing = 1010, crop_class = plant
          28/04/1997  surfaceorganicmatter tillage type = user_defined, f_incorp = 0.9, tillage_depth = 150
          28/04/1997  fertiliser apply amount = 10 (kg/ha), depth = 50 (mm), type = NO3_N
          20/05/1997  surfaceorganicmatter tillage type = user_defined, f_incorp = 0.1, tillage_depth = 80
          20/05/1997  cotton sow plants = 12, sowing_depth = 25.4, cultivar = s324, row_spacing = 1010, crop_class = plant
          28/04/1998  surfaceorganicmatter tillage type = user_defined, f_incorp = 0.9, tillage_depth = 150
          28/04/1998  fertiliser apply amount = 10 (kg/ha), depth = 50 (mm), type = NO3_N
          20/05/1998  surfaceorganicmatter tillage type = user_defined, f_incorp = 0.1, tillage_depth = 80
          20/05/1998  cotton sow plants = 12, sowing_depth = 25.4, cultivar = s324, row_spacing = 1010, crop_class = plant
          28/04/1999  surfaceorganicmatter tillage type = user_defined, f_incorp = 0.9, tillage_depth = 150
          28/04/1999  fertiliser apply amount = 10 (kg/ha), depth = 50 (mm), type = NO3_N
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          27/05/2003  sorghum sow plants = 3, sowing_depth = 25.4, cultivar = csh13r, row_spacing = 1010, tiller_no_fertile = 1, crop_class = plant
          11/06/2003  surfaceorganicmatter tillage type = user_defined, f_incorp = 0.1, tillage_depth = 5
          28/04/2004  fertiliser apply amount = 22 (kg/ha), depth = 50 (mm), type = NO3_N
          25/04/2005  fertiliser apply amount = 28 (kg/ha), depth = 50 (mm), type = NO3_N
          24/03/2008  fertiliser apply amount = 15 (kg/ha), depth = 50 (mm), type = Rock_P
          12/03/2012  fertiliser apply amount = 21 (kg/ha), depth = 50 (mm), type = NO3_N
    simulation scen_4_44 -> /simulations/LRF/scen_4_53
      area paddock -> /simulations/LRF/scen_4_53/paddock
        outputfile: filename=scen_4_44.out; title=scen_4_44
          events Reporting Frequency -> /simulations/LRF/scen_4_53/paddock/outputfile/Reporting Frequency
          variables: same as LRF.scen_4_41.paddock.outputfile.Variables
        cotton2 cotton: same as LRF.scen_4_41.paddock.cotton
        Soil -> /simulations/LRF/scen_4_53/paddock/Soil
          SoilWater: same as LRF.scen_4_41.paddock.Soil.SoilWater
          InitialWater: FractionFull=1; PercentMethod=FilledFromTop; RelativeTo=cotton
        operations Operations Schedule
          28/04/1987  surfaceorganicmatter tillage type = user_defined, f_incorp = 0.9, tillage_depth = 150
          28/04/1987  fertiliser apply amount = 10 (kg/ha), depth = 50 (mm), type = NO3_N
          20/05/1987  surfaceorganicmatter tillage type = user_defined, f_incorp = 0.1, tillage_depth = 80
          20/05/1987  cotton sow plants = 12, sowing_depth = 25.4, cultivar = s324, row_spacing = 1010, crop_class = plant
          28/04/1988  surfaceorganicmatter tillage type = user_defined, f_incorp = 0.9, tillage_depth = 150
          28/04/1988  fertiliser apply amount = 10 (kg/ha), depth = 50 (mm), type = NO3_N
          20/05/1988  surfaceorganicmatter tillage type = user_defined, f_incorp = 0.1, tillage_depth = 80
          20/05/1988  cotton sow plants = 12, sowing_depth = 25.4, cultivar = s324, row_spacing = 1010, crop_class = plant
          28/04/1989  surfaceorganicmatter tillage type = user_defined, f_incorp = 0.9, tillage_depth = 150
          28/04/1989  fertiliser apply amount = 10 (kg/ha), depth = 50 (mm), type = NO3_N
          20/05/1989  surfaceorganicmatter tillage type = user_defined, f_incorp = 0.1, tillage_depth = 80
          20/05/1989  cotton sow plants = 12, sowing_depth = 25.4, cultivar = s324, row_spacing = 1010, crop_class = plant
          28/04/1990  surfaceorganicmatter tillage type = user_defined, f_incorp = 0.9, tillage_depth = 150
          28/04/1990  fertiliser apply amount = 10 (kg/ha), depth = 50 (mm), type = NO3_N
          20/05/1990  surfaceorganicmatter tillage type = user_defined, f_incorp = 0.1, tillage_depth = 80
          20/05/1990  cotton sow plants = 12, sowing_depth = 25.4, cultivar = s324, row_spacing = 1010, crop_class = plant
          28/04/1991  surfaceorganicmatter tillage type = user_defined, f_incorp = 0.9, tillage_depth = 150
          28/04/1991  fertiliser apply amount = 10 (kg/ha), depth = 50 (mm), type = NO3_N
          20/05/1991  surfaceorganicmatter tillage type = user_defined, f_incorp = 0.1, tillage_depth = 80
          20/05/1991  cotton sow plants = 12, sowing_depth = 25.4, cultivar = s324, row_spacing = 1010, crop_class = plant
          28/04/1992  surfaceorganicmatter tillage type = user_defined, f_incorp = 0.9, tillage_depth = 150
          28/04/1992  fertiliser apply amount = 10 (kg/ha), depth = 50 (mm), type = NO3_N
          20/05/1992  surfaceorganicmatter tillage type = user_defined, f_incorp = 0.1, tillage_depth = 80
          20/05/1992  cotton sow plants = 12, sowing_depth = 25.4, cultivar = s324, row_spacing = 1010, crop_class = plant
          28/04/1993  surfaceorganicmatter tillage type = user_defined, f_incorp = 0.9, tillage_depth = 150
          28/04/1993  fertiliser apply amount = 10 (kg/ha), depth = 50 (mm), type = NO3_N
          20/05/1993  surfaceorganicmatter tillage type = user_defined, f_incorp = 0.1, tillage_depth = 80
          20/05/1993  cotton sow plants = 12, sowing_depth = 25.4, cultivar = s324, row_spacing = 1010, crop_class = plant
          28/04/1994  surfaceorganicmatter tillage type = user_defined, f_incorp = 0.9, tillage_depth = 150
          28/04/1994  fertiliser apply amount = 10 (kg/ha), depth = 50 (mm), type = NO3_N
          20/05/1994  surfaceorganicmatter tillage type = user_defined, f_incorp = 0.1, tillage_depth = 80
          20/05/1994  cotton sow plants = 12, sowing_depth = 25.4, cultivar = s324, row_spacing = 1010, crop_class = plant
          28/04/1995  surfaceorganicmatter tillage type = user_defined, f_incorp = 0.9, tillage_depth = 150
          28/04/1995  fertiliser apply amount = 10 (kg/ha), depth = 50 (mm), type = NO3_N
          20/05/1995  surfaceorganicmatter tillage type = user_defined, f_incorp = 0.1, tillage_depth = 80
          20/05/1995  cotton sow plants = 12, sowing_depth = 25.4, cultivar = s324, row_spacing = 1010, crop_class = plant
          28/04/1996  surfaceorganicmatter tillage type = user_defined, f_incorp = 0.9, tillage_depth = 150
          28/04/1996  fertiliser apply amount = 10 (kg/ha), depth = 50 (mm), type = NO3_N
          20/05/1996  surfaceorganicmatter tillage type = user_defined, f_incorp = 0.1, tillage_depth = 80
          20/05/1996  cotton sow plants = 12, sowing_depth = 25.4, cultivar = s324, row_spacing = 1010, crop_class = plant
          28/04/1997  surfaceorganicmatter tillage type = user_defined, f_incorp = 0.9, tillage_depth = 150
          28/04/1997  fertiliser apply amount = 10 (kg/ha), depth = 50 (mm), type = NO3_N
          20/05/1997  surfaceorganicmatter tillage type = user_defined, f_incorp = 0.1, tillage_depth = 80
          20/05/1997  cotton sow plants = 12, sowing_depth = 25.4, cultivar = s324, row_spacing = 1010, crop_class = plant
          28/04/1998  surfaceorganicmatter tillage type = user_defined, f_incorp = 0.9, tillage_depth = 150
          28/04/1998  fertiliser apply amount = 10 (kg/ha), depth = 50 (mm), type = NO3_N
          20/05/1998  surfaceorganicmatter tillage type = user_defined, f_incorp = 0.1, tillage_depth = 80
          20/05/1998  cotton sow plants = 12, sowing_depth = 25.4, cultivar = s324, row_spacing = 1010, crop_class = plant
          28/04/1999  surfaceorganicmatter tillage type = user_defined, f_incorp = 0.9, tillage_depth = 150
          28/04/1999  fertiliser apply amount = 10 (kg/ha), depth = 50 (mm), type = NO3_N
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          27/05/2003  sorghum sow plants = 3, sowing_depth = 25.4, cultivar = csh13r, row_spacing = 1010, tiller_no_fertile = 1, crop_class = plant
          11/06/2003  surfaceorganicmatter tillage type = user_defined, f_incorp = 0.1, tillage_depth = 5
          28/04/2004  fertiliser apply amount = 22 (kg/ha), depth = 50 (mm), type = NO3_N
          25/04/2005  fertiliser apply amount = 28 (kg/ha), depth = 50 (mm), type = NO3_N
          24/03/2008  fertiliser apply amount = 15 (kg/ha), depth = 50 (mm), type = Rock_P
          12/03/2012  fertiliser apply amount = 18.2 (kg/ha), depth = 50 (mm), type = NO3_N
    simulation scen_4_51 -> /simulations/LRF/scen_4_53
      area paddock -> /simulations/LRF/scen_4_53/paddock
        outputfile: filename=scen_4_51.out; title=scen_4_51
          events Reporting Frequency -> /simulations/LRF/scen_4_53/paddock/outputfile/Reporting Frequency
          variables: same as LRF.scen_4_41.paddock.outputfile.Variables
        cotton2 cotton: same as LRF.scen_4_41.paddock.cotton
        folder Manager folder1 -> /simulations/LRF/scen_4_53/paddock/Manager folder1
          manager Harvesting and remove1
            # Harvesting criteria
            crop = cotton  # Enter name of crop to harvest when ripe
            # Tillage criteria
            surfaceom = SurfaceOrganicMatter  # Name of surface organic matter module
            removal = .5  # Removal fraction (0-1)
            on end_of_day:
```
           if ('[crop]' = 'cotton') then

               !!  cotton defoliation
                if ([crop].stageName = 'mature'  and  [crop].defol_das = 0) then
                    [crop] defoliate
                endif
          
                !! cotton harvest
                if ([crop].stageName = 'harvest_ripe' or [crop].PlantStatus = 'dead') then
                   !!report_harvest do_output
                   [crop] harvest
                   [crop] end_crop
                   '[surfaceom]' tillage type = user_defined, f_incorp = [removal] (), tillage_depth = 0.0 ()
                endif

           endif
```
          manager Harvesting and remove2
            # Harvesting criteria
            crop = sorghum  # Enter name of crop to harvest when ripe
            # Tillage criteria
            surfaceom = SurfaceOrganicMatter  # Name of surface organic matter module
            removal = .5  # Removal fraction (0-1)
            on end_of_day:
```
           if ('[crop]' = 'cotton') then
              if ([crop].ozcot_status > 0) then
                  [crop] harvest
              endif
           elseif ([crop].StageName = 'harvest_ripe' or [crop].plant_status = 'dead') then
              [crop]  harvest
              [crop]  end_crop
              '[surfaceom]' tillage type = user_defined, f_incorp = [removal] (), tillage_depth = 0.0 ()
           endif
```
        Soil -> /simulations/LRF/scen_4_53/paddock/Soil
          SoilWater: same as LRF.scen_4_41.paddock.Soil.SoilWater
          InitialWater: FractionFull=1; PercentMethod=FilledFromTop; RelativeTo=cotton
        operations Operations Schedule
          28/04/1987  surfaceorganicmatter tillage type = user_defined, f_incorp = 0.9, tillage_depth = 150
          28/04/1987  fertiliser apply amount = 10 (kg/ha), depth = 50 (mm), type = NO3_N
          20/05/1987  surfaceorganicmatter tillage type = user_defined, f_incorp = 0.1, tillage_depth = 80
          20/05/1987  cotton sow plants = 12, sowing_depth = 25.4, cultivar = s324, row_spacing = 1010, crop_class = plant
          28/04/1988  surfaceorganicmatter tillage type = user_defined, f_incorp = 0.9, tillage_depth = 150
          28/04/1988  fertiliser apply amount = 10 (kg/ha), depth = 50 (mm), type = NO3_N
          20/05/1988  surfaceorganicmatter tillage type = user_defined, f_incorp = 0.1, tillage_depth = 80
          20/05/1988  cotton sow plants = 12, sowing_depth = 25.4, cultivar = s324, row_spacing = 1010, crop_class = plant
          28/04/1989  surfaceorganicmatter tillage type = user_defined, f_incorp = 0.9, tillage_depth = 150
          28/04/1989  fertiliser apply amount = 10 (kg/ha), depth = 50 (mm), type = NO3_N
          20/05/1989  surfaceorganicmatter tillage type = user_defined, f_incorp = 0.1, tillage_depth = 80
          20/05/1989  cotton sow plants = 12, sowing_depth = 25.4, cultivar = s324, row_spacing = 1010, crop_class = plant
          28/04/1990  surfaceorganicmatter tillage type = user_defined, f_incorp = 0.9, tillage_depth = 150
          28/04/1990  fertiliser apply amount = 10 (kg/ha), depth = 50 (mm), type = NO3_N
          20/05/1990  surfaceorganicmatter tillage type = user_defined, f_incorp = 0.1, tillage_depth = 80
          20/05/1990  cotton sow plants = 12, sowing_depth = 25.4, cultivar = s324, row_spacing = 1010, crop_class = plant
          28/04/1991  surfaceorganicmatter tillage type = user_defined, f_incorp = 0.9, tillage_depth = 150
          28/04/1991  fertiliser apply amount = 10 (kg/ha), depth = 50 (mm), type = NO3_N
          20/05/1991  surfaceorganicmatter tillage type = user_defined, f_incorp = 0.1, tillage_depth = 80
          20/05/1991  cotton sow plants = 12, sowing_depth = 25.4, cultivar = s324, row_spacing = 1010, crop_class = plant
          28/04/1992  surfaceorganicmatter tillage type = user_defined, f_incorp = 0.9, tillage_depth = 150
          28/04/1992  fertiliser apply amount = 10 (kg/ha), depth = 50 (mm), type = NO3_N
          20/05/1992  surfaceorganicmatter tillage type = user_defined, f_incorp = 0.1, tillage_depth = 80
          20/05/1992  cotton sow plants = 12, sowing_depth = 25.4, cultivar = s324, row_spacing = 1010, crop_class = plant
          28/04/1993  surfaceorganicmatter tillage type = user_defined, f_incorp = 0.9, tillage_depth = 150
          28/04/1993  fertiliser apply amount = 10 (kg/ha), depth = 50 (mm), type = NO3_N
          20/05/1993  surfaceorganicmatter tillage type = user_defined, f_incorp = 0.1, tillage_depth = 80
          20/05/1993  cotton sow plants = 12, sowing_depth = 25.4, cultivar = s324, row_spacing = 1010, crop_class = plant
          28/04/1994  surfaceorganicmatter tillage type = user_defined, f_incorp = 0.9, tillage_depth = 150
          28/04/1994  fertiliser apply amount = 10 (kg/ha), depth = 50 (mm), type = NO3_N
          20/05/1994  surfaceorganicmatter tillage type = user_defined, f_incorp = 0.1, tillage_depth = 80
          20/05/1994  cotton sow plants = 12, sowing_depth = 25.4, cultivar = s324, row_spacing = 1010, crop_class = plant
          28/04/1995  surfaceorganicmatter tillage type = user_defined, f_incorp = 0.9, tillage_depth = 150
          28/04/1995  fertiliser apply amount = 10 (kg/ha), depth = 50 (mm), type = NO3_N
          20/05/1995  surfaceorganicmatter tillage type = user_defined, f_incorp = 0.1, tillage_depth = 80
          20/05/1995  cotton sow plants = 12, sowing_depth = 25.4, cultivar = s324, row_spacing = 1010, crop_class = plant
          28/04/1996  surfaceorganicmatter tillage type = user_defined, f_incorp = 0.9, tillage_depth = 150
          28/04/1996  fertiliser apply amount = 10 (kg/ha), depth = 50 (mm), type = NO3_N
          20/05/1996  surfaceorganicmatter tillage type = user_defined, f_incorp = 0.1, tillage_depth = 80
          20/05/1996  cotton sow plants = 12, sowing_depth = 25.4, cultivar = s324, row_spacing = 1010, crop_class = plant
          28/04/1997  surfaceorganicmatter tillage type = user_defined, f_incorp = 0.9, tillage_depth = 150
          28/04/1997  fertiliser apply amount = 10 (kg/ha), depth = 50 (mm), type = NO3_N
          20/05/1997  surfaceorganicmatter tillage type = user_defined, f_incorp = 0.1, tillage_depth = 80
          20/05/1997  cotton sow plants = 12, sowing_depth = 25.4, cultivar = s324, row_spacing = 1010, crop_class = plant
          28/04/1998  surfaceorganicmatter tillage type = user_defined, f_incorp = 0.9, tillage_depth = 150
          28/04/1998  fertiliser apply amount = 10 (kg/ha), depth = 50 (mm), type = NO3_N
          20/05/1998  surfaceorganicmatter tillage type = user_defined, f_incorp = 0.1, tillage_depth = 80
          20/05/1998  cotton sow plants = 12, sowing_depth = 25.4, cultivar = s324, row_spacing = 1010, crop_class = plant
          28/04/1999  surfaceorganicmatter tillage type = user_defined, f_incorp = 0.9, tillage_depth = 150
          28/04/1999  fertiliser apply amount = 10 (kg/ha), depth = 50 (mm), type = NO3_N
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          27/05/2003  sorghum sow plants = 3, sowing_depth = 25.4, cultivar = csh13r, row_spacing = 1010, tiller_no_fertile = 1, crop_class = plant
          11/06/2003  surfaceorganicmatter tillage type = user_defined, f_incorp = 0.1, tillage_depth = 5
          28/04/2004  fertiliser apply amount = 22 (kg/ha), depth = 50 (mm), type = NO3_N
          25/04/2005  fertiliser apply amount = 28 (kg/ha), depth = 50 (mm), type = NO3_N
          24/03/2008  fertiliser apply amount = 15 (kg/ha), depth = 50 (mm), type = Rock_P
    simulation scen_4_52 -> /simulations/LRF/scen_4_53
      area paddock -> /simulations/LRF/scen_4_53/paddock
        outputfile: filename=scen_4_52.out; title=scen_4_52
          events Reporting Frequency -> /simulations/LRF/scen_4_53/paddock/outputfile/Reporting Frequency
          variables: same as LRF.scen_4_41.paddock.outputfile.Variables
        cotton2 cotton: same as LRF.scen_4_41.paddock.cotton
        folder Manager folder1 -> /simulations/LRF/scen_4_53/paddock/Manager folder1
          manager Harvesting and remove1
            # Harvesting criteria
            crop = cotton  # Enter name of crop to harvest when ripe
            # Tillage criteria
            surfaceom = SurfaceOrganicMatter  # Name of surface organic matter module
            removal = .25  # Removal fraction (0-1)
            on end_of_day:
            script: same as in LRF.scen_4_51.paddock.Manager folder1.Harvesting and remove1
          manager Harvesting and remove2
            # Harvesting criteria
            crop = sorghum  # Enter name of crop to harvest when ripe
            # Tillage criteria
            surfaceom = SurfaceOrganicMatter  # Name of surface organic matter module
            removal = .25  # Removal fraction (0-1)
            on end_of_day:
            script: same as in LRF.scen_4_51.paddock.Manager folder1.Harvesting and remove2
        Soil -> /simulations/LRF/scen_4_53/paddock/Soil
          SoilWater: same as LRF.scen_4_41.paddock.Soil.SoilWater
          InitialWater: FractionFull=1; PercentMethod=FilledFromTop; RelativeTo=cotton
        operations Operations Schedule: same as LRF.scen_4_51.paddock.Operations Schedule
    simulation scen_4_53
      metfile met: filename=basic_wth_4.met
      clock
        start_date = 01/01/1987  # Enter the start date of the simulation
        end_date = 31/12/2100  # Enter the end date of the simulation
      summaryfile
      area paddock
        surfaceom SurfaceOrganicMatter
          PoolName = soybean  # Organic Matter pool name
          type = soybean  # Organic Matter type
          mass = 1000  # Initial surface residue (kg/ha)
          cnr = 27  # C:N ratio of initial residue
          standing_fraction = 0  # Fraction of residue standing
        fertiliser
        outputfile: filename=scen_4_53.out; title=scen_4_53
          events Reporting Frequency: event=daily
          variables: same as LRF.scen_4_41.paddock.outputfile.Variables
        cotton2 cotton: same as LRF.scen_4_41.paddock.cotton
        sorghum
        folder Manager folder1
          manager Harvesting and remove1
            # Harvesting criteria
            crop = cotton  # Enter name of crop to harvest when ripe
            # Tillage criteria
            surfaceom = SurfaceOrganicMatter  # Name of surface organic matter module
            removal = 0  # Removal fraction (0-1)
            on end_of_day:
            script: same as in LRF.scen_4_51.paddock.Manager folder1.Harvesting and remove1
          manager Harvesting and remove2
            # Harvesting criteria
            crop = sorghum  # Enter name of crop to harvest when ripe
            # Tillage criteria
            surfaceom = SurfaceOrganicMatter  # Name of surface organic matter module
            removal = 0  # Removal fraction (0-1)
            on end_of_day:
            script: same as in LRF.scen_4_51.paddock.Manager folder1.Harvesting and remove2
        Soil: SoilType=Kalamazoo:187069; Site=Liberty Research Farm; NearestTown=Lubbock; State=TX; Country=USA; ApsoilNumber=0; Latitude=33.684; Longitude=-101.768; YearOfSampling=0
          DataSource=SSURGO (https://sdmdataaccess.nrcs.usda.gov/) through R package soilDB, R package apsimx function ssurgo2sp. Timestamp 2022-10-02 21:52:50
          Comments=cokey = 22386986 - acres percent = 95 - component percent = 95 - taxonomic classification name = Fine-loamy, mixed, active, mesic Typic Hapludalfs - drainage class = Well drained - elevation = 275 - slope = 3 - geomdesc = Head Slope, Interfluve, Nose Slope, Side Slope
          Water
            Thickness  BD    AirDry  LL15   DUL    SAT    KS
            50         1.27  0.0923  0.1    0.18   0.52   2154.5
            100        1.36  0.092   0.1    0.18   0.488  1619.9
            210        1.66  0.1034  0.109  0.198  0.374  328.8
            210        1.58  0.1777  0.182  0.293  0.404  82.9
            520        1.61  0.1646  0.166  0.274  0.396  105.4
            940        1.65  0.1305  0.13   0.222  0.377  238.7
            BD, DUL source: Field measured and checked for sensibility (layer 1, 2, 3, 4, 5)
            AirDry, LL15 source: Estimated based on local knowledge (layer 1, 2, 3, 4, 5)
            SAT source: Calculated from measured, estimated or calculated BD (layer 1, 2, 3, 4, 5)
            SoilCrop cotton: LL=[0.1, 0.1, 0.109, 0.182, 0.166, 0.13]; KL=[0.06, 0.0491, 0.0402, 0.0329, 0.027, 0.0221]; XF=[1, 1, 1, 1, 1, 1]
              LL source: Field measured and checked for sensibility (layer 1, 2, 3, 4, 5)
            SoilCrop sorghum: same as LRF.scen_4_53.paddock.Soil.Water.cotton
          SoilWater: same as LRF.scen_4_41.paddock.Soil.SoilWater
          SoilOrganicMatter: RootCN=25; RootWt=1000; SoilCN=12; EnrACoeff=7.4; EnrBCoeff=0.2; OCUnits=WalkleyBlack
            Thickness  OC    FBiom   FInert
            50         0.13  0.04    0.8
            100        0.13  0.033   0.808
            210        0.13  0.0268  0.816
            210        0.1   0.022   0.824
            520        0.1   0.018   0.833
            940        0.1   0.0147  0.841
            OC source: Estimated based on local knowledge (layer 1, 2, 3, 4, 5)
          Analysis: PHUnits=Water; BoronUnits=HotWater
            Thickness  PH    CEC  ParticleSizeSand  ParticleSizeSilt  ParticleSizeClay
            50         7.43  216  67                16                17
            100        7.43  212  67                16                17
            210        8     219  62                19.6              18.4
            210        8     221  48                21.7              30.3
            520        8.15  205  50.2              22.1              27.6
            940        8.4   183  60                18.1              21.9
            PH source: Estimated based on local knowledge (layer 1, 2, 3, 4, 5)
          InitialWater: FractionFull=1; PercentMethod=FilledFromTop; RelativeTo=cotton
          Sample InitialNitrogen: NO3Units=kgha; NH4Units=kgha; SWUnits=Volumetric; OCUnits=Total; PHUnits=Water
            Thickness  NO3    NH4     OC    PH
            50         0.5    0.05    0.13  7.43
            100        0.495  0.0495  0.13  7.43
            210        0.49   0.049   0.15  8
            210        0.485  0.0485  0.1   8
            520        0.48   0.048   0.1   8.15
            940        0.45   0.047   0.1   8.4
          ini: filename=Soil.xml
        operations Operations Schedule
          28/04/1987  surfaceorganicmatter tillage type = user_defined, f_incorp = 0.9, tillage_depth = 150
          28/04/1987  fertiliser apply amount = 10 (kg/ha), depth = 50 (mm), type = NO3_N
          20/05/1987  surfaceorganicmatter tillage type = user_defined, f_incorp = 0.1, tillage_depth = 80
          20/05/1987  cotton sow plants = 12, sowing_depth = 25.4, cultivar = s324, row_spacing = 1010, crop_class = plant
          28/04/1988  surfaceorganicmatter tillage type = user_defined, f_incorp = 0.9, tillage_depth = 150
          28/04/1988  fertiliser apply amount = 10 (kg/ha), depth = 50 (mm), type = NO3_N
          20/05/1988  surfaceorganicmatter tillage type = user_defined, f_incorp = 0.1, tillage_depth = 80
          20/05/1988  cotton sow plants = 12, sowing_depth = 25.4, cultivar = s324, row_spacing = 1010, crop_class = plant
          28/04/1989  surfaceorganicmatter tillage type = user_defined, f_incorp = 0.9, tillage_depth = 150
          28/04/1989  fertiliser apply amount = 10 (kg/ha), depth = 50 (mm), type = NO3_N
          20/05/1989  surfaceorganicmatter tillage type = user_defined, f_incorp = 0.1, tillage_depth = 80
          20/05/1989  cotton sow plants = 12, sowing_depth = 25.4, cultivar = s324, row_spacing = 1010, crop_class = plant
          28/04/1990  surfaceorganicmatter tillage type = user_defined, f_incorp = 0.9, tillage_depth = 150
          28/04/1990  fertiliser apply amount = 10 (kg/ha), depth = 50 (mm), type = NO3_N
          20/05/1990  surfaceorganicmatter tillage type = user_defined, f_incorp = 0.1, tillage_depth = 80
          20/05/1990  cotton sow plants = 12, sowing_depth = 25.4, cultivar = s324, row_spacing = 1010, crop_class = plant
          28/04/1991  surfaceorganicmatter tillage type = user_defined, f_incorp = 0.9, tillage_depth = 150
          28/04/1991  fertiliser apply amount = 10 (kg/ha), depth = 50 (mm), type = NO3_N
          20/05/1991  surfaceorganicmatter tillage type = user_defined, f_incorp = 0.1, tillage_depth = 80
          20/05/1991  cotton sow plants = 12, sowing_depth = 25.4, cultivar = s324, row_spacing = 1010, crop_class = plant
          28/04/1992  surfaceorganicmatter tillage type = user_defined, f_incorp = 0.9, tillage_depth = 150
          28/04/1992  fertiliser apply amount = 10 (kg/ha), depth = 50 (mm), type = NO3_N
          20/05/1992  surfaceorganicmatter tillage type = user_defined, f_incorp = 0.1, tillage_depth = 80
          20/05/1992  cotton sow plants = 12, sowing_depth = 25.4, cultivar = s324, row_spacing = 1010, crop_class = plant
          28/04/1993  surfaceorganicmatter tillage type = user_defined, f_incorp = 0.9, tillage_depth = 150
          28/04/1993  fertiliser apply amount = 10 (kg/ha), depth = 50 (mm), type = NO3_N
          20/05/1993  surfaceorganicmatter tillage type = user_defined, f_incorp = 0.1, tillage_depth = 80
          20/05/1993  cotton sow plants = 12, sowing_depth = 25.4, cultivar = s324, row_spacing = 1010, crop_class = plant
          28/04/1994  surfaceorganicmatter tillage type = user_defined, f_incorp = 0.9, tillage_depth = 150
          28/04/1994  fertiliser apply amount = 10 (kg/ha), depth = 50 (mm), type = NO3_N
          20/05/1994  surfaceorganicmatter tillage type = user_defined, f_incorp = 0.1, tillage_depth = 80
          20/05/1994  cotton sow plants = 12, sowing_depth = 25.4, cultivar = s324, row_spacing = 1010, crop_class = plant
          28/04/1995  surfaceorganicmatter tillage type = user_defined, f_incorp = 0.9, tillage_depth = 150
          28/04/1995  fertiliser apply amount = 10 (kg/ha), depth = 50 (mm), type = NO3_N
          20/05/1995  surfaceorganicmatter tillage type = user_defined, f_incorp = 0.1, tillage_depth = 80
          20/05/1995  cotton sow plants = 12, sowing_depth = 25.4, cultivar = s324, row_spacing = 1010, crop_class = plant
          28/04/1996  surfaceorganicmatter tillage type = user_defined, f_incorp = 0.9, tillage_depth = 150
          28/04/1996  fertiliser apply amount = 10 (kg/ha), depth = 50 (mm), type = NO3_N
          20/05/1996  surfaceorganicmatter tillage type = user_defined, f_incorp = 0.1, tillage_depth = 80
          20/05/1996  cotton sow plants = 12, sowing_depth = 25.4, cultivar = s324, row_spacing = 1010, crop_class = plant
          28/04/1997  surfaceorganicmatter tillage type = user_defined, f_incorp = 0.9, tillage_depth = 150
          28/04/1997  fertiliser apply amount = 10 (kg/ha), depth = 50 (mm), type = NO3_N
          20/05/1997  surfaceorganicmatter tillage type = user_defined, f_incorp = 0.1, tillage_depth = 80
          20/05/1997  cotton sow plants = 12, sowing_depth = 25.4, cultivar = s324, row_spacing = 1010, crop_class = plant
          28/04/1998  surfaceorganicmatter tillage type = user_defined, f_incorp = 0.9, tillage_depth = 150
          28/04/1998  fertiliser apply amount = 10 (kg/ha), depth = 50 (mm), type = NO3_N
          20/05/1998  surfaceorganicmatter tillage type = user_defined, f_incorp = 0.1, tillage_depth = 80
          20/05/1998  cotton sow plants = 12, sowing_depth = 25.4, cultivar = s324, row_spacing = 1010, crop_class = plant
          28/04/1999  surfaceorganicmatter tillage type = user_defined, f_incorp = 0.9, tillage_depth = 150
          28/04/1999  fertiliser apply amount = 10 (kg/ha), depth = 50 (mm), type = NO3_N
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          27/05/2003  sorghum sow plants = 3, sowing_depth = 25.4, cultivar = csh13r, row_spacing = 1010, tiller_no_fertile = 1, crop_class = plant
          11/06/2003  surfaceorganicmatter tillage type = user_defined, f_incorp = 0.1, tillage_depth = 5
          28/04/2004  fertiliser apply amount = 22 (kg/ha), depth = 50 (mm), type = NO3_N
          25/04/2005  fertiliser apply amount = 28 (kg/ha), depth = 50 (mm), type = NO3_N
          24/03/2008  fertiliser apply amount = 15 (kg/ha), depth = 50 (mm), type = Rock_P
    simulation scen_4_54 -> /simulations/LRF/scen_4_53
      area paddock -> /simulations/LRF/scen_4_53/paddock
        outputfile: filename=scen_4_54.out; title=scen_4_54
          events Reporting Frequency -> /simulations/LRF/scen_4_53/paddock/outputfile/Reporting Frequency
          variables: same as LRF.scen_4_41.paddock.outputfile.Variables
        cotton2 cotton: same as LRF.scen_4_41.paddock.cotton
        folder Manager folder1 -> /simulations/LRF/scen_4_53/paddock/Manager folder1
          manager Harvesting and remove1: same as LRF.scen_4_51.paddock.Manager folder1.Harvesting and remove1
          manager Harvesting and remove2: same as LRF.scen_4_51.paddock.Manager folder1.Harvesting and remove2
        Soil -> /simulations/LRF/scen_4_53/paddock/Soil
          SoilWater: same as LRF.scen_4_41.paddock.Soil.SoilWater
          InitialWater: FractionFull=1; PercentMethod=FilledFromTop; RelativeTo=cotton
        operations Operations Schedule
          28/04/1987  surfaceorganicmatter tillage type = user_defined, f_incorp = 0.9, tillage_depth = 150
          28/04/1987  fertiliser apply amount = 10 (kg/ha), depth = 50 (mm), type = NO3_N
          20/05/1987  surfaceorganicmatter tillage type = user_defined, f_incorp = 0.1, tillage_depth = 80
          20/05/1987  cotton sow plants = 12, sowing_depth = 25.4, cultivar = s324, row_spacing = 1010, crop_class = plant
          28/04/1988  surfaceorganicmatter tillage type = user_defined, f_incorp = 0.9, tillage_depth = 150
          28/04/1988  fertiliser apply amount = 10 (kg/ha), depth = 50 (mm), type = NO3_N
          20/05/1988  surfaceorganicmatter tillage type = user_defined, f_incorp = 0.1, tillage_depth = 80
          20/05/1988  cotton sow plants = 12, sowing_depth = 25.4, cultivar = s324, row_spacing = 1010, crop_class = plant
          28/04/1989  surfaceorganicmatter tillage type = user_defined, f_incorp = 0.9, tillage_depth = 150
          28/04/1989  fertiliser apply amount = 10 (kg/ha), depth = 50 (mm), type = NO3_N
          20/05/1989  surfaceorganicmatter tillage type = user_defined, f_incorp = 0.1, tillage_depth = 80
          20/05/1989  cotton sow plants = 12, sowing_depth = 25.4, cultivar = s324, row_spacing = 1010, crop_class = plant
          28/04/1990  surfaceorganicmatter tillage type = user_defined, f_incorp = 0.9, tillage_depth = 150
          28/04/1990  fertiliser apply amount = 10 (kg/ha), depth = 50 (mm), type = NO3_N
          20/05/1990  surfaceorganicmatter tillage type = user_defined, f_incorp = 0.1, tillage_depth = 80
          20/05/1990  cotton sow plants = 12, sowing_depth = 25.4, cultivar = s324, row_spacing = 1010, crop_class = plant
          28/04/1991  surfaceorganicmatter tillage type = user_defined, f_incorp = 0.9, tillage_depth = 150
          28/04/1991  fertiliser apply amount = 10 (kg/ha), depth = 50 (mm), type = NO3_N
          20/05/1991  surfaceorganicmatter tillage type = user_defined, f_incorp = 0.1, tillage_depth = 80
          20/05/1991  cotton sow plants = 12, sowing_depth = 25.4, cultivar = s324, row_spacing = 1010, crop_class = plant
          28/04/1992  surfaceorganicmatter tillage type = user_defined, f_incorp = 0.9, tillage_depth = 150
          28/04/1992  fertiliser apply amount = 10 (kg/ha), depth = 50 (mm), type = NO3_N
          20/05/1992  surfaceorganicmatter tillage type = user_defined, f_incorp = 0.1, tillage_depth = 80
          20/05/1992  cotton sow plants = 12, sowing_depth = 25.4, cultivar = s324, row_spacing = 1010, crop_class = plant
          28/04/1993  surfaceorganicmatter tillage type = user_defined, f_incorp = 0.9, tillage_depth = 150
          28/04/1993  fertiliser apply amount = 10 (kg/ha), depth = 50 (mm), type = NO3_N
          20/05/1993  surfaceorganicmatter tillage type = user_defined, f_incorp = 0.1, tillage_depth = 80
          20/05/1993  cotton sow plants = 12, sowing_depth = 25.4, cultivar = s324, row_spacing = 1010, crop_class = plant
          28/04/1994  surfaceorganicmatter tillage type = user_defined, f_incorp = 0.9, tillage_depth = 150
          28/04/1994  fertiliser apply amount = 10 (kg/ha), depth = 50 (mm), type = NO3_N
          20/05/1994  surfaceorganicmatter tillage type = user_defined, f_incorp = 0.1, tillage_depth = 80
          20/05/1994  cotton sow plants = 12, sowing_depth = 25.4, cultivar = s324, row_spacing = 1010, crop_class = plant
          28/04/1995  surfaceorganicmatter tillage type = user_defined, f_incorp = 0.9, tillage_depth = 150
          28/04/1995  fertiliser apply amount = 10 (kg/ha), depth = 50 (mm), type = NO3_N
          20/05/1995  surfaceorganicmatter tillage type = user_defined, f_incorp = 0.1, tillage_depth = 80
          20/05/1995  cotton sow plants = 12, sowing_depth = 25.4, cultivar = s324, row_spacing = 1010, crop_class = plant
          28/04/1996  surfaceorganicmatter tillage type = user_defined, f_incorp = 0.9, tillage_depth = 150
          28/04/1996  fertiliser apply amount = 10 (kg/ha), depth = 50 (mm), type = NO3_N
          20/05/1996  surfaceorganicmatter tillage type = user_defined, f_incorp = 0.1, tillage_depth = 80
          20/05/1996  cotton sow plants = 12, sowing_depth = 25.4, cultivar = s324, row_spacing = 1010, crop_class = plant
          28/04/1997  surfaceorganicmatter tillage type = user_defined, f_incorp = 0.9, tillage_depth = 150
          28/04/1997  fertiliser apply amount = 10 (kg/ha), depth = 50 (mm), type = NO3_N
          20/05/1997  surfaceorganicmatter tillage type = user_defined, f_incorp = 0.1, tillage_depth = 80
          20/05/1997  cotton sow plants = 12, sowing_depth = 25.4, cultivar = s324, row_spacing = 1010, crop_class = plant
          28/04/1998  surfaceorganicmatter tillage type = user_defined, f_incorp = 0.9, tillage_depth = 150
          28/04/1998  fertiliser apply amount = 10 (kg/ha), depth = 50 (mm), type = NO3_N
          20/05/1998  surfaceorganicmatter tillage type = user_defined, f_incorp = 0.1, tillage_depth = 80
          20/05/1998  cotton sow plants = 12, sowing_depth = 25.4, cultivar = s324, row_spacing = 1010, crop_class = plant
          28/04/1999  surfaceorganicmatter tillage type = user_defined, f_incorp = 0.9, tillage_depth = 150
          28/04/1999  fertiliser apply amount = 10 (kg/ha), depth = 50 (mm), type = NO3_N
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          27/05/2003  sorghum sow plants = 3, sowing_depth = 25.4, cultivar = csh13r, row_spacing = 1010, tiller_no_fertile = 1, crop_class = plant
          28/04/2004  fertiliser apply amount = 22 (kg/ha), depth = 50 (mm), type = NO3_N
          25/04/2005  fertiliser apply amount = 28 (kg/ha), depth = 50 (mm), type = NO3_N
          24/03/2008  fertiliser apply amount = 15 (kg/ha), depth = 50 (mm), type = Rock_P
    simulation scen_4_55 -> /simulations/LRF/scen_4_53
      area paddock -> /simulations/LRF/scen_4_53/paddock
        outputfile: filename=scen_4_55.out; title=scen_4_55
          events Reporting Frequency -> /simulations/LRF/scen_4_53/paddock/outputfile/Reporting Frequency
          variables: same as LRF.scen_4_41.paddock.outputfile.Variables
        cotton2 cotton: same as LRF.scen_4_41.paddock.cotton
        folder Manager folder1 -> /simulations/LRF/scen_4_53/paddock/Manager folder1
          manager Harvesting and remove1: same as LRF.scen_4_52.paddock.Manager folder1.Harvesting and remove1
          manager Harvesting and remove2: same as LRF.scen_4_52.paddock.Manager folder1.Harvesting and remove2
        Soil -> /simulations/LRF/scen_4_53/paddock/Soil
          SoilWater: same as LRF.scen_4_41.paddock.Soil.SoilWater
          InitialWater: FractionFull=1; PercentMethod=FilledFromTop; RelativeTo=cotton
        operations Operations Schedule: same as LRF.scen_4_54.paddock.Operations Schedule
    simulation scen_4_56 -> /simulations/LRF/scen_4_53
      area paddock -> /simulations/LRF/scen_4_53/paddock
        outputfile: filename=scen_4_56.out; title=scen_4_56
          events Reporting Frequency -> /simulations/LRF/scen_4_53/paddock/outputfile/Reporting Frequency
          variables: same as LRF.scen_4_41.paddock.outputfile.Variables
        cotton2 cotton: same as LRF.scen_4_41.paddock.cotton
        Soil -> /simulations/LRF/scen_4_53/paddock/Soil
          SoilWater: same as LRF.scen_4_41.paddock.Soil.SoilWater
          InitialWater: FractionFull=1; PercentMethod=FilledFromTop; RelativeTo=cotton
        operations Operations Schedule
          28/04/1987  surfaceorganicmatter tillage type = user_defined, f_incorp = 0.9, tillage_depth = 150
          28/04/1987  fertiliser apply amount = 10 (kg/ha), depth = 50 (mm), type = NO3_N
          20/05/1987  surfaceorganicmatter tillage type = user_defined, f_incorp = 0.1, tillage_depth = 80
          20/05/1987  cotton sow plants = 12, sowing_depth = 25.4, cultivar = s324, row_spacing = 1010, crop_class = plant
          28/04/1988  surfaceorganicmatter tillage type = user_defined, f_incorp = 0.9, tillage_depth = 150
          28/04/1988  fertiliser apply amount = 10 (kg/ha), depth = 50 (mm), type = NO3_N
          20/05/1988  surfaceorganicmatter tillage type = user_defined, f_incorp = 0.1, tillage_depth = 80
          20/05/1988  cotton sow plants = 12, sowing_depth = 25.4, cultivar = s324, row_spacing = 1010, crop_class = plant
          28/04/1989  surfaceorganicmatter tillage type = user_defined, f_incorp = 0.9, tillage_depth = 150
          28/04/1989  fertiliser apply amount = 10 (kg/ha), depth = 50 (mm), type = NO3_N
          20/05/1989  surfaceorganicmatter tillage type = user_defined, f_incorp = 0.1, tillage_depth = 80
          20/05/1989  cotton sow plants = 12, sowing_depth = 25.4, cultivar = s324, row_spacing = 1010, crop_class = plant
          28/04/1990  surfaceorganicmatter tillage type = user_defined, f_incorp = 0.9, tillage_depth = 150
          28/04/1990  fertiliser apply amount = 10 (kg/ha), depth = 50 (mm), type = NO3_N
          20/05/1990  surfaceorganicmatter tillage type = user_defined, f_incorp = 0.1, tillage_depth = 80
          20/05/1990  cotton sow plants = 12, sowing_depth = 25.4, cultivar = s324, row_spacing = 1010, crop_class = plant
          28/04/1991  surfaceorganicmatter tillage type = user_defined, f_incorp = 0.9, tillage_depth = 150
          28/04/1991  fertiliser apply amount = 10 (kg/ha), depth = 50 (mm), type = NO3_N
          20/05/1991  surfaceorganicmatter tillage type = user_defined, f_incorp = 0.1, tillage_depth = 80
          20/05/1991  cotton sow plants = 12, sowing_depth = 25.4, cultivar = s324, row_spacing = 1010, crop_class = plant
          28/04/1992  surfaceorganicmatter tillage type = user_defined, f_incorp = 0.9, tillage_depth = 150
          28/04/1992  fertiliser apply amount = 10 (kg/ha), depth = 50 (mm), type = NO3_N
          20/05/1992  surfaceorganicmatter tillage type = user_defined, f_incorp = 0.1, tillage_depth = 80
          20/05/1992  cotton sow plants = 12, sowing_depth = 25.4, cultivar = s324, row_spacing = 1010, crop_class = plant
          28/04/1993  surfaceorganicmatter tillage type = user_defined, f_incorp = 0.9, tillage_depth = 150
          28/04/1993  fertiliser apply amount = 10 (kg/ha), depth = 50 (mm), type = NO3_N
          20/05/1993  surfaceorganicmatter tillage type = user_defined, f_incorp = 0.1, tillage_depth = 80
          20/05/1993  cotton sow plants = 12, sowing_depth = 25.4, cultivar = s324, row_spacing = 1010, crop_class = plant
          28/04/1994  surfaceorganicmatter tillage type = user_defined, f_incorp = 0.9, tillage_depth = 150
          28/04/1994  fertiliser apply amount = 10 (kg/ha), depth = 50 (mm), type = NO3_N
          20/05/1994  surfaceorganicmatter tillage type = user_defined, f_incorp = 0.1, tillage_depth = 80
          20/05/1994  cotton sow plants = 12, sowing_depth = 25.4, cultivar = s324, row_spacing = 1010, crop_class = plant
          28/04/1995  surfaceorganicmatter tillage type = user_defined, f_incorp = 0.9, tillage_depth = 150
          28/04/1995  fertiliser apply amount = 10 (kg/ha), depth = 50 (mm), type = NO3_N
          20/05/1995  surfaceorganicmatter tillage type = user_defined, f_incorp = 0.1, tillage_depth = 80
          20/05/1995  cotton sow plants = 12, sowing_depth = 25.4, cultivar = s324, row_spacing = 1010, crop_class = plant
          28/04/1996  surfaceorganicmatter tillage type = user_defined, f_incorp = 0.9, tillage_depth = 150
          28/04/1996  fertiliser apply amount = 10 (kg/ha), depth = 50 (mm), type = NO3_N
          20/05/1996  surfaceorganicmatter tillage type = user_defined, f_incorp = 0.1, tillage_depth = 80
          20/05/1996  cotton sow plants = 12, sowing_depth = 25.4, cultivar = s324, row_spacing = 1010, crop_class = plant
          28/04/1997  surfaceorganicmatter tillage type = user_defined, f_incorp = 0.9, tillage_depth = 150
          28/04/1997  fertiliser apply amount = 10 (kg/ha), depth = 50 (mm), type = NO3_N
          20/05/1997  surfaceorganicmatter tillage type = user_defined, f_incorp = 0.1, tillage_depth = 80
          20/05/1997  cotton sow plants = 12, sowing_depth = 25.4, cultivar = s324, row_spacing = 1010, crop_class = plant
          28/04/1998  surfaceorganicmatter tillage type = user_defined, f_incorp = 0.9, tillage_depth = 150
          28/04/1998  fertiliser apply amount = 10 (kg/ha), depth = 50 (mm), type = NO3_N
          20/05/1998  surfaceorganicmatter tillage type = user_defined, f_incorp = 0.1, tillage_depth = 80
          20/05/1998  cotton sow plants = 12, sowing_depth = 25.4, cultivar = s324, row_spacing = 1010, crop_class = plant
          28/04/1999  surfaceorganicmatter tillage type = user_defined, f_incorp = 0.9, tillage_depth = 150
          28/04/1999  fertiliser apply amount = 10 (kg/ha), depth = 50 (mm), type = NO3_N
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          27/05/2003  sorghum sow plants = 3, sowing_depth = 25.4, cultivar = csh13r, row_spacing = 1010, tiller_no_fertile = 1, crop_class = plant
          28/04/2004  fertiliser apply amount = 22 (kg/ha), depth = 50 (mm), type = NO3_N
          25/04/2005  fertiliser apply amount = 28 (kg/ha), depth = 50 (mm), type = NO3_N
          24/03/2008  fertiliser apply amount = 15 (kg/ha), depth = 50 (mm), type = Rock_P
  factorial Factorials: active=0
    settings
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