folder simulations: version=37; creator=Apsim 7.10-r4220
  memo
    This biochar study was modified from the biochar sims used in the GCB-Bioenergy paper (Archontoulis et al., 2016)

    Archontoulis, S.V., Huber, I., Miguez, F.E., Thorburn, P.J., Rogovska, N., Laird, D.A., 2016. A model for mechanistic and system assessments of biochar effects on soils and crops and trade-offs. GCB Bioenergy 8, 1028–1045. doi:10.1111/gcbb.12314
  folder KBS
    simulation scen_2_3
      metfile met: filename=basic_wth_2.met
      clock
        start_date = 01/01/1989  # Enter the start date of the simulation
        end_date = 31/12/2099  # Enter the end date of the simulation
      summaryfile
      area paddock
        surfaceom SurfaceOrganicMatter
          PoolName = soybean  # Organic Matter pool name
          type = soybean  # Organic Matter type
          mass = 1000  # Initial surface residue (kg/ha)
          cnr = 27  # C:N ratio of initial residue
          standing_fraction = 0  # Fraction of residue standing
        fertiliser
        maize
        Soil Loam: SoilType=Kalamazoo:187069; State=MI; Country=USA; ApsoilNumber=0; Latitude=42.41; Longitude=-85.372; YearOfSampling=0
          DataSource=SSURGO (https://sdmdataaccess.nrcs.usda.gov/) through R package soilDB, R package apsimx function ssurgo2sp. Timestamp 2023-02-03 14:43:57
          Comments=cokey = 22386986 - acres percent = 95 - component percent = 95 - taxonomic classification name = Fine-loamy, mixed, active, mesic Typic Hapludalfs - drainage class = Well drained - elevation = 275 - slope = 3 - geomdesc = Head Slope, Interfluve, Nose Slope, Side Slope
          Water
            Thickness  BD    AirDry      LL15        DUL    SAT    KS
            200        1.11  0.03376907  0.06753815  0.27   0.58   86.4
            200        1.2   0.03376907  0.06753815  0.27   0.54   86.4
            200        1.6   0.03376907  0.06753815  0.27   0.393  86.4
            200        1.55  0.13822352  0.13822352  0.246  0.393  47.52
            200        1.55  0.06916603  0.06916603  0.142  0.385  475.2
            200        1.55  0.02266792  0.02266792  0.069  0.406  4752
            200        1.55  0.02266792  0.02266792  0.069  0.406  4752
            200        1.55  0.02266792  0.02266792  0.069  0.406  4752
            200        1.55  0.02266792  0.02266792  0.033  0.414  4752
            200        1.55  0.02266792  0.02266792  0.033  0.414  4752
            BD source: Field measured and checked for sensibility (layer 2, 3, 4)
            AirDry source: Estimated based on local knowledge (layer 1, 2, 3, 4)
            LL15 source: Estimated based on local knowledge (layer 2, 3, 4)
            DUL source: Field measured and checked for sensibility (layer 1, 2, 3, 4)
            SAT source: Calculated from measured, estimated or calculated BD (layer 1, 2, 3, 4)
            SoilCrop maize
              LL=[0.068, 0.068, 0.068, 0.138, 0.069, 0.023, 0.023, 0.023, 0.023, 0.023]
              KL=[0.06, 0.049, 0.04, 0.033, 0.027, 0.022, 0.018, 0.02, 0.012, 0.01]
              XF=[1, 1, 1, 1, 1, 1, 1, 1, 1, 1]
              LL source: Estimated based on local knowledge (layer 2, 3, 4)
            SoilCrop soybean
              LL=[0.068, 0.068, 0.068, 0.138, 0.069, 0.023, 0.023, 0.023, 0.023, 0.023]
              KL=[0.06, 0.05, 0.04, 0.03, 0.03, 0.02, 0.02, 0.02, 0.012, 0.01]
              XF=[1, 1, 1, 1, 1, 1, 1, 1, 1, 1]
              LL source: Estimated based on local knowledge (layer 1, 2, 3, 4)
            SoilCrop wheat
              LL=[0.068, 0.068, 0.068, 0.138, 0.069, 0.023, 0.023, 0.023, 0.023, 0.023]
              KL=[0.06, 0.05, 0.04, 0.03, 0.03, 0.02, 0.02, 0.02, 0.012, 0.01]
              XF=[1, 1, 1, 1, 1, 1, 1, 1, 1, 1]
            SoilCrop oats
              LL=[0.068, 0.068, 0.068, 0.138, 0.069, 0.023, 0.023, 0.023, 0.023, 0.023]
              KL=[0.06, 0.05, 0.04, 0.03, 0.03, 0.02, 0.02, 0.02, 0.01, 0.01]
              XF=[1, 1, 1, 1, 1, 1, 1, 1, 1, 1]
            SoilCrop WhiteClover
              LL=[0.068, 0.068, 0.068, 0.138, 0.069, 0.023, 0.023, 0.023, 0.023, 0.023]
              KL=[0.06, 0.05, 0.04, 0.03, 0.03, 0.02, 0.02, 0.02, 0.01, 0.01]
              XF=[1, 1, 1, 1, 1, 1, 1, 1, 1, 1]
          SoilWater: SummerCona=3.2; SummerU=7.1; SummerDate=1-jun; WinterCona=3.2; WinterU=7.1; WinterDate=1-dec; DiffusConst=88; DiffusSlope=35; Salb=0.13; CN2Bare=63; CNRed=20; CNCov=0.8; Thickness=[90, 90, 240, 240, 230, 230, 300, 180]; SWCON=[0.36, 0.36, 0.355, 0.355, 0.271, 0.271, 0.266, 0.266]
          SoilOrganicMatter: RootCN=45; RootWt=1000; SoilCN=12; EnrACoeff=7.4; EnrBCoeff=0.2; OCUnits=Total
            Thickness  OC     FBiom       FInert
            200        0.93   0.04        0.8
            200        0.44   0.0327492   0.80804
            200        0.44   0.0268128   0.816161
            200        0.354  0.0219525   0.824364
            200        0.19   0.0179732   0.832649
            200        0.01   0.0147152   0.841017
            200        0.01   0.0120478   0.849469
            200        0.01   0.00986388  0.858007
            200        0.01   0.00807586  0.86663
            200        0.01   0.00661196  0.875339
            OC source: Estimated based on local knowledge (layer 1, 2, 3, 4)
          Analysis: PHUnits=Water; BoronUnits=HotWater
            Thickness  Texture  PH   ParticleSizeSand  ParticleSizeSilt  ParticleSizeClay
            200        L        5.5  43                38                19
            200        L        5.5  43                38                19
            200        L        5.5  43                38                19
            200        L        6.5  51                26                23
            200        L        6.5  71                17                12
            200        L        6.5  87                8                 5
            200        L        6.5  87                8                 5
            200        L        6.5  87                8                 5
            200        L        6.5  95                4                 1
            200        L        6.5  95                4                 1
            PH source: Estimated based on local knowledge (layer 1, 2, 3, 4)
            ParticleSizeSand, ParticleSizeSilt source: Measured (layer 1)
            ParticleSizeClay source: Measured (layer 1, 2)
          Sample Initial nitrogen: NO3Units=kgha; NH4Units=kgha; SWUnits=Volumetric; OCUnits=Total; PHUnits=Water
            Thickness  NO3       NH4        SW
            200        0.5       0.05       0
            200        0.495025  0.0495025  -
            200        0.490099  0.0490099  -
            200        0.485223  0.0485223  -
            200        0.480395  0.0480395  -
            200        0.475615  0.0475615  -
            200        0.470882  0.0470882  -
            200        0.466197  0.0466197  -
            200        0.461558  0.0461558  -
            200        0.456966  0.0456966  -
          InitialWater: FractionFull=0.65; PercentMethod=EvenlyDistributed; RelativeTo=ll15
        folder Manager folder
          manager Harvesting rule
            # Harvesting criteria
            crop = maize  # Enter name of crop to harvest when ripe
            on end_of_day:
```
           if ('[crop]' = 'cotton') then
              if ([crop].ozcot_status > 0) then
                  [crop] harvest
              endif
           elseif ([crop].StageName = 'harvest_ripe' or [crop].plant_status = 'dead') then
              [crop]  harvest
              [crop]  end_crop
           endif
```
          manager Harvesting rule1
            # Harvesting criteria
            crop = soybean  # Enter name of crop to harvest when ripe
            on end_of_day:
            script: same as in KBS.scen_2_3.paddock.Manager folder.Harvesting rule
          manager Harvesting rule2
            # Harvesting criteria
            crop = wheat  # Enter name of crop to harvest when ripe
            on end_of_day:
            script: same as in KBS.scen_2_3.paddock.Manager folder.Harvesting rule
          manager Remove residues at harvest
            # Removal criteria
            crop = maize  # Name of crop harvest to trigger residue removal
            surfaceommodule = SurfaceOrganicMatter  # Name of your surface organic matter module
            fraction = 0.0075  # Enter biomass removal fraction from field (0-1)
            on init:
```
               last_stage_name = 'none'
```
            on start_of_day:
```
         if [crop].StageName <> last_stage_name  then
            if ([crop].StageName = 'out') then
               '[surfaceommodule]' tillage type = user_defined, f_incorp = [fraction] (), tillage_depth = 0.0 ()
            endif
         endif
         last_stage_name = [crop].StageName
```
          manager Remove residues at harvest1
            # Removal criteria
            crop = soybean  # Name of crop harvest to trigger residue removal
            surfaceommodule = SurfaceOrganicMatter  # Name of your surface organic matter module
            fraction = 0.0075  # Enter biomass removal fraction from field (0-1)
            on init:
```
               last_stage_name = 'none'
```
            on start_of_day:
            script: same as in KBS.scen_2_3.paddock.Manager folder.Remove residues at harvest
          manager Remove residues at harvest2
            # Removal criteria
            crop = wheat  # Name of crop harvest to trigger residue removal
            surfaceommodule = SurfaceOrganicMatter  # Name of your surface organic matter module
            fraction = 0.0075  # Enter biomass removal fraction from field (0-1)
            on init:
```
               last_stage_name = 'none'
```
            on start_of_day:
            script: same as in KBS.scen_2_3.paddock.Manager folder.Remove residues at harvest
        outputfile: filename=scen_2_3.out; title=scen_2_3
          events Reporting Frequency: event=daily
          variables
            variable:
              dd/mm/yyyy as Date
              bd(1)
              yield
              sw(1)
              st(1)
              biomass
              stover
              dul(1)
              sat(1)
              ph(1)
              n2o_atm_denitrification(1-5) format 8 as n2o_bylayer_kgha
              oc(1-5) format 8 as oc_bylayer_kgha
              n2o_atm_denitrification(6-10) format 8 as n2o_bylayer_kgha
              no3(1-3)
              sw(2-3)
              dul(2-3)
              sat(2-3)
              biom_c(1-3)
              biom_n(1-3)
              hum_c(1-3)
              hum_n(1-3)
              dlt_res_c_biom(1-2)
              dlt_res_c_hum(1-2)
              dlt_biom_c_hum(1-2)
              st(2-3)
        soybean
        wheat
          ModifyKL = yes  # Modify KL using CL, EC or ESP if found?
          MaxRootDepth = 0  # Maximum rooting depth (mm) 0=no restriction
        oats
          ModifyKL = yes  # Modify KL using CL, EC or ESP if found?
          MaxRootDepth = 0  # Maximum rooting depth (mm) 0=no restriction
        AgPasture WhiteClover
          # Initial values for each species to be simulated
          SpeciesToSimulate = WhiteClover  # Name of the species to be simulated
          InitialShootDM = 2000  # Initial above ground DM weight for each species (kg/ha)
          InitialRootDM = 500  # Initial below ground DM weight for each species (kg/ha)
          InitialRootDepth = 350  # Initial rooting depth for each species (mm)
          WaterUptakeSource = calc  # Water uptake done by AgPasture (calc) or by apsim?
          # Detailed parameters for each species (overwrites the xml file)
          speciesName = whiteclover  # Name of each parameterised species
          micrometType = grass  # Plant type descriptor, for MicroMet/SWIM
          PhotosyntheticPathway = 3  # Metabolic pathway for C fixation during photosynthesis (C3 or C4)
          isLegume = 1  # Whether the plant is a legume species (1=yes, 0=no)
          ReferencePhotosyntheticRate = 1  # Reference leaf CO2 assimilation rate for photosynthesis (mgCO2/m^2 leaf/s)
          LightExtinctionCoefficients = 0.8  # Light extinction coefficient (0-1)
          ReferenceCO2 = 380  # Reference CO2 concentration for photosynthesis (ppm)
          CO2EffectScaleFactor = 700  # Scaling parameter for the CO2 effect on photosynthesis (ppm)
          CO2EffectOffsetFactor = 600  # Scaling parameter for the CO2 effects on N requirements (ppm)
          CO2EffectMinimum = 0.7  # Minimum value for the CO2 effect on N requirements (0-1)
          CO2EffectExponent = 2  # Exponent controlling the CO2 effect on N requirements (>0.75)
          GrowthTminimum = 2  # Minimum temperature for growth (oC)
          GrowthToptimum = 22  # Optimum temperature for growth (oC)
          GrowthTEffectExponent = 1.7  # Curve parameter for growth response to temperature (>0.75)
          UseHeatStressFactor = yes  # Whether heat damage stress is enabled (yes/no)
          HeatOnsetTemperature = 30  # Onset temperature for heat effects on photosynthesis (oC)
          HeatFullTemperature = 36  # Temperature for full heat effect on photosynthesis (oC)
          HeatRecoverySumDD = 20  # Cumulative degrees-day for recovery from heat stress (oCd)
          HeatRecoveryTReference = 25  # Reference temperature for recovery from heat stress (oC)
          UseColdStressFactor = yes  # Whether cold damage stress is enabled (yes/no)
          ColdOnsetTemperature = 2  # Onset temperature for cold effects on photosynthesis (oC)
          ColdFullTemperature = -5  # Temperature for full cold effect on photosynthesis (oC)
          ColdRecoverySumDD = 30  # Cumulative degrees for recovery from cold stress (oCd)
          ColdRecoveryTReference = 0  # Reference temperature for recovery from cold stress (oC)
          GrowthRespirationCoefficient = 0.75  # Growth respiration coefficient (0-1)
          MaintenanceRespirationCoefficient = 4  # Maintenance respiration coefficient (%)
          RespirationTReference = 20  # Reference temperature for maintenance respiration (oC)
          RespirationExponent = 1.5  # Exponent controlling the effect of temperature on respiration (>0.75)
          NconcOptimumForLeaves = 4.5  # Optimum N concentration of leaves (no stress) (%)
          NconcMaximumForLeaves = 5.5  # Maximum N concentration of leaves (luxury uptake) (%)
          NconcMinimumForLeaves = 2  # Minimum N concentration of leaves (dead leaves) (%)
          RelativeNconcForStems = 0.5  # N concentration for stems, relative to leaves (0-1)
          RelativeNconcForStolons = 0.5  # N concentration for stolons, relative to leaves (0-1)
          RelativeNconcForRoots = 0.5  # N concentration for roots, relative to leaves (0-1)
          DegreesDayForGermination = 100  # Cumulative degrees-day needed for seed germination (oCd)
          TargetShootRootRatio = 4  # Target or ideal plant's shoot:root ratio at vegetative stage
          MaxRootAllocation = 0.25  # Maximum fraction of DM growth that can be allocated to roots (0-1)
          ShootRootGlfFactor = 0.5  # Maximum effect that soil GLFs have on Shoot-Root ratio (0-1)
          UseReproSeasonFactor = yes  # Whether Shoot:Root ratio should be adjusted mimicking reproductive season (perennial species) (yes/no)
          FractionToStolon = 0.2  # Fraction of new growth to be allocated to stolon (0-1)
          LiveLeavesPerTiller = 3  # Number of live leaves per tiller
          SpecificLeafArea = 30  # Specific leaf area, per dry matter weight (m^2/kgDM)
          SpecificRootLength = 45  # Specific root length, per dry matter weight (m/gDM)
          TissueTurnoverRateShoot = 0.05  # Reference daily DM turnover rate for shoot tissues (/day)
          TissueTurnoverRateRoot = 0.02  # Reference daily DM turnover rate for root tissues (/day)
          RelativeTurnoverEmerging = 2  # Relative turnover rate for emerging tissues (>0.0)
          DetachmentRateShoot = 0.08  # Reference daily detachment rate for dead tissues (/day)
          TurnoverTemperatureMin = 2  # Minimum temperature for tissue turnover (oC)
          TurnoverTemperatureRef = 20  # Reference temperature for tissue turnover (oC)
          TurnoverTemperatureExponent = 1  # Exponent of function for temperature effect on tissue turnover
          TurnoverDroughtEffectMax = 2  # Maximum increase in tissue turnover due to water deficit
          TurnoverDroughtThreshold = 0.5  # Minimum GLFwater without effect on tissue turnover (0-1)
          DetachmentDroughtCoefficient = 3  # Coefficient controlling detachment rate as function of moisture (>0.75)
          DetachmentDroughtEffectMin = 0.1  # Minimum effect of drought on detachment rate (0-1)
          TurnoverDefoliationCoefficient = 0.5  # Coefficient of function increasing the turnover rate due to defoliation (>0.0)
          TurnoverDefoliationEffectMin = 0.025  # Minimum significant daily effect of defoliation on tissue turnover rate (>0.0)
          FractionNLuxuryRemobStage1 = 0.1  # Fraction of luxury N remobilisable from tissue 1 each day (0-1)
          FractionNLuxuryRemobStage2 = 0.1  # Fraction of luxury N remobilisable from tissue 2 each day (0-1)
          FractionNLuxuryRemobStage3 = 0.1  # Fraction of luxury N remobilisable from tissue 3 each day (0-1)
          MinimumNFixation = 0.2  # Minimum fraction of N demand supplied by biologic N fixation (0-1)
          MaximumNFixation = 0.6  # Maximum fraction of N demand supplied by biologic N fixation (0-1)
          SoilSaturationEffectMax = 0.1  # Maximum reduction in plant growth due to water logging (saturated soil) (0-1)
          MinimumWaterFreePorosity = -1  # Minimum water-free pore space for growth with no limitations (0-1)
          SoilSaturationRecoveryFactor = 0.25  # Daily recovery rate from water logging (0-1)
          NDillutionCoefficient = 1  # Exponent for modifying the effect of N deficiency on plant growth
          GenericGLF = 1  # Generic factor affecting potential plant growth (0-1)
          SoilFertilityGLF = 1  # Generic growth limiting factor due to soil fertility (0-1)
          PlantHeightMinimum = 25  # Minimum plant height, for each species in the sward (mm)
          PlantHeightMaximum = 350  # Maximum plant height, for each species in the sward (mm)
          PlantHeightMassForMax = 7500  # DM weight above ground for maximum plant height (kgDM/ha)
          PlantHeightExponent = 2.5  # Exponent controlling shoot height as function of DM weight (>0.75)
          rootDistributionDepthParam = 70  # Depth from surface where root proportion starts to decrease (mm)
          rootDistributionExponent = 2.5  # Exponent controlling the root distribution as function of depth (>0.0)
          DigestibilityCellWallLive = 0.6  # Digestibility of cell wall in live plant tissues (0-1)
          DigestibilityCellWallDead = 0.2  # Digestibility of cell wall in dead plant tissues (0-1)
          MinimumGreenWt = 50  # Minimum above ground green DM (kgDM/ha)
          FractionStolonsStanding = 0  # Proportion of stolon DM standing, available for removal (0-1)
          PreferenceForGreenOverDead = 1  # Relative preference for live over dead material during graze
          PreferenceForLeafOverStems = 1  # Relative preference for leaf over stem-stolon material during graze
        operations Operations Schedule
          07/08/1989  surfaceorganicmatter tillage type = user_defined, f_incorp = 0.5, tillage_depth = 30
          12/08/1989  whiteclover sow plants = 181, sowing_depth = 50, cultivar = kopu, row_spacing = 178, crop_class = plant
          31/01/1990  whiteclover end_crop
          30/04/1990  fertiliser apply amount = 28 (kg/ha), depth = 50 (mm), type = NO3_N
          30/04/1990  maize sow plants = 6, sowing_depth = 50, cultivar = b_80, row_spacing = 762, crop_class = plant
          07/05/1990  surfaceorganicmatter tillage type = user_defined, f_incorp = 0.5, tillage_depth = 30
          21/05/1991  soybean sow plants = 35, sowing_depth = 50, cultivar = mg_3, row_spacing = 762, crop_class = plant
          09/10/1991  wheat sow plants = 445, sowing_depth = 50, cultivar = avalon, row_spacing = 178, crop_class = plant
          26/08/1992  whiteclover sow plants = 148, sowing_depth = 50, cultivar = kopu, row_spacing = 178, crop_class = plant
          31/01/1993  whiteclover end_crop
          14/05/1993  fertiliser apply amount = 60 (kg/ha), depth = 50 (mm), type = NO3_N
          14/05/1993  maize sow plants = 6, sowing_depth = 50, cultivar = b_80, row_spacing = 762, crop_class = plant
          20/05/1993  surfaceorganicmatter tillage type = user_defined, f_incorp = 0.5, tillage_depth = 30
          07/07/1993  surfaceorganicmatter tillage type = user_defined, f_incorp = 0.5, tillage_depth = 30
          03/11/1993  whiteclover sow plants = 148, sowing_depth = 50, cultivar = kopu, row_spacing = 178, crop_class = plant
          07/04/1994  whiteclover end_crop
          07/04/1994  surfaceorganicmatter tillage type = user_defined, f_incorp = 0, tillage_depth = 0
          18/04/1994  surfaceorganicmatter tillage type = user_defined, f_incorp = 0.5, tillage_depth = 30
          06/05/1994  surfaceorganicmatter tillage type = user_defined, f_incorp = 0.9, tillage_depth = 110
          12/05/1994  surfaceorganicmatter tillage type = user_defined, f_incorp = 0.1, tillage_depth = 5
          12/05/1994  surfaceorganicmatter tillage type = user_defined, f_incorp = 0.1, tillage_depth = 5
          16/05/1994  soybean sow plants = 35, sowing_depth = 50, cultivar = mg_3, row_spacing = 762, crop_class = plant
          01/06/1994  surfaceorganicmatter tillage type = user_defined, f_incorp = 0.5, tillage_depth = 30
          09/06/1994  fertiliser apply amount = 2 (kg/ha), depth = 50 (mm), type = NO3_N
          17/10/1994  surfaceorganicmatter tillage type = user_defined, f_incorp = 0.9, tillage_depth = 110
          18/10/1994  wheat sow plants = 445, sowing_depth = 50, cultivar = avalon, row_spacing = 178, crop_class = plant
          18/10/1994  surfaceorganicmatter tillage type = user_defined, f_incorp = 0.1, tillage_depth = 5
          20/04/1995  fertiliser apply amount = 34 (kg/ha), depth = 50 (mm), type = NO3_N
          09/08/1995  whiteclover sow plants = 815, sowing_depth = 50, cultivar = colenso, row_spacing = 178, crop_class = plant
          31/01/1996  whiteclover end_crop
          28/04/1996  surfaceorganicmatter tillage type = user_defined, f_incorp = 0.9, tillage_depth = 110
          06/05/1996  surfaceorganicmatter tillage type = user_defined, f_incorp = 0.5, tillage_depth = 30
          14/05/1996  fertiliser apply amount = 27 (kg/ha), depth = 50 (mm), type = NO3_N
          14/05/1996  maize sow plants = 6, sowing_depth = 50, cultivar = b_80, row_spacing = 762, crop_class = plant
          14/05/1996  surfaceorganicmatter tillage type = user_defined, f_incorp = 0.5, tillage_depth = 30
          22/05/1996  surfaceorganicmatter tillage type = user_defined, f_incorp = 0.5, tillage_depth = 30
          29/10/1996  whiteclover sow plants = 519, sowing_depth = 50, cultivar = colenso, row_spacing = 178, crop_class = plant
          04/04/1997  whiteclover end_crop
          04/04/1997  surfaceorganicmatter tillage type = user_defined, f_incorp = 0, tillage_depth = 0
          10/04/1997  fertiliser apply amount = 20 (kg/ha), depth = 50 (mm), type = Rock_P
          12/05/1997  surfaceorganicmatter tillage type = user_defined, f_incorp = 0.9, tillage_depth = 110
          13/05/1997  surfaceorganicmatter tillage type = user_defined, f_incorp = 0.5, tillage_depth = 30
          22/05/1997  surfaceorganicmatter tillage type = user_defined, f_incorp = 0.1, tillage_depth = 5
          23/05/1997  soybean sow plants = 47, sowing_depth = 50, cultivar = mg_3, row_spacing = 762, crop_class = plant
          18/06/1997  fertiliser apply amount = 2 (kg/ha), depth = 50 (mm), type = NO3_N
          24/10/1997  surfaceorganicmatter tillage type = user_defined, f_incorp = 0.1, tillage_depth = 5
          24/10/1997  surfaceorganicmatter tillage type = user_defined, f_incorp = 0.1, tillage_depth = 5
          25/10/1997  wheat sow plants = 445, sowing_depth = 50, cultivar = avalon, row_spacing = 178, crop_class = plant
          20/04/1998  fertiliser apply amount = 28 (kg/ha), depth = 50 (mm), type = NO3_N
          02/08/1998  whiteclover sow plants = 815, sowing_depth = 50, cultivar = colenso, row_spacing = 178, crop_class = plant
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          20/04/1999  fertiliser apply amount = 1123 (kg/ha), depth = 50 (mm), type = Calcite_CA
          14/10/1999  oats sow plants = 374, sowing_depth = 50, cultivar = wintaroo, row_spacing = 178, crop_class = plant
          31/01/2000  oats end_crop
          07/06/2000  soybean sow plants = 52, sowing_depth = 50, cultivar = mg_3, row_spacing = 762, crop_class = plant
          20/10/2000  fertiliser apply amount = 2470 (kg/ha), depth = 50 (mm), type = Calcite_CA
          01/11/2000  wheat sow plants = 466, sowing_depth = 50, cultivar = avalon, row_spacing = 178, crop_class = plant
          05/04/2001  fertiliser apply amount = 47 (kg/ha), depth = 50 (mm), type = NO3_N
          15/05/2002  fertiliser apply amount = 11 (kg/ha), depth = 50 (mm), type = Rock_P
          15/05/2002  maize sow plants = 7, sowing_depth = 50, cultivar = b_80, row_spacing = 762, crop_class = plant
          28/05/2003  soybean sow plants = 44, sowing_depth = 50, cultivar = mg_3, row_spacing = 762, crop_class = plant
          13/10/2003  wheat sow plants = 494, sowing_depth = 50, cultivar = avalon, row_spacing = 178, crop_class = plant
          16/04/2004  fertiliser apply amount = 54 (kg/ha), depth = 50 (mm), type = NO3_N
          07/05/2005  fertiliser apply amount = 33 (kg/ha), depth = 50 (mm), type = NO3_N
          07/05/2005  fertiliser apply amount = 13 (kg/ha), depth = 50 (mm), type = Rock_P
          11/11/2008  oats sow plants = 448, sowing_depth = 50, cultivar = wintaroo, row_spacing = 178, crop_class = plant
          23/06/2009  fertiliser apply amount = 1 (kg/ha), depth = 50 (mm), type = NO3_N
          14/11/2009  wheat sow plants = 498, sowing_depth = 50, cultivar = avalon, row_spacing = 178, crop_class = plant
          21/04/2010  fertiliser apply amount = 50 (kg/ha), depth = 50 (mm), type = NO3_N
          03/05/2010  fertiliser apply amount = 87 (kg/ha), depth = 50 (mm), type = NO3_N
          19/11/2011  oats sow plants = 672, sowing_depth = 50, cultivar = wintaroo, row_spacing = 178, crop_class = plant
          11/04/2012  fertiliser apply amount = 0 (kg/ha), depth = 50 (mm), type = Calcite_CA
          23/04/2012  fertiliser apply amount = 8 (kg/ha), depth = 50 (mm), type = NO3_N
          23/04/2012  fertiliser apply amount = 17 (kg/ha), depth = 50 (mm), type = Rock_P
          16/08/2013  whiteclover sow plants = 714, sowing_depth = 50, cultivar = colenso, row_spacing = 178, crop_class = plant
          07/11/2014  oats sow plants = 729, sowing_depth = 50, cultivar = wintaroo, row_spacing = 178, crop_class = plant
          14/04/2015  fertiliser apply amount = 10 (kg/ha), depth = 50 (mm), type = NO3_N
          14/04/2015  fertiliser apply amount = 26 (kg/ha), depth = 50 (mm), type = Rock_P
          16/04/2016  fertiliser apply amount = 20 (kg/ha), depth = 50 (mm), type = NO3_N
          16/04/2016  fertiliser apply amount = 52 (kg/ha), depth = 50 (mm), type = Rock_P
          27/04/2016  fertiliser apply amount = 9 (kg/ha), depth = 50 (mm), type = NO3_N
          27/04/2016  fertiliser apply amount = 17 (kg/ha), depth = 50 (mm), type = NO3_N
          27/04/2016  fertiliser apply amount = 8 (kg/ha), depth = 50 (mm), type = Rock_P
          19/05/2017  maize sow plants = 8, sowing_depth = 50, cultivar = b_80, row_spacing = 762, crop_class = plant
          08/11/2017  oats sow plants = 663, sowing_depth = 50, cultivar = wintaroo, row_spacing = 178, crop_class = plant
          19/10/2018  wheat sow plants = 485, sowing_depth = 50, cultivar = avalon, row_spacing = 178, crop_class = plant
          08/04/2019  fertiliser apply amount = 23 (kg/ha), depth = 50 (mm), type = NO3_N
          08/04/2019  fertiliser apply amount = 58 (kg/ha), depth = 50 (mm), type = Rock_P
          06/05/2019  fertiliser apply amount = 30 (kg/ha), depth = 50 (mm), type = NO3_N
          22/08/2019  whiteclover sow plants = 747, sowing_depth = 50, cultivar = colenso, row_spacing = 178, crop_class = plant
          26/05/2020  fertiliser apply amount = 34 (kg/ha), depth = 50 (mm), type = Rock_P
          16/11/2020  oats sow plants = 747, sowing_depth = 50, cultivar = wintaroo, row_spacing = 178, crop_class = plant
          10/05/2021  fertiliser apply amount = 27 (kg/ha), depth = 50 (mm), type = Rock_P
          07/11/2021  wheat sow plants = 489, sowing_depth = 50, cultivar = avalon, row_spacing = 178, crop_class = plant
  factorial Factorials: active=0
    settings
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